<neuroml xmlns="http://www.neuroml.org/schema/neuroml2"  xmlns:xs="http://www.w3.org/2001/XMLSchema" xmlns:xsi="http://www.w3.org/2001/XMLSchema-instance" xsi:schemaLocation="http://www.neuroml.org/schema/neuroml2 https://raw.github.com/NeuroML/NeuroML2/development/Schemas/NeuroML2/NeuroML_v2beta4.xsd" id="CortexDemo">
    <include href="SimpleIaF_inh.cell.nml"></include>
    <include href="SimpleIaF.cell.nml"></include>
    <include href="AMPAR.synapse.nml"></include>
    <include href="GABAA.synapse.nml"></include>
    <poissonFiringSynapse id="input_70Hz" synapse="AMPAR" averageRate="70 per_s" spikeTarget="./AMPAR"/>
    <network id="CortexDemo" type="networkWithTemperature" temperature="32.0 degC">
        <notes>Network generated using libNeuroML v0.2.6</notes>
        <population id="Exc" component="SimpleIaF" type="populationList" size="40">
            <instance id="0">
                <location y="44.073259917500003" x="96.645353569199997" z="0.749147005859"/>
            </instance>
            <instance id="1">
                <location y="93.926899736400003" x="91.097596244900004" z="58.222757305899997"/>
            </instance>
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        </population>
        <population id="Inh" component="SimpleIaF_inh" type="populationList" size="20">
            <instance id="0">
                <location y="58.451181056499998" x="17.468991840299999" z="30.177705779899998"/>
            </instance>
            <instance id="1">
                <location y="53.434074784099998" x="81.285139435900007" z="49.958730419299997"/>
            </instance>
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        </population>
        <projection id="NetConn_Exc_Exc" postsynapticPopulation="Exc" presynapticPopulation="Exc" synapse="AMPAR">
            <connection id="0" preFractionAlong="0.5" preCellId="../Exc/0/SimpleIaF" postFractionAlong="0.5" postSegmentId="0" postCellId="../Exc/5/SimpleIaF" preSegmentId="0"/>
            <connection id="1" preFractionAlong="0.5" preCellId="../Exc/0/SimpleIaF" postFractionAlong="0.5" postSegmentId="0" postCellId="../Exc/6/SimpleIaF" preSegmentId="0"/>
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        </projection>
        <projection id="NetConn_Exc_Inh" postsynapticPopulation="Inh" presynapticPopulation="Exc" synapse="AMPAR">
            <connection id="0" preFractionAlong="0.5" preCellId="../Exc/0/SimpleIaF" postFractionAlong="0.5" postSegmentId="0" postCellId="../Inh/1/SimpleIaF_inh" preSegmentId="0"/>
            <connection id="1" preFractionAlong="0.5" preCellId="../Exc/0/SimpleIaF" postFractionAlong="0.5" postSegmentId="0" postCellId="../Inh/6/SimpleIaF_inh" preSegmentId="0"/>
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        </projection>
        <projection id="NetConn_Inh_Exc" postsynapticPopulation="Exc" presynapticPopulation="Inh" synapse="GABAA">
            <connection id="0" preFractionAlong="0.5" preCellId="../Inh/1/SimpleIaF_inh" postFractionAlong="0.5" postSegmentId="0" postCellId="../Exc/0/SimpleIaF" preSegmentId="0"/>
            <connection id="1" preFractionAlong="0.5" preCellId="../Inh/2/SimpleIaF_inh" postFractionAlong="0.5" postSegmentId="0" postCellId="../Exc/0/SimpleIaF" preSegmentId="0"/>
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        </projection>
        <projection id="NetConn_Inh_Inh" postsynapticPopulation="Inh" presynapticPopulation="Inh" synapse="GABAA">
            <connection id="0" preFractionAlong="0.5" preCellId="../Inh/1/SimpleIaF_inh" postFractionAlong="0.5" postSegmentId="0" postCellId="../Inh/0/SimpleIaF_inh" preSegmentId="0"/>
            <connection id="1" preFractionAlong="0.5" preCellId="../Inh/6/SimpleIaF_inh" postFractionAlong="0.5" postSegmentId="0" postCellId="../Inh/0/SimpleIaF_inh" preSegmentId="0"/>
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        </projection>
        <inputList id="Input_0" component="input_70Hz" population="Exc">
            <input destination="synapses" id="0" target="../Exc/0/SimpleIaF"/>
            <input destination="synapses" id="0" target="../Exc/0/SimpleIaF"/>
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        </inputList>
    </network>
</neuroml>
