<neuroml xmlns="http://www.neuroml.org/schema/neuroml2"  xmlns:xs="http://www.w3.org/2001/XMLSchema" xmlns:xsi="http://www.w3.org/2001/XMLSchema-instance" xsi:schemaLocation="http://www.neuroml.org/schema/neuroml2 https://raw.github.com/NeuroML/NeuroML2/development/Schemas/NeuroML2/NeuroML_v2beta4.xsd" id="CortexDemo9999">
    <include href="HHCell.cell.nml"></include>
    <include href="AMPAR.synapse.nml"></include>
    <include href="GABAA.synapse.nml"></include>
    <network id="CortexDemo9999" type="networkWithTemperature" temperature="32.0 degC">
        <notes>Network generated using libNeuroML v0.2.10</notes>
        <population id="Exc_0" type="populationList" component="HHCell" size="1111">
            <instance id="0">
                <location y="-88.146519835099994" x="386.581414277000022" z="2.99658802343"/>
            </instance>
            <instance id="1">
                <location y="-187.853799473000009" x="364.390384980000022" z="232.891029223999993"/>
            </instance>
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        </population>
        <population id="Exc_1" type="populationList" component="HHCell" size="1111">
            <instance id="0">
                <location y="-383.886049341999978" x="357.783035889000018" z="204.692606071"/>
            </instance>
            <instance id="1">
                <location y="-245.174881612000007" x="17.019993184899999" z="242.637768475000001"/>
            </instance>
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        </population>
        <population id="Exc_2" type="populationList" component="HHCell" size="1111">
            <instance id="0">
                <location y="-466.850137909000011" x="217.847204280999989" z="235.901087942000004"/>
            </instance>
            <instance id="1">
                <location y="-533.055793689999973" x="357.872162987000024" z="117.732836108000001"/>
            </instance>
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        </population>
        <population id="Exc_3" type="populationList" component="HHCell" size="1111">
            <instance id="0">
                <location y="-730.822190279999973" x="220.858712150999992" z="379.109068401000002"/>
            </instance>
            <instance id="1">
                <location y="-780.06101214399996" x="2.82400180712" z="94.945874992200004"/>
            </instance>
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        </population>
        <population id="Exc_4" type="populationList" component="HHCell" size="1111">
            <instance id="0">
                <location y="-943.128148418000023" x="340.56244783599999" z="214.973219704000002"/>
            </instance>
            <instance id="1">
                <location y="-901.37966522399995" x="209.849252352000008" z="146.065617973999991"/>
            </instance>
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        </population>
        <population id="Exc_5" type="populationList" component="HHCell" size="1111">
            <instance id="0">
                <location y="-1106.242034829999966" x="368.302703491999978" z="236.299399786000009"/>
            </instance>
            <instance id="1">
                <location y="-1105.447179139999889" x="26.055088428400001" z="265.455723026999976"/>
            </instance>
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        </population>
        <population id="Exc_6" type="populationList" component="HHCell" size="1111">
            <instance id="0">
                <location y="-1380.996330350000108" x="281.965677620000008" z="146.904041132000003"/>
            </instance>
            <instance id="1">
                <location y="-1347.280498840000064" x="344.262295248999976" z="55.141676773500002"/>
            </instance>
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        </population>
        <population id="Exc_7" type="populationList" component="HHCell" size="1111">
            <instance id="0">
                <location y="-1579.642502550000017" x="171.453743750000001" z="46.1846358182"/>
            </instance>
            <instance id="1">
                <location y="-1593.586934729999939" x="377.694119759999978" z="196.899041097000008"/>
            </instance>
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        </population>
        <population id="Exc_8" type="populationList" component="HHCell" size="1111">
            <instance id="0">
                <location y="-1718.404564599999958" x="227.719278588999998" z="53.863750749399998"/>
            </instance>
            <instance id="1">
                <location y="-1707.037651030000006" x="376.522987066999974" z="227.85697730199999"/>
            </instance>
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        </population>
    </network>
</neuroml>
