<neuroml xmlns="http://www.neuroml.org/schema/neuroml2"  xmlns:xs="http://www.w3.org/2001/XMLSchema" xmlns:xsi="http://www.w3.org/2001/XMLSchema-instance" xsi:schemaLocation="http://www.neuroml.org/schema/neuroml2 https://raw.github.com/NeuroML/NeuroML2/development/Schemas/NeuroML2/NeuroML_v2beta4.xsd" id="CortexDemoHH">
    <include href="HHCell.cell.nml"></include>
    <include href="AMPAR.synapse.nml"></include>
    <include href="GABAA.synapse.nml"></include>
    <pulseGenerator id="PulseGenerator_0" delay="0ms" duration="400ms" amplitude="0.214177nA"/>
    <pulseGenerator id="PulseGenerator_1" delay="0ms" duration="400ms" amplitude="0.377661nA"/>
    <pulseGenerator id="PulseGenerator_2" delay="0ms" duration="400ms" amplitude="0.369663nA"/>
    <pulseGenerator id="PulseGenerator_3" delay="0ms" duration="400ms" amplitude="0.005228nA"/>
    <pulseGenerator id="PulseGenerator_4" delay="0ms" duration="400ms" amplitude="0.213371nA"/>
    <pulseGenerator id="PulseGenerator_5" delay="0ms" duration="400ms" amplitude="0.046058nA"/>
    <pulseGenerator id="PulseGenerator_6" delay="0ms" duration="400ms" amplitude="0.243348nA"/>
    <pulseGenerator id="PulseGenerator_7" delay="0ms" duration="400ms" amplitude="0.279490nA"/>
    <pulseGenerator id="PulseGenerator_8" delay="0ms" duration="400ms" amplitude="0.069146nA"/>
    <pulseGenerator id="PulseGenerator_9" delay="0ms" duration="400ms" amplitude="0.104338nA"/>
    <pulseGenerator id="PulseGenerator_10" delay="0ms" duration="400ms" amplitude="0.079066nA"/>
    <pulseGenerator id="PulseGenerator_11" delay="0ms" duration="400ms" amplitude="0.140050nA"/>
    <pulseGenerator id="PulseGenerator_12" delay="0ms" duration="400ms" amplitude="0.233622nA"/>
    <pulseGenerator id="PulseGenerator_13" delay="0ms" duration="400ms" amplitude="0.161318nA"/>
    <pulseGenerator id="PulseGenerator_14" delay="0ms" duration="400ms" amplitude="0.326791nA"/>
    <pulseGenerator id="PulseGenerator_15" delay="0ms" duration="400ms" amplitude="0.342560nA"/>
    <pulseGenerator id="PulseGenerator_16" delay="0ms" duration="400ms" amplitude="0.024803nA"/>
    <pulseGenerator id="PulseGenerator_17" delay="0ms" duration="400ms" amplitude="0.042355nA"/>
    <pulseGenerator id="PulseGenerator_18" delay="0ms" duration="400ms" amplitude="0.002220nA"/>
    <pulseGenerator id="PulseGenerator_19" delay="0ms" duration="400ms" amplitude="0.156978nA"/>
    <pulseGenerator id="PulseGenerator_20" delay="0ms" duration="400ms" amplitude="0.267758nA"/>
    <pulseGenerator id="PulseGenerator_21" delay="0ms" duration="400ms" amplitude="0.381013nA"/>
    <pulseGenerator id="PulseGenerator_22" delay="0ms" duration="400ms" amplitude="0.387462nA"/>
    <pulseGenerator id="PulseGenerator_23" delay="0ms" duration="400ms" amplitude="0.103148nA"/>
    <pulseGenerator id="PulseGenerator_24" delay="0ms" duration="400ms" amplitude="0.059292nA"/>
    <pulseGenerator id="PulseGenerator_25" delay="0ms" duration="400ms" amplitude="0.259049nA"/>
    <pulseGenerator id="PulseGenerator_26" delay="0ms" duration="400ms" amplitude="0.045867nA"/>
    <pulseGenerator id="PulseGenerator_27" delay="0ms" duration="400ms" amplitude="0.373571nA"/>
    <pulseGenerator id="PulseGenerator_28" delay="0ms" duration="400ms" amplitude="0.098328nA"/>
    <pulseGenerator id="PulseGenerator_29" delay="0ms" duration="400ms" amplitude="0.339813nA"/>
    <pulseGenerator id="PulseGenerator_30" delay="0ms" duration="400ms" amplitude="0.306279nA"/>
    <pulseGenerator id="PulseGenerator_31" delay="0ms" duration="400ms" amplitude="0.054268nA"/>
    <pulseGenerator id="PulseGenerator_32" delay="0ms" duration="400ms" amplitude="0.059856nA"/>
    <pulseGenerator id="PulseGenerator_33" delay="0ms" duration="400ms" amplitude="0.232058nA"/>
    <pulseGenerator id="PulseGenerator_34" delay="0ms" duration="400ms" amplitude="0.069997nA"/>
    <pulseGenerator id="PulseGenerator_35" delay="0ms" duration="400ms" amplitude="0.382362nA"/>
    <pulseGenerator id="PulseGenerator_36" delay="0ms" duration="400ms" amplitude="0.126206nA"/>
    <pulseGenerator id="PulseGenerator_37" delay="0ms" duration="400ms" amplitude="0.224528nA"/>
    <pulseGenerator id="PulseGenerator_38" delay="0ms" duration="400ms" amplitude="0.231203nA"/>
    <pulseGenerator id="PulseGenerator_39" delay="0ms" duration="400ms" amplitude="0.203642nA"/>
    <pulseGenerator id="PulseGenerator_40" delay="0ms" duration="400ms" amplitude="0.078661nA"/>
    <pulseGenerator id="PulseGenerator_41" delay="0ms" duration="400ms" amplitude="0.333133nA"/>
    <pulseGenerator id="PulseGenerator_42" delay="0ms" duration="400ms" amplitude="0.035279nA"/>
    <pulseGenerator id="PulseGenerator_43" delay="0ms" duration="400ms" amplitude="0.378222nA"/>
    <pulseGenerator id="PulseGenerator_44" delay="0ms" duration="400ms" amplitude="0.169544nA"/>
    <pulseGenerator id="PulseGenerator_45" delay="0ms" duration="400ms" amplitude="0.011696nA"/>
    <pulseGenerator id="PulseGenerator_46" delay="0ms" duration="400ms" amplitude="0.387775nA"/>
    <pulseGenerator id="PulseGenerator_47" delay="0ms" duration="400ms" amplitude="0.269834nA"/>
    <pulseGenerator id="PulseGenerator_48" delay="0ms" duration="400ms" amplitude="0.012704nA"/>
    <pulseGenerator id="PulseGenerator_49" delay="0ms" duration="400ms" amplitude="0.253543nA"/>
    <network id="CortexDemoHH" type="networkWithTemperature" temperature="32.0 degC">
        <notes>Network generated using libNeuroML v0.2.10</notes>
        <population id="Exc" type="populationList" component="HHCell" size="50">
            <instance id="0">
                <location y="44.073259917500003" x="193.290707137999988" z="1.49829401172"/>
            </instance>
            <instance id="1">
                <location y="93.926899736400003" x="182.195192490000011" z="116.445514611999997"/>
            </instance>
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        </population>
        <population id="Inh" type="populationList" component="HHCell" size="20">
            <instance id="0">
                <location y="68.5270090235" x="84.407373247999999" z="169.381769227000007"/>
            </instance>
            <instance id="1">
                <location y="9.28688255276" x="167.753557164" z="52.063152608300001"/>
            </instance>
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        </population>
        <projection id="NetConn_Exc_Exc" postsynapticPopulation="Exc" presynapticPopulation="Exc" synapse="AMPAR">
            <connection id="0" preFractionAlong="0.5" preCellId="../Exc/0/HHCell" postFractionAlong="0.5" postSegmentId="0" postCellId="../Exc/1/HHCell" preSegmentId="0"/>
            <connection id="1" preFractionAlong="0.5" preCellId="../Exc/0/HHCell" postFractionAlong="0.5" postSegmentId="0" postCellId="../Exc/4/HHCell" preSegmentId="0"/>
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        </projection>
        <projection id="NetConn_Exc_Inh" postsynapticPopulation="Inh" presynapticPopulation="Exc" synapse="AMPAR">
            <connection id="0" preFractionAlong="0.5" preCellId="../Exc/0/HHCell" postFractionAlong="0.5" postSegmentId="0" postCellId="../Inh/2/HHCell" preSegmentId="0"/>
            <connection id="1" preFractionAlong="0.5" preCellId="../Exc/0/HHCell" postFractionAlong="0.5" postSegmentId="0" postCellId="../Inh/5/HHCell" preSegmentId="0"/>
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        </projection>
        <projection id="NetConn_Inh_Exc" postsynapticPopulation="Exc" presynapticPopulation="Inh" synapse="GABAA">
            <connection id="0" preFractionAlong="0.5" preCellId="../Inh/1/HHCell" postFractionAlong="0.5" postSegmentId="0" postCellId="../Exc/0/HHCell" preSegmentId="0"/>
            <connection id="1" preFractionAlong="0.5" preCellId="../Inh/3/HHCell" postFractionAlong="0.5" postSegmentId="0" postCellId="../Exc/0/HHCell" preSegmentId="0"/>
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        </projection>
        <projection id="NetConn_Inh_Inh" postsynapticPopulation="Inh" presynapticPopulation="Inh" synapse="GABAA">
            <connection id="0" preFractionAlong="0.5" preCellId="../Inh/18/HHCell" postFractionAlong="0.5" postSegmentId="0" postCellId="../Inh/0/HHCell" preSegmentId="0"/>
            <connection id="1" preFractionAlong="0.5" preCellId="../Inh/6/HHCell" postFractionAlong="0.5" postSegmentId="0" postCellId="../Inh/1/HHCell" preSegmentId="0"/>
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        </projection>
        <inputList id="Input_Pulse_List_0" component="PulseGenerator_0" population="Exc">
            <input destination="synapses" id="0" target="../Exc/0/HHCell"/>
        </inputList>
        <inputList id="Input_Pulse_List_1" component="PulseGenerator_1" population="Exc">
            <input destination="synapses" id="0" target="../Exc/1/HHCell"/>
        </inputList>
        <inputList id="Input_Pulse_List_2" component="PulseGenerator_2" population="Exc">
            <input destination="synapses" id="0" target="../Exc/2/HHCell"/>
        </inputList>
        <inputList id="Input_Pulse_List_3" component="PulseGenerator_3" population="Exc">
            <input destination="synapses" id="0" target="../Exc/3/HHCell"/>
        </inputList>
        <inputList id="Input_Pulse_List_4" component="PulseGenerator_4" population="Exc">
            <input destination="synapses" id="0" target="../Exc/4/HHCell"/>
        </inputList>
        <inputList id="Input_Pulse_List_5" component="PulseGenerator_5" population="Exc">
            <input destination="synapses" id="0" target="../Exc/5/HHCell"/>
        </inputList>
        <inputList id="Input_Pulse_List_6" component="PulseGenerator_6" population="Exc">
            <input destination="synapses" id="0" target="../Exc/6/HHCell"/>
        </inputList>
        <inputList id="Input_Pulse_List_7" component="PulseGenerator_7" population="Exc">
            <input destination="synapses" id="0" target="../Exc/7/HHCell"/>
        </inputList>
        <inputList id="Input_Pulse_List_8" component="PulseGenerator_8" population="Exc">
            <input destination="synapses" id="0" target="../Exc/8/HHCell"/>
        </inputList>
        <inputList id="Input_Pulse_List_9" component="PulseGenerator_9" population="Exc">
            <input destination="synapses" id="0" target="../Exc/9/HHCell"/>
        </inputList>
        <inputList id="Input_Pulse_List_10" component="PulseGenerator_10" population="Exc">
            <input destination="synapses" id="0" target="../Exc/10/HHCell"/>
        </inputList>
        <inputList id="Input_Pulse_List_11" component="PulseGenerator_11" population="Exc">
            <input destination="synapses" id="0" target="../Exc/11/HHCell"/>
        </inputList>
        <inputList id="Input_Pulse_List_12" component="PulseGenerator_12" population="Exc">
            <input destination="synapses" id="0" target="../Exc/12/HHCell"/>
        </inputList>
        <inputList id="Input_Pulse_List_13" component="PulseGenerator_13" population="Exc">
            <input destination="synapses" id="0" target="../Exc/13/HHCell"/>
        </inputList>
        <inputList id="Input_Pulse_List_14" component="PulseGenerator_14" population="Exc">
            <input destination="synapses" id="0" target="../Exc/14/HHCell"/>
        </inputList>
        <inputList id="Input_Pulse_List_15" component="PulseGenerator_15" population="Exc">
            <input destination="synapses" id="0" target="../Exc/15/HHCell"/>
        </inputList>
        <inputList id="Input_Pulse_List_16" component="PulseGenerator_16" population="Exc">
            <input destination="synapses" id="0" target="../Exc/16/HHCell"/>
        </inputList>
        <inputList id="Input_Pulse_List_17" component="PulseGenerator_17" population="Exc">
            <input destination="synapses" id="0" target="../Exc/17/HHCell"/>
        </inputList>
        <inputList id="Input_Pulse_List_18" component="PulseGenerator_18" population="Exc">
            <input destination="synapses" id="0" target="../Exc/18/HHCell"/>
        </inputList>
        <inputList id="Input_Pulse_List_19" component="PulseGenerator_19" population="Exc">
            <input destination="synapses" id="0" target="../Exc/19/HHCell"/>
        </inputList>
        <inputList id="Input_Pulse_List_20" component="PulseGenerator_20" population="Exc">
            <input destination="synapses" id="0" target="../Exc/20/HHCell"/>
        </inputList>
        <inputList id="Input_Pulse_List_21" component="PulseGenerator_21" population="Exc">
            <input destination="synapses" id="0" target="../Exc/21/HHCell"/>
        </inputList>
        <inputList id="Input_Pulse_List_22" component="PulseGenerator_22" population="Exc">
            <input destination="synapses" id="0" target="../Exc/22/HHCell"/>
        </inputList>
        <inputList id="Input_Pulse_List_23" component="PulseGenerator_23" population="Exc">
            <input destination="synapses" id="0" target="../Exc/23/HHCell"/>
        </inputList>
        <inputList id="Input_Pulse_List_24" component="PulseGenerator_24" population="Exc">
            <input destination="synapses" id="0" target="../Exc/24/HHCell"/>
        </inputList>
        <inputList id="Input_Pulse_List_25" component="PulseGenerator_25" population="Exc">
            <input destination="synapses" id="0" target="../Exc/25/HHCell"/>
        </inputList>
        <inputList id="Input_Pulse_List_26" component="PulseGenerator_26" population="Exc">
            <input destination="synapses" id="0" target="../Exc/26/HHCell"/>
        </inputList>
        <inputList id="Input_Pulse_List_27" component="PulseGenerator_27" population="Exc">
            <input destination="synapses" id="0" target="../Exc/27/HHCell"/>
        </inputList>
        <inputList id="Input_Pulse_List_28" component="PulseGenerator_28" population="Exc">
            <input destination="synapses" id="0" target="../Exc/28/HHCell"/>
        </inputList>
        <inputList id="Input_Pulse_List_29" component="PulseGenerator_29" population="Exc">
            <input destination="synapses" id="0" target="../Exc/29/HHCell"/>
        </inputList>
        <inputList id="Input_Pulse_List_30" component="PulseGenerator_30" population="Exc">
            <input destination="synapses" id="0" target="../Exc/30/HHCell"/>
        </inputList>
        <inputList id="Input_Pulse_List_31" component="PulseGenerator_31" population="Exc">
            <input destination="synapses" id="0" target="../Exc/31/HHCell"/>
        </inputList>
        <inputList id="Input_Pulse_List_32" component="PulseGenerator_32" population="Exc">
            <input destination="synapses" id="0" target="../Exc/32/HHCell"/>
        </inputList>
        <inputList id="Input_Pulse_List_33" component="PulseGenerator_33" population="Exc">
            <input destination="synapses" id="0" target="../Exc/33/HHCell"/>
        </inputList>
        <inputList id="Input_Pulse_List_34" component="PulseGenerator_34" population="Exc">
            <input destination="synapses" id="0" target="../Exc/34/HHCell"/>
        </inputList>
        <inputList id="Input_Pulse_List_35" component="PulseGenerator_35" population="Exc">
            <input destination="synapses" id="0" target="../Exc/35/HHCell"/>
        </inputList>
        <inputList id="Input_Pulse_List_36" component="PulseGenerator_36" population="Exc">
            <input destination="synapses" id="0" target="../Exc/36/HHCell"/>
        </inputList>
        <inputList id="Input_Pulse_List_37" component="PulseGenerator_37" population="Exc">
            <input destination="synapses" id="0" target="../Exc/37/HHCell"/>
        </inputList>
        <inputList id="Input_Pulse_List_38" component="PulseGenerator_38" population="Exc">
            <input destination="synapses" id="0" target="../Exc/38/HHCell"/>
        </inputList>
        <inputList id="Input_Pulse_List_39" component="PulseGenerator_39" population="Exc">
            <input destination="synapses" id="0" target="../Exc/39/HHCell"/>
        </inputList>
        <inputList id="Input_Pulse_List_40" component="PulseGenerator_40" population="Exc">
            <input destination="synapses" id="0" target="../Exc/40/HHCell"/>
        </inputList>
        <inputList id="Input_Pulse_List_41" component="PulseGenerator_41" population="Exc">
            <input destination="synapses" id="0" target="../Exc/41/HHCell"/>
        </inputList>
        <inputList id="Input_Pulse_List_42" component="PulseGenerator_42" population="Exc">
            <input destination="synapses" id="0" target="../Exc/42/HHCell"/>
        </inputList>
        <inputList id="Input_Pulse_List_43" component="PulseGenerator_43" population="Exc">
            <input destination="synapses" id="0" target="../Exc/43/HHCell"/>
        </inputList>
        <inputList id="Input_Pulse_List_44" component="PulseGenerator_44" population="Exc">
            <input destination="synapses" id="0" target="../Exc/44/HHCell"/>
        </inputList>
        <inputList id="Input_Pulse_List_45" component="PulseGenerator_45" population="Exc">
            <input destination="synapses" id="0" target="../Exc/45/HHCell"/>
        </inputList>
        <inputList id="Input_Pulse_List_46" component="PulseGenerator_46" population="Exc">
            <input destination="synapses" id="0" target="../Exc/46/HHCell"/>
        </inputList>
        <inputList id="Input_Pulse_List_47" component="PulseGenerator_47" population="Exc">
            <input destination="synapses" id="0" target="../Exc/47/HHCell"/>
        </inputList>
        <inputList id="Input_Pulse_List_48" component="PulseGenerator_48" population="Exc">
            <input destination="synapses" id="0" target="../Exc/48/HHCell"/>
        </inputList>
        <inputList id="Input_Pulse_List_49" component="PulseGenerator_49" population="Exc">
            <input destination="synapses" id="0" target="../Exc/49/HHCell"/>
        </inputList>
    </network>
</neuroml>
