<neuroml xmlns="http://www.neuroml.org/schema/neuroml2"  xmlns:xs="http://www.w3.org/2001/XMLSchema" xmlns:xsi="http://www.w3.org/2001/XMLSchema-instance" xsi:schemaLocation="http://www.neuroml.org/schema/neuroml2 https://raw.github.com/NeuroML/NeuroML2/development/Schemas/NeuroML2/NeuroML_v2beta4.xsd" id="LayeredCortexDemo">
    <include href="HHCell.cell.nml"></include>
    <include href="AMPAR.synapse.nml"></include>
    <include href="GABAA.synapse.nml"></include>
    <network id="LayeredCortexDemo" type="networkWithTemperature" temperature="32.0 degC">
        <notes>Network generated using libNeuroML v0.2.6</notes>
        <population id="Exc_0" component="HHCell" type="populationList" size="20">
            <instance id="0">
                <location y="44.073259917500003" x="386.581414277000022" z="2.99658802343"/>
            </instance>
            <instance id="1">
                <location y="93.926899736400003" x="364.390384980000022" z="232.891029223999993"/>
            </instance>
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        </population>
        <population id="Inh_0" component="HHCell" type="populationList" size="0"/>
        <population id="Exc_1" component="HHCell" type="populationList" size="20">
            <instance id="0">
                <location y="138.618352834000007" x="16.425122508699999" z="139.83692078499999"/>
            </instance>
            <instance id="1">
                <location y="181.646305670999993" x="136.683117100000004" z="190.373963252999999"/>
            </instance>
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        </population>
        <population id="Inh_1" component="HHCell" type="populationList" size="0"/>
        <population id="Exc_2" component="HHCell" type="populationList" size="20">
            <instance id="0">
                <location y="258.451181056999985" x="69.875967361199997" z="120.710823120000001"/>
            </instance>
            <instance id="1">
                <location y="253.434074783999989" x="325.140557743999977" z="199.834921677000011"/>
            </instance>
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        </population>
        <population id="Inh_2" component="HHCell" type="populationList" size="0"/>
        <population id="Exc_3" component="HHCell" type="populationList" size="20">
            <instance id="0">
                <location y="351.88643261499999" x="82.427192237900002" z="371.869074011000009"/>
            </instance>
            <instance id="1">
                <location y="366.831051166999998" x="182.966982733999998" z="263.937276686000018"/>
            </instance>
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        </population>
        <population id="Inh_3" component="HHCell" type="populationList" size="0"/>
        <population id="Exc_4" component="HHCell" type="populationList" size="20">
            <instance id="0">
                <location y="449.941602859999989" x="65.013717049299999" z="376.019229519000021"/>
            </instance>
            <instance id="1">
                <location y="413.993868141000007" x="380.073079441999994" z="212.925513453999997"/>
            </instance>
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        </population>
        <population id="Inh_4" component="HHCell" type="populationList" size="0"/>
        <population id="Exc_5" component="HHCell" type="populationList" size="20">
            <instance id="0">
                <location y="546.804772587000002" x="365.595268010999973" z="239.103894617999998"/>
            </instance>
            <instance id="1">
                <location y="539.665422147999948" x="148.716924454000008" z="311.363003753999976"/>
            </instance>
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        </population>
        <population id="Inh_5" component="HHCell" type="populationList" size="0"/>
        <population id="Exc_6" component="HHCell" type="populationList" size="20">
            <instance id="0">
                <location y="693.113402780000001" x="189.169787393999997" z="371.608628230000022"/>
            </instance>
            <instance id="1">
                <location y="644.158094314999971" x="127.817219334000001" z="209.94819732900001"/>
            </instance>
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        </population>
        <population id="Inh_6" component="HHCell" type="populationList" size="0"/>
        <population id="Exc_7" component="HHCell" type="populationList" size="20">
            <instance id="0">
                <location y="777.990503661000048" x="219.951457989999994" z="287.280985369000007"/>
            </instance>
            <instance id="1">
                <location y="707.081493599000055" x="286.976641604999998" z="97.759839374899997"/>
            </instance>
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        </population>
        <population id="Inh_7" component="HHCell" type="populationList" size="0"/>
        <population id="Exc_8" component="HHCell" type="populationList" size="20">
            <instance id="0">
                <location y="844.026777324000022" x="145.268403936999988" z="272.999572048000005"/>
            </instance>
            <instance id="1">
                <location y="842.234967274000041" x="4.4282299708" z="168.688170109999987"/>
            </instance>
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        </population>
        <population id="Inh_8" component="HHCell" type="populationList" size="0"/>
        <population id="Exc_9" component="HHCell" type="populationList" size="20">
            <instance id="0">
                <location y="959.475107643999991" x="381.875600303999988" z="365.111253218000002"/>
            </instance>
            <instance id="1">
                <location y="965.251845350000053" x="280.204710460999991" z="251.575850661999993"/>
            </instance>
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        </population>
        <population id="Inh_9" component="HHCell" type="populationList" size="0"/>
    </network>
</neuroml>
