<?xml version="1.0" encoding="UTF-8"?>
<neuroml xmlns="http://www.neuroml.org/schema/neuroml2" xmlns:xsi="http://www.w3.org/2001/XMLSchema-instance" xsi:schemaLocation="http://www.neuroml.org/schema/neuroml2 https://raw.github.com/NeuroML/NeuroML2/development/Schemas/NeuroML2/NeuroML_v2beta4.xsd" id="WhichModel">
<include href="GABA_syn.synapse.nml"/>
<include href="GABAA.synapse.nml"/>
<include href="AMPA_syn.synapse.nml"/>
<include href="AMPAR.synapse.nml"/>
<network id="net1" type="networkWithTemperature" temperature="32.0 degC">
<population id="SOM_L23" component="IzhikevichCell2007" type="populationList" size="11">
<instance id="0"><location x="155.557802186" y="161.431651133" z="258.733906633"/></instance>
<instance id="1"><location x="22.366455392" y="272.414386551" z="224.188627432"/></instance>
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</population>
<population id="IT_L23" component="IzhikevichCell2007" type="populationList" size="92">
<instance id="0"><location x="168.792791056" y="184.000107343" z="47.5184385029"/></instance>
<instance id="1"><location x="140.673895417" y="263.412025031" z="219.27533078"/></instance>
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</population>
<population id="SOM_L5" component="IzhikevichCell2007" type="populationList" size="27">
<instance id="0"><location x="45.5305344897" y="454.963801394" z="88.1487950651"/></instance>
<instance id="1"><location x="83.1100056916" y="729.437805686" z="296.178591445"/></instance>
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</population>
<population id="PV_L23" component="IzhikevichCell2007" type="populationList" size="13">
<instance id="0"><location x="67.2378923132" y="271.780570298" z="2.99106722918"/></instance>
<instance id="1"><location x="2.88771053542" y="290.602440675" z="128.760329625"/></instance>
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</population>
<population id="CT_L6" component="IzhikevichCell2007" type="populationList" size="56">
<instance id="0"><location x="9.71705777377" y="1189.30729128" z="59.0839404176"/></instance>
<instance id="1"><location x="279.766246616" y="1209.92172074" z="218.771770742"/></instance>
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</population>
<population id="PV_L5" component="IzhikevichCell2007" type="populationList" size="29">
<instance id="0"><location x="46.3563920753" y="442.285528945" z="230.515100103"/></instance>
<instance id="1"><location x="127.467195337" y="863.538276782" z="256.170838072"/></instance>
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</population>
<population id="PV_L6" component="IzhikevichCell2007" type="populationList" size="14">
<instance id="0"><location x="22.1564783479" y="1051.39276447" z="277.242047817"/></instance>
<instance id="1"><location x="212.836456025" y="1262.01913839" z="163.842743407"/></instance>
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</population>
<population id="IT_L5B" component="IzhikevichCell2007" type="populationList" size="58">
<instance id="0"><location x="148.375332984" y="911.45428485" z="289.040723255"/></instance>
<instance id="1"><location x="270.26428468" y="705.072836175" z="95.914606235"/></instance>
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</population>
<population id="IT_L5A" component="IzhikevichCell2007" type="populationList" size="55">
<instance id="0"><location x="200.283375607" y="621.582003223" z="206.878040081"/></instance>
<instance id="1"><location x="184.819145707" y="644.51603103" z="174.645128052"/></instance>
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</population>
<population id="PT_L5B" component="IzhikevichCell2007" type="populationList" size="63">
<instance id="0"><location x="198.920847474" y="914.540925972" z="246.614434029"/></instance>
<instance id="1"><location x="248.91712053" y="970.875439978" z="136.802641035"/></instance>
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</population>
<population id="IT_L6" component="IzhikevichCell2007" type="populationList" size="56">
<instance id="0"><location x="9.71705777377" y="1189.30729128" z="59.0839404176"/></instance>
<instance id="1"><location x="279.766246616" y="1209.92172074" z="218.771770742"/></instance>
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</population>
<population id="SOM_L6" component="IzhikevichCell2007" type="populationList" size="15">
<instance id="0"><location x="257.259678853" y="1139.90398402" z="97.7923620517"/></instance>
<instance id="1"><location x="63.2407407037" y="1043.39995335" z="259.710642216"/></instance>
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</population>
<population id="IT_L4" component="IzhikevichCell2007" type="populationList" size="48">
<instance id="0"><location x="66.6379171464" y="483.633604904" z="256.042520147"/></instance>
<instance id="1"><location x="294.861666576" y="492.596400321" z="185.048864023"/></instance>
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</population>
<projection id="SOM_L5_IT_L5B" presynapticPopulation="SOM_L5" postsynapticPopulation="IT_L5B" synapse="GABA_syn">
<connection id="0" preCellId="../SOM_L5/0/IzhikevichCell2007" postCellId="../IT_L5B/47/IzhikevichCell2007" preSegmentId="0" preFractionAlong="0.5" postSegmentId="0" postFractionAlong="0.5"/>
<connection id="1" preCellId="../SOM_L5/0/IzhikevichCell2007" postCellId="../IT_L5B/34/IzhikevichCell2007" preSegmentId="0" preFractionAlong="0.5" postSegmentId="0" postFractionAlong="0.5"/>
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</projection>
<projection id="SOM_L6_PT_L5B" presynapticPopulation="SOM_L6" postsynapticPopulation="PT_L5B" synapse="GABA_syn">
<connection id="0" preCellId="../SOM_L6/0/IzhikevichCell2007" postCellId="../PT_L5B/17/IzhikevichCell2007" preSegmentId="0" preFractionAlong="0.5" postSegmentId="0" postFractionAlong="0.5"/>
<connection id="1" preCellId="../SOM_L6/4/IzhikevichCell2007" postCellId="../PT_L5B/5/IzhikevichCell2007" preSegmentId="0" preFractionAlong="0.5" postSegmentId="0" postFractionAlong="0.5"/>
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</projection>
<projection id="IT_L23_IT_L5A" presynapticPopulation="IT_L23" postsynapticPopulation="IT_L5A" synapse="AMPA_syn">
<connection id="0" preCellId="../IT_L23/0/IzhikevichCell2007" postCellId="../IT_L5A/8/IzhikevichCell2007" preSegmentId="0" preFractionAlong="0.5" postSegmentId="0" postFractionAlong="0.5"/>
<connection id="1" preCellId="../IT_L23/0/IzhikevichCell2007" postCellId="../IT_L5A/28/IzhikevichCell2007" preSegmentId="0" preFractionAlong="0.5" postSegmentId="0" postFractionAlong="0.5"/>
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</projection>
<projection id="IT_L5A_IT_L4" presynapticPopulation="IT_L5A" postsynapticPopulation="IT_L4" synapse="AMPA_syn">
<connection id="0" preCellId="../IT_L5A/0/IzhikevichCell2007" postCellId="../IT_L4/5/IzhikevichCell2007" preSegmentId="0" preFractionAlong="0.5" postSegmentId="0" postFractionAlong="0.5"/>
<connection id="1" preCellId="../IT_L5A/1/IzhikevichCell2007" postCellId="../IT_L4/18/IzhikevichCell2007" preSegmentId="0" preFractionAlong="0.5" postSegmentId="0" postFractionAlong="0.5"/>
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</projection>
<projection id="IT_L5A_IT_L5B" presynapticPopulation="IT_L5A" postsynapticPopulation="IT_L5B" synapse="AMPA_syn">
<connection id="0" preCellId="../IT_L5A/0/IzhikevichCell2007" postCellId="../IT_L5B/25/IzhikevichCell2007" preSegmentId="0" preFractionAlong="0.5" postSegmentId="0" postFractionAlong="0.5"/>
<connection id="1" preCellId="../IT_L5A/0/IzhikevichCell2007" postCellId="../IT_L5B/4/IzhikevichCell2007" preSegmentId="0" preFractionAlong="0.5" postSegmentId="0" postFractionAlong="0.5"/>
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</projection>
<projection id="IT_L6_CT_L6" presynapticPopulation="IT_L6" postsynapticPopulation="CT_L6" synapse="AMPA_syn">
<connection id="0" preCellId="../IT_L6/1/IzhikevichCell2007" postCellId="../CT_L6/10/IzhikevichCell2007" preSegmentId="0" preFractionAlong="0.5" postSegmentId="0" postFractionAlong="0.5"/>
<connection id="1" preCellId="../IT_L6/1/IzhikevichCell2007" postCellId="../CT_L6/7/IzhikevichCell2007" preSegmentId="0" preFractionAlong="0.5" postSegmentId="0" postFractionAlong="0.5"/>
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</projection>
<projection id="SOM_L5_SOM_L5" presynapticPopulation="SOM_L5" postsynapticPopulation="SOM_L5" synapse="GABA_syn">
<connection id="0" preCellId="../SOM_L5/11/IzhikevichCell2007" postCellId="../SOM_L5/19/IzhikevichCell2007" preSegmentId="0" preFractionAlong="0.5" postSegmentId="0" postFractionAlong="0.5"/>
</projection>
<projection id="IT_L4_IT_L5A" presynapticPopulation="IT_L4" postsynapticPopulation="IT_L5A" synapse="AMPA_syn">
<connection id="0" preCellId="../IT_L4/0/IzhikevichCell2007" postCellId="../IT_L5A/44/IzhikevichCell2007" preSegmentId="0" preFractionAlong="0.5" postSegmentId="0" postFractionAlong="0.5"/>
<connection id="1" preCellId="../IT_L4/1/IzhikevichCell2007" postCellId="../IT_L5A/29/IzhikevichCell2007" preSegmentId="0" preFractionAlong="0.5" postSegmentId="0" postFractionAlong="0.5"/>
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</projection>
<projection id="PT_L5B_IT_L6" presynapticPopulation="PT_L5B" postsynapticPopulation="IT_L6" synapse="AMPA_syn">
<connection id="0" preCellId="../PT_L5B/0/IzhikevichCell2007" postCellId="../IT_L6/26/IzhikevichCell2007" preSegmentId="0" preFractionAlong="0.5" postSegmentId="0" postFractionAlong="0.5"/>
<connection id="1" preCellId="../PT_L5B/0/IzhikevichCell2007" postCellId="../IT_L6/19/IzhikevichCell2007" preSegmentId="0" preFractionAlong="0.5" postSegmentId="0" postFractionAlong="0.5"/>
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</projection>
<projection id="PV_L5_PT_L5B" presynapticPopulation="PV_L5" postsynapticPopulation="PT_L5B" synapse="GABAA">
<connection id="0" preCellId="../PV_L5/0/IzhikevichCell2007" postCellId="../PT_L5B/31/IzhikevichCell2007" preSegmentId="0" preFractionAlong="0.5" postSegmentId="0" postFractionAlong="0.5"/>
<connection id="1" preCellId="../PV_L5/0/IzhikevichCell2007" postCellId="../PT_L5B/49/IzhikevichCell2007" preSegmentId="0" preFractionAlong="0.5" postSegmentId="0" postFractionAlong="0.5"/>
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</projection>
<projection id="SOM_L23_PV_L23" presynapticPopulation="SOM_L23" postsynapticPopulation="PV_L23" synapse="GABAA">
<connection id="0" preCellId="../SOM_L23/2/IzhikevichCell2007" postCellId="../PV_L23/3/IzhikevichCell2007" preSegmentId="0" preFractionAlong="0.5" postSegmentId="0" postFractionAlong="0.5"/>
<connection id="1" preCellId="../SOM_L23/3/IzhikevichCell2007" postCellId="../PV_L23/0/IzhikevichCell2007" preSegmentId="0" preFractionAlong="0.5" postSegmentId="0" postFractionAlong="0.5"/>
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</projection>
<projection id="SOM_L23_SOM_L23" presynapticPopulation="SOM_L23" postsynapticPopulation="SOM_L23" synapse="GABA_syn">
<connection id="0" preCellId="../SOM_L23/2/IzhikevichCell2007" postCellId="../SOM_L23/9/IzhikevichCell2007" preSegmentId="0" preFractionAlong="0.5" postSegmentId="0" postFractionAlong="0.5"/>
<connection id="1" preCellId="../SOM_L23/2/IzhikevichCell2007" postCellId="../SOM_L23/7/IzhikevichCell2007" preSegmentId="0" preFractionAlong="0.5" postSegmentId="0" postFractionAlong="0.5"/>
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</projection>
<projection id="CT_L6_IT_L6" presynapticPopulation="CT_L6" postsynapticPopulation="IT_L6" synapse="AMPA_syn">
<connection id="0" preCellId="../CT_L6/0/IzhikevichCell2007" postCellId="../IT_L6/8/IzhikevichCell2007" preSegmentId="0" preFractionAlong="0.5" postSegmentId="0" postFractionAlong="0.5"/>
<connection id="1" preCellId="../CT_L6/0/IzhikevichCell2007" postCellId="../IT_L6/10/IzhikevichCell2007" preSegmentId="0" preFractionAlong="0.5" postSegmentId="0" postFractionAlong="0.5"/>
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</projection>
<projection id="IT_L5B_CT_L6" presynapticPopulation="IT_L5B" postsynapticPopulation="CT_L6" synapse="AMPA_syn">
<connection id="0" preCellId="../IT_L5B/0/IzhikevichCell2007" postCellId="../CT_L6/26/IzhikevichCell2007" preSegmentId="0" preFractionAlong="0.5" postSegmentId="0" postFractionAlong="0.5"/>
<connection id="1" preCellId="../IT_L5B/0/IzhikevichCell2007" postCellId="../CT_L6/20/IzhikevichCell2007" preSegmentId="0" preFractionAlong="0.5" postSegmentId="0" postFractionAlong="0.5"/>
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</projection>
<projection id="IT_L5A_IT_L5A" presynapticPopulation="IT_L5A" postsynapticPopulation="IT_L5A" synapse="AMPA_syn">
<connection id="0" preCellId="../IT_L5A/0/IzhikevichCell2007" postCellId="../IT_L5A/7/IzhikevichCell2007" preSegmentId="0" preFractionAlong="0.5" postSegmentId="0" postFractionAlong="0.5"/>
<connection id="1" preCellId="../IT_L5A/0/IzhikevichCell2007" postCellId="../IT_L5A/48/IzhikevichCell2007" preSegmentId="0" preFractionAlong="0.5" postSegmentId="0" postFractionAlong="0.5"/>
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</projection>
<projection id="PV_L6_IT_L6" presynapticPopulation="PV_L6" postsynapticPopulation="IT_L6" synapse="GABAA">
<connection id="0" preCellId="../PV_L6/0/IzhikevichCell2007" postCellId="../IT_L6/30/IzhikevichCell2007" preSegmentId="0" preFractionAlong="0.5" postSegmentId="0" postFractionAlong="0.5"/>
<connection id="1" preCellId="../PV_L6/0/IzhikevichCell2007" postCellId="../IT_L6/16/IzhikevichCell2007" preSegmentId="0" preFractionAlong="0.5" postSegmentId="0" postFractionAlong="0.5"/>
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</projection>
<projection id="SOM_L6_IT_L5B" presynapticPopulation="SOM_L6" postsynapticPopulation="IT_L5B" synapse="GABA_syn">
<connection id="0" preCellId="../SOM_L6/0/IzhikevichCell2007" postCellId="../IT_L5B/30/IzhikevichCell2007" preSegmentId="0" preFractionAlong="0.5" postSegmentId="0" postFractionAlong="0.5"/>
<connection id="1" preCellId="../SOM_L6/0/IzhikevichCell2007" postCellId="../IT_L5B/23/IzhikevichCell2007" preSegmentId="0" preFractionAlong="0.5" postSegmentId="0" postFractionAlong="0.5"/>
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</projection>
<projection id="SOM_L23_IT_L4" presynapticPopulation="SOM_L23" postsynapticPopulation="IT_L4" synapse="GABA_syn">
<connection id="0" preCellId="../SOM_L23/1/IzhikevichCell2007" postCellId="../IT_L4/32/IzhikevichCell2007" preSegmentId="0" preFractionAlong="0.5" postSegmentId="0" postFractionAlong="0.5"/>
<connection id="1" preCellId="../SOM_L23/2/IzhikevichCell2007" postCellId="../IT_L4/21/IzhikevichCell2007" preSegmentId="0" preFractionAlong="0.5" postSegmentId="0" postFractionAlong="0.5"/>
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</projection>
<projection id="PV_L23_PT_L5B" presynapticPopulation="PV_L23" postsynapticPopulation="PT_L5B" synapse="GABAA">
<connection id="0" preCellId="../PV_L23/0/IzhikevichCell2007" postCellId="../PT_L5B/16/IzhikevichCell2007" preSegmentId="0" preFractionAlong="0.5" postSegmentId="0" postFractionAlong="0.5"/>
<connection id="1" preCellId="../PV_L23/0/IzhikevichCell2007" postCellId="../PT_L5B/58/IzhikevichCell2007" preSegmentId="0" preFractionAlong="0.5" postSegmentId="0" postFractionAlong="0.5"/>
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</projection>
<projection id="PV_L5_IT_L5A" presynapticPopulation="PV_L5" postsynapticPopulation="IT_L5A" synapse="GABAA">
<connection id="0" preCellId="../PV_L5/0/IzhikevichCell2007" postCellId="../IT_L5A/7/IzhikevichCell2007" preSegmentId="0" preFractionAlong="0.5" postSegmentId="0" postFractionAlong="0.5"/>
<connection id="1" preCellId="../PV_L5/0/IzhikevichCell2007" postCellId="../IT_L5A/0/IzhikevichCell2007" preSegmentId="0" preFractionAlong="0.5" postSegmentId="0" postFractionAlong="0.5"/>
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</projection>
<projection id="IT_L6_IT_L6" presynapticPopulation="IT_L6" postsynapticPopulation="IT_L6" synapse="AMPA_syn">
<connection id="0" preCellId="../IT_L6/1/IzhikevichCell2007" postCellId="../IT_L6/16/IzhikevichCell2007" preSegmentId="0" preFractionAlong="0.5" postSegmentId="0" postFractionAlong="0.5"/>
<connection id="1" preCellId="../IT_L6/2/IzhikevichCell2007" postCellId="../IT_L6/18/IzhikevichCell2007" preSegmentId="0" preFractionAlong="0.5" postSegmentId="0" postFractionAlong="0.5"/>
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</projection>
<projection id="IT_L5A_CT_L6" presynapticPopulation="IT_L5A" postsynapticPopulation="CT_L6" synapse="AMPA_syn">
<connection id="0" preCellId="../IT_L5A/0/IzhikevichCell2007" postCellId="../CT_L6/20/IzhikevichCell2007" preSegmentId="0" preFractionAlong="0.5" postSegmentId="0" postFractionAlong="0.5"/>
<connection id="1" preCellId="../IT_L5A/0/IzhikevichCell2007" postCellId="../CT_L6/49/IzhikevichCell2007" preSegmentId="0" preFractionAlong="0.5" postSegmentId="0" postFractionAlong="0.5"/>
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</projection>
<projection id="IT_L6_IT_L5A" presynapticPopulation="IT_L6" postsynapticPopulation="IT_L5A" synapse="AMPA_syn">
<connection id="0" preCellId="../IT_L6/0/IzhikevichCell2007" postCellId="../IT_L5A/11/IzhikevichCell2007" preSegmentId="0" preFractionAlong="0.5" postSegmentId="0" postFractionAlong="0.5"/>
<connection id="1" preCellId="../IT_L6/1/IzhikevichCell2007" postCellId="../IT_L5A/31/IzhikevichCell2007" preSegmentId="0" preFractionAlong="0.5" postSegmentId="0" postFractionAlong="0.5"/>
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</projection>
<projection id="IT_L23_PT_L5B" presynapticPopulation="IT_L23" postsynapticPopulation="PT_L5B" synapse="AMPA_syn">
<connection id="0" preCellId="../IT_L23/0/IzhikevichCell2007" postCellId="../PT_L5B/10/IzhikevichCell2007" preSegmentId="0" preFractionAlong="0.5" postSegmentId="0" postFractionAlong="0.5"/>
<connection id="1" preCellId="../IT_L23/1/IzhikevichCell2007" postCellId="../PT_L5B/44/IzhikevichCell2007" preSegmentId="0" preFractionAlong="0.5" postSegmentId="0" postFractionAlong="0.5"/>
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</projection>
<projection id="PV_L5_IT_L6" presynapticPopulation="PV_L5" postsynapticPopulation="IT_L6" synapse="GABAA">
<connection id="0" preCellId="../PV_L5/1/IzhikevichCell2007" postCellId="../IT_L6/33/IzhikevichCell2007" preSegmentId="0" preFractionAlong="0.5" postSegmentId="0" postFractionAlong="0.5"/>
<connection id="1" preCellId="../PV_L5/1/IzhikevichCell2007" postCellId="../IT_L6/34/IzhikevichCell2007" preSegmentId="0" preFractionAlong="0.5" postSegmentId="0" postFractionAlong="0.5"/>
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</projection>
<projection id="SOM_L6_CT_L6" presynapticPopulation="SOM_L6" postsynapticPopulation="CT_L6" synapse="GABA_syn">
<connection id="0" preCellId="../SOM_L6/0/IzhikevichCell2007" postCellId="../CT_L6/7/IzhikevichCell2007" preSegmentId="0" preFractionAlong="0.5" postSegmentId="0" postFractionAlong="0.5"/>
<connection id="1" preCellId="../SOM_L6/0/IzhikevichCell2007" postCellId="../CT_L6/17/IzhikevichCell2007" preSegmentId="0" preFractionAlong="0.5" postSegmentId="0" postFractionAlong="0.5"/>
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</projection>
<projection id="IT_L6_IT_L4" presynapticPopulation="IT_L6" postsynapticPopulation="IT_L4" synapse="AMPA_syn">
<connection id="0" preCellId="../IT_L6/0/IzhikevichCell2007" postCellId="../IT_L4/30/IzhikevichCell2007" preSegmentId="0" preFractionAlong="0.5" postSegmentId="0" postFractionAlong="0.5"/>
<connection id="1" preCellId="../IT_L6/1/IzhikevichCell2007" postCellId="../IT_L4/4/IzhikevichCell2007" preSegmentId="0" preFractionAlong="0.5" postSegmentId="0" postFractionAlong="0.5"/>
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</projection>
<projection id="PV_L6_PT_L5B" presynapticPopulation="PV_L6" postsynapticPopulation="PT_L5B" synapse="GABAA">
<connection id="0" preCellId="../PV_L6/0/IzhikevichCell2007" postCellId="../PT_L5B/24/IzhikevichCell2007" preSegmentId="0" preFractionAlong="0.5" postSegmentId="0" postFractionAlong="0.5"/>
<connection id="1" preCellId="../PV_L6/0/IzhikevichCell2007" postCellId="../PT_L5B/14/IzhikevichCell2007" preSegmentId="0" preFractionAlong="0.5" postSegmentId="0" postFractionAlong="0.5"/>
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</projection>
<projection id="IT_L5B_PT_L5B" presynapticPopulation="IT_L5B" postsynapticPopulation="PT_L5B" synapse="AMPA_syn">
<connection id="0" preCellId="../IT_L5B/0/IzhikevichCell2007" postCellId="../PT_L5B/31/IzhikevichCell2007" preSegmentId="0" preFractionAlong="0.5" postSegmentId="0" postFractionAlong="0.5"/>
<connection id="1" preCellId="../IT_L5B/0/IzhikevichCell2007" postCellId="../PT_L5B/23/IzhikevichCell2007" preSegmentId="0" preFractionAlong="0.5" postSegmentId="0" postFractionAlong="0.5"/>
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</projection>
<projection id="PV_L23_SOM_L23" presynapticPopulation="PV_L23" postsynapticPopulation="SOM_L23" synapse="GABA_syn">
<connection id="0" preCellId="../PV_L23/3/IzhikevichCell2007" postCellId="../SOM_L23/0/IzhikevichCell2007" preSegmentId="0" preFractionAlong="0.5" postSegmentId="0" postFractionAlong="0.5"/>
<connection id="1" preCellId="../PV_L23/4/IzhikevichCell2007" postCellId="../SOM_L23/9/IzhikevichCell2007" preSegmentId="0" preFractionAlong="0.5" postSegmentId="0" postFractionAlong="0.5"/>
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</projection>
<projection id="IT_L4_IT_L6" presynapticPopulation="IT_L4" postsynapticPopulation="IT_L6" synapse="AMPA_syn">
<connection id="0" preCellId="../IT_L4/0/IzhikevichCell2007" postCellId="../IT_L6/18/IzhikevichCell2007" preSegmentId="0" preFractionAlong="0.5" postSegmentId="0" postFractionAlong="0.5"/>
<connection id="1" preCellId="../IT_L4/3/IzhikevichCell2007" postCellId="../IT_L6/12/IzhikevichCell2007" preSegmentId="0" preFractionAlong="0.5" postSegmentId="0" postFractionAlong="0.5"/>
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</projection>
<projection id="IT_L4_PV_L5" presynapticPopulation="IT_L4" postsynapticPopulation="PV_L5" synapse="GABAA">
<connection id="0" preCellId="../IT_L4/7/IzhikevichCell2007" postCellId="../PV_L5/0/IzhikevichCell2007" preSegmentId="0" preFractionAlong="0.5" postSegmentId="0" postFractionAlong="0.5"/>
<connection id="1" preCellId="../IT_L4/13/IzhikevichCell2007" postCellId="../PV_L5/26/IzhikevichCell2007" preSegmentId="0" preFractionAlong="0.5" postSegmentId="0" postFractionAlong="0.5"/>
<connection id="2" preCellId="../IT_L4/41/IzhikevichCell2007" postCellId="../PV_L5/26/IzhikevichCell2007" preSegmentId="0" preFractionAlong="0.5" postSegmentId="0" postFractionAlong="0.5"/>
<connection id="3" preCellId="../IT_L4/43/IzhikevichCell2007" postCellId="../PV_L5/21/IzhikevichCell2007" preSegmentId="0" preFractionAlong="0.5" postSegmentId="0" postFractionAlong="0.5"/>
</projection>
<projection id="IT_L23_IT_L23" presynapticPopulation="IT_L23" postsynapticPopulation="IT_L23" synapse="AMPA_syn">
<connection id="0" preCellId="../IT_L23/0/IzhikevichCell2007" postCellId="../IT_L23/47/IzhikevichCell2007" preSegmentId="0" preFractionAlong="0.5" postSegmentId="0" postFractionAlong="0.5"/>
<connection id="1" preCellId="../IT_L23/0/IzhikevichCell2007" postCellId="../IT_L23/17/IzhikevichCell2007" preSegmentId="0" preFractionAlong="0.5" postSegmentId="0" postFractionAlong="0.5"/>
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</projection>
<projection id="SOM_L6_IT_L5A" presynapticPopulation="SOM_L6" postsynapticPopulation="IT_L5A" synapse="GABA_syn">
<connection id="0" preCellId="../SOM_L6/0/IzhikevichCell2007" postCellId="../IT_L5A/6/IzhikevichCell2007" preSegmentId="0" preFractionAlong="0.5" postSegmentId="0" postFractionAlong="0.5"/>
<connection id="1" preCellId="../SOM_L6/2/IzhikevichCell2007" postCellId="../IT_L5A/0/IzhikevichCell2007" preSegmentId="0" preFractionAlong="0.5" postSegmentId="0" postFractionAlong="0.5"/>
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</projection>
<projection id="SOM_L5_IT_L6" presynapticPopulation="SOM_L5" postsynapticPopulation="IT_L6" synapse="GABA_syn">
<connection id="0" preCellId="../SOM_L5/0/IzhikevichCell2007" postCellId="../IT_L6/49/IzhikevichCell2007" preSegmentId="0" preFractionAlong="0.5" postSegmentId="0" postFractionAlong="0.5"/>
<connection id="1" preCellId="../SOM_L5/0/IzhikevichCell2007" postCellId="../IT_L6/9/IzhikevichCell2007" preSegmentId="0" preFractionAlong="0.5" postSegmentId="0" postFractionAlong="0.5"/>
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</projection>
<projection id="IT_L4_CT_L6" presynapticPopulation="IT_L4" postsynapticPopulation="CT_L6" synapse="AMPA_syn">
<connection id="0" preCellId="../IT_L4/3/IzhikevichCell2007" postCellId="../CT_L6/18/IzhikevichCell2007" preSegmentId="0" preFractionAlong="0.5" postSegmentId="0" postFractionAlong="0.5"/>
<connection id="1" preCellId="../IT_L4/4/IzhikevichCell2007" postCellId="../CT_L6/41/IzhikevichCell2007" preSegmentId="0" preFractionAlong="0.5" postSegmentId="0" postFractionAlong="0.5"/>
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</projection>
<projection id="IT_L5B_IT_L6" presynapticPopulation="IT_L5B" postsynapticPopulation="IT_L6" synapse="AMPA_syn">
<connection id="0" preCellId="../IT_L5B/0/IzhikevichCell2007" postCellId="../IT_L6/18/IzhikevichCell2007" preSegmentId="0" preFractionAlong="0.5" postSegmentId="0" postFractionAlong="0.5"/>
<connection id="1" preCellId="../IT_L5B/0/IzhikevichCell2007" postCellId="../IT_L6/2/IzhikevichCell2007" preSegmentId="0" preFractionAlong="0.5" postSegmentId="0" postFractionAlong="0.5"/>
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</projection>
<projection id="SOM_L23_IT_L5B" presynapticPopulation="SOM_L23" postsynapticPopulation="IT_L5B" synapse="GABA_syn">
<connection id="0" preCellId="../SOM_L23/0/IzhikevichCell2007" postCellId="../IT_L5B/23/IzhikevichCell2007" preSegmentId="0" preFractionAlong="0.5" postSegmentId="0" postFractionAlong="0.5"/>
<connection id="1" preCellId="../SOM_L23/0/IzhikevichCell2007" postCellId="../IT_L5B/57/IzhikevichCell2007" preSegmentId="0" preFractionAlong="0.5" postSegmentId="0" postFractionAlong="0.5"/>
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</projection>
<projection id="SOM_L5_IT_L4" presynapticPopulation="SOM_L5" postsynapticPopulation="IT_L4" synapse="GABA_syn">
<connection id="0" preCellId="../SOM_L5/0/IzhikevichCell2007" postCellId="../IT_L4/46/IzhikevichCell2007" preSegmentId="0" preFractionAlong="0.5" postSegmentId="0" postFractionAlong="0.5"/>
<connection id="1" preCellId="../SOM_L5/1/IzhikevichCell2007" postCellId="../IT_L4/19/IzhikevichCell2007" preSegmentId="0" preFractionAlong="0.5" postSegmentId="0" postFractionAlong="0.5"/>
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</projection>
<projection id="IT_L5A_IT_L6" presynapticPopulation="IT_L5A" postsynapticPopulation="IT_L6" synapse="AMPA_syn">
<connection id="0" preCellId="../IT_L5A/0/IzhikevichCell2007" postCellId="../IT_L6/11/IzhikevichCell2007" preSegmentId="0" preFractionAlong="0.5" postSegmentId="0" postFractionAlong="0.5"/>
<connection id="1" preCellId="../IT_L5A/0/IzhikevichCell2007" postCellId="../IT_L6/40/IzhikevichCell2007" preSegmentId="0" preFractionAlong="0.5" postSegmentId="0" postFractionAlong="0.5"/>
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</projection>
<projection id="IT_L4_IT_L23" presynapticPopulation="IT_L4" postsynapticPopulation="IT_L23" synapse="AMPA_syn">
<connection id="0" preCellId="../IT_L4/0/IzhikevichCell2007" postCellId="../IT_L23/12/IzhikevichCell2007" preSegmentId="0" preFractionAlong="0.5" postSegmentId="0" postFractionAlong="0.5"/>
<connection id="1" preCellId="../IT_L4/0/IzhikevichCell2007" postCellId="../IT_L23/1/IzhikevichCell2007" preSegmentId="0" preFractionAlong="0.5" postSegmentId="0" postFractionAlong="0.5"/>
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</projection>
<projection id="IT_L5A_SOM_L5" presynapticPopulation="IT_L5A" postsynapticPopulation="SOM_L5" synapse="GABA_syn">
<connection id="0" preCellId="../IT_L5A/4/IzhikevichCell2007" postCellId="../SOM_L5/1/IzhikevichCell2007" preSegmentId="0" preFractionAlong="0.5" postSegmentId="0" postFractionAlong="0.5"/>
<connection id="1" preCellId="../IT_L5A/10/IzhikevichCell2007" postCellId="../SOM_L5/20/IzhikevichCell2007" preSegmentId="0" preFractionAlong="0.5" postSegmentId="0" postFractionAlong="0.5"/>
<connection id="2" preCellId="../IT_L5A/20/IzhikevichCell2007" postCellId="../SOM_L5/3/IzhikevichCell2007" preSegmentId="0" preFractionAlong="0.5" postSegmentId="0" postFractionAlong="0.5"/>
<connection id="3" preCellId="../IT_L5A/36/IzhikevichCell2007" postCellId="../SOM_L5/0/IzhikevichCell2007" preSegmentId="0" preFractionAlong="0.5" postSegmentId="0" postFractionAlong="0.5"/>
</projection>
<projection id="CT_L6_PT_L5B" presynapticPopulation="CT_L6" postsynapticPopulation="PT_L5B" synapse="AMPA_syn">
<connection id="0" preCellId="../CT_L6/0/IzhikevichCell2007" postCellId="../PT_L5B/56/IzhikevichCell2007" preSegmentId="0" preFractionAlong="0.5" postSegmentId="0" postFractionAlong="0.5"/>
<connection id="1" preCellId="../CT_L6/2/IzhikevichCell2007" postCellId="../PT_L5B/45/IzhikevichCell2007" preSegmentId="0" preFractionAlong="0.5" postSegmentId="0" postFractionAlong="0.5"/>
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</projection>
<projection id="PT_L5B_PT_L5B" presynapticPopulation="PT_L5B" postsynapticPopulation="PT_L5B" synapse="AMPA_syn">
<connection id="0" preCellId="../PT_L5B/0/IzhikevichCell2007" postCellId="../PT_L5B/5/IzhikevichCell2007" preSegmentId="0" preFractionAlong="0.5" postSegmentId="0" postFractionAlong="0.5"/>
<connection id="1" preCellId="../PT_L5B/1/IzhikevichCell2007" postCellId="../PT_L5B/18/IzhikevichCell2007" preSegmentId="0" preFractionAlong="0.5" postSegmentId="0" postFractionAlong="0.5"/>
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</projection>
<projection id="PT_L5B_IT_L5B" presynapticPopulation="PT_L5B" postsynapticPopulation="IT_L5B" synapse="AMPA_syn">
<connection id="0" preCellId="../PT_L5B/1/IzhikevichCell2007" postCellId="../IT_L5B/27/IzhikevichCell2007" preSegmentId="0" preFractionAlong="0.5" postSegmentId="0" postFractionAlong="0.5"/>
<connection id="1" preCellId="../PT_L5B/1/IzhikevichCell2007" postCellId="../IT_L5B/53/IzhikevichCell2007" preSegmentId="0" preFractionAlong="0.5" postSegmentId="0" postFractionAlong="0.5"/>
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</projection>
<projection id="SOM_L23_IT_L5A" presynapticPopulation="SOM_L23" postsynapticPopulation="IT_L5A" synapse="GABA_syn">
<connection id="0" preCellId="../SOM_L23/0/IzhikevichCell2007" postCellId="../IT_L5A/20/IzhikevichCell2007" preSegmentId="0" preFractionAlong="0.5" postSegmentId="0" postFractionAlong="0.5"/>
<connection id="1" preCellId="../SOM_L23/0/IzhikevichCell2007" postCellId="../IT_L5A/31/IzhikevichCell2007" preSegmentId="0" preFractionAlong="0.5" postSegmentId="0" postFractionAlong="0.5"/>
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</projection>
<projection id="PT_L5B_CT_L6" presynapticPopulation="PT_L5B" postsynapticPopulation="CT_L6" synapse="AMPA_syn">
<connection id="0" preCellId="../PT_L5B/0/IzhikevichCell2007" postCellId="../CT_L6/5/IzhikevichCell2007" preSegmentId="0" preFractionAlong="0.5" postSegmentId="0" postFractionAlong="0.5"/>
<connection id="1" preCellId="../PT_L5B/0/IzhikevichCell2007" postCellId="../CT_L6/40/IzhikevichCell2007" preSegmentId="0" preFractionAlong="0.5" postSegmentId="0" postFractionAlong="0.5"/>
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</projection>
<projection id="PT_L5B_SOM_L5" presynapticPopulation="PT_L5B" postsynapticPopulation="SOM_L5" synapse="GABA_syn">
<connection id="0" preCellId="../PT_L5B/0/IzhikevichCell2007" postCellId="../SOM_L5/19/IzhikevichCell2007" preSegmentId="0" preFractionAlong="0.5" postSegmentId="0" postFractionAlong="0.5"/>
<connection id="1" preCellId="../PT_L5B/14/IzhikevichCell2007" postCellId="../SOM_L5/14/IzhikevichCell2007" preSegmentId="0" preFractionAlong="0.5" postSegmentId="0" postFractionAlong="0.5"/>
<connection id="2" preCellId="../PT_L5B/59/IzhikevichCell2007" postCellId="../SOM_L5/0/IzhikevichCell2007" preSegmentId="0" preFractionAlong="0.5" postSegmentId="0" postFractionAlong="0.5"/>
</projection>
<projection id="PV_L5_CT_L6" presynapticPopulation="PV_L5" postsynapticPopulation="CT_L6" synapse="GABAA">
<connection id="0" preCellId="../PV_L5/0/IzhikevichCell2007" postCellId="../CT_L6/38/IzhikevichCell2007" preSegmentId="0" preFractionAlong="0.5" postSegmentId="0" postFractionAlong="0.5"/>
<connection id="1" preCellId="../PV_L5/1/IzhikevichCell2007" postCellId="../CT_L6/21/IzhikevichCell2007" preSegmentId="0" preFractionAlong="0.5" postSegmentId="0" postFractionAlong="0.5"/>
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</projection>
<projection id="IT_L6_PT_L5B" presynapticPopulation="IT_L6" postsynapticPopulation="PT_L5B" synapse="AMPA_syn">
<connection id="0" preCellId="../IT_L6/0/IzhikevichCell2007" postCellId="../PT_L5B/46/IzhikevichCell2007" preSegmentId="0" preFractionAlong="0.5" postSegmentId="0" postFractionAlong="0.5"/>
<connection id="1" preCellId="../IT_L6/0/IzhikevichCell2007" postCellId="../PT_L5B/56/IzhikevichCell2007" preSegmentId="0" preFractionAlong="0.5" postSegmentId="0" postFractionAlong="0.5"/>
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</projection>
<projection id="CT_L6_IT_L5B" presynapticPopulation="CT_L6" postsynapticPopulation="IT_L5B" synapse="AMPA_syn">
<connection id="0" preCellId="../CT_L6/0/IzhikevichCell2007" postCellId="../IT_L5B/47/IzhikevichCell2007" preSegmentId="0" preFractionAlong="0.5" postSegmentId="0" postFractionAlong="0.5"/>
<connection id="1" preCellId="../CT_L6/0/IzhikevichCell2007" postCellId="../IT_L5B/20/IzhikevichCell2007" preSegmentId="0" preFractionAlong="0.5" postSegmentId="0" postFractionAlong="0.5"/>
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</projection>
<projection id="PV_L5_IT_L23" presynapticPopulation="PV_L5" postsynapticPopulation="IT_L23" synapse="GABAA">
<connection id="0" preCellId="../PV_L5/0/IzhikevichCell2007" postCellId="../IT_L23/22/IzhikevichCell2007" preSegmentId="0" preFractionAlong="0.5" postSegmentId="0" postFractionAlong="0.5"/>
<connection id="1" preCellId="../PV_L5/1/IzhikevichCell2007" postCellId="../IT_L23/12/IzhikevichCell2007" preSegmentId="0" preFractionAlong="0.5" postSegmentId="0" postFractionAlong="0.5"/>
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</projection>
<projection id="PV_L23_PV_L23" presynapticPopulation="PV_L23" postsynapticPopulation="PV_L23" synapse="GABAA">
<connection id="0" preCellId="../PV_L23/0/IzhikevichCell2007" postCellId="../PV_L23/10/IzhikevichCell2007" preSegmentId="0" preFractionAlong="0.5" postSegmentId="0" postFractionAlong="0.5"/>
<connection id="1" preCellId="../PV_L23/5/IzhikevichCell2007" postCellId="../PV_L23/4/IzhikevichCell2007" preSegmentId="0" preFractionAlong="0.5" postSegmentId="0" postFractionAlong="0.5"/>
<connection id="2" preCellId="../PV_L23/7/IzhikevichCell2007" postCellId="../PV_L23/3/IzhikevichCell2007" preSegmentId="0" preFractionAlong="0.5" postSegmentId="0" postFractionAlong="0.5"/>
<connection id="3" preCellId="../PV_L23/12/IzhikevichCell2007" postCellId="../PV_L23/7/IzhikevichCell2007" preSegmentId="0" preFractionAlong="0.5" postSegmentId="0" postFractionAlong="0.5"/>
</projection>
<projection id="PV_L6_IT_L5A" presynapticPopulation="PV_L6" postsynapticPopulation="IT_L5A" synapse="GABAA">
<connection id="0" preCellId="../PV_L6/0/IzhikevichCell2007" postCellId="../IT_L5A/22/IzhikevichCell2007" preSegmentId="0" preFractionAlong="0.5" postSegmentId="0" postFractionAlong="0.5"/>
<connection id="1" preCellId="../PV_L6/1/IzhikevichCell2007" postCellId="../IT_L5A/24/IzhikevichCell2007" preSegmentId="0" preFractionAlong="0.5" postSegmentId="0" postFractionAlong="0.5"/>
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</projection>
<projection id="IT_L5B_SOM_L5" presynapticPopulation="IT_L5B" postsynapticPopulation="SOM_L5" synapse="GABA_syn">
<connection id="0" preCellId="../IT_L5B/37/IzhikevichCell2007" postCellId="../SOM_L5/19/IzhikevichCell2007" preSegmentId="0" preFractionAlong="0.5" postSegmentId="0" postFractionAlong="0.5"/>
</projection>
<projection id="SOM_L6_IT_L4" presynapticPopulation="SOM_L6" postsynapticPopulation="IT_L4" synapse="GABA_syn">
<connection id="0" preCellId="../SOM_L6/1/IzhikevichCell2007" postCellId="../IT_L4/8/IzhikevichCell2007" preSegmentId="0" preFractionAlong="0.5" postSegmentId="0" postFractionAlong="0.5"/>
<connection id="1" preCellId="../SOM_L6/2/IzhikevichCell2007" postCellId="../IT_L4/27/IzhikevichCell2007" preSegmentId="0" preFractionAlong="0.5" postSegmentId="0" postFractionAlong="0.5"/>
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</projection>
<projection id="IT_L4_PT_L5B" presynapticPopulation="IT_L4" postsynapticPopulation="PT_L5B" synapse="AMPA_syn">
<connection id="0" preCellId="../IT_L4/1/IzhikevichCell2007" postCellId="../PT_L5B/7/IzhikevichCell2007" preSegmentId="0" preFractionAlong="0.5" postSegmentId="0" postFractionAlong="0.5"/>
<connection id="1" preCellId="../IT_L4/1/IzhikevichCell2007" postCellId="../PT_L5B/51/IzhikevichCell2007" preSegmentId="0" preFractionAlong="0.5" postSegmentId="0" postFractionAlong="0.5"/>
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</projection>
<projection id="PT_L5B_PV_L5" presynapticPopulation="PT_L5B" postsynapticPopulation="PV_L5" synapse="GABAA">
<connection id="0" preCellId="../PT_L5B/29/IzhikevichCell2007" postCellId="../PV_L5/14/IzhikevichCell2007" preSegmentId="0" preFractionAlong="0.5" postSegmentId="0" postFractionAlong="0.5"/>
<connection id="1" preCellId="../PT_L5B/36/IzhikevichCell2007" postCellId="../PV_L5/6/IzhikevichCell2007" preSegmentId="0" preFractionAlong="0.5" postSegmentId="0" postFractionAlong="0.5"/>
<connection id="2" preCellId="../PT_L5B/41/IzhikevichCell2007" postCellId="../PV_L5/19/IzhikevichCell2007" preSegmentId="0" preFractionAlong="0.5" postSegmentId="0" postFractionAlong="0.5"/>
</projection>
<projection id="CT_L6_IT_L5A" presynapticPopulation="CT_L6" postsynapticPopulation="IT_L5A" synapse="AMPA_syn">
<connection id="0" preCellId="../CT_L6/2/IzhikevichCell2007" postCellId="../IT_L5A/36/IzhikevichCell2007" preSegmentId="0" preFractionAlong="0.5" postSegmentId="0" postFractionAlong="0.5"/>
<connection id="1" preCellId="../CT_L6/2/IzhikevichCell2007" postCellId="../IT_L5A/51/IzhikevichCell2007" preSegmentId="0" preFractionAlong="0.5" postSegmentId="0" postFractionAlong="0.5"/>
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</projection>
<projection id="CT_L6_CT_L6" presynapticPopulation="CT_L6" postsynapticPopulation="CT_L6" synapse="AMPA_syn">
<connection id="0" preCellId="../CT_L6/0/IzhikevichCell2007" postCellId="../CT_L6/20/IzhikevichCell2007" preSegmentId="0" preFractionAlong="0.5" postSegmentId="0" postFractionAlong="0.5"/>
<connection id="1" preCellId="../CT_L6/0/IzhikevichCell2007" postCellId="../CT_L6/9/IzhikevichCell2007" preSegmentId="0" preFractionAlong="0.5" postSegmentId="0" postFractionAlong="0.5"/>
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</projection>
<projection id="IT_L4_IT_L5B" presynapticPopulation="IT_L4" postsynapticPopulation="IT_L5B" synapse="AMPA_syn">
<connection id="0" preCellId="../IT_L4/0/IzhikevichCell2007" postCellId="../IT_L5B/24/IzhikevichCell2007" preSegmentId="0" preFractionAlong="0.5" postSegmentId="0" postFractionAlong="0.5"/>
<connection id="1" preCellId="../IT_L4/0/IzhikevichCell2007" postCellId="../IT_L5B/17/IzhikevichCell2007" preSegmentId="0" preFractionAlong="0.5" postSegmentId="0" postFractionAlong="0.5"/>
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</projection>
<projection id="PV_L23_IT_L5A" presynapticPopulation="PV_L23" postsynapticPopulation="IT_L5A" synapse="GABAA">
<connection id="0" preCellId="../PV_L23/1/IzhikevichCell2007" postCellId="../IT_L5A/26/IzhikevichCell2007" preSegmentId="0" preFractionAlong="0.5" postSegmentId="0" postFractionAlong="0.5"/>
<connection id="1" preCellId="../PV_L23/2/IzhikevichCell2007" postCellId="../IT_L5A/33/IzhikevichCell2007" preSegmentId="0" preFractionAlong="0.5" postSegmentId="0" postFractionAlong="0.5"/>
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</projection>
<projection id="SOM_L23_IT_L23" presynapticPopulation="SOM_L23" postsynapticPopulation="IT_L23" synapse="GABA_syn">
<connection id="0" preCellId="../SOM_L23/0/IzhikevichCell2007" postCellId="../IT_L23/70/IzhikevichCell2007" preSegmentId="0" preFractionAlong="0.5" postSegmentId="0" postFractionAlong="0.5"/>
<connection id="1" preCellId="../SOM_L23/0/IzhikevichCell2007" postCellId="../IT_L23/59/IzhikevichCell2007" preSegmentId="0" preFractionAlong="0.5" postSegmentId="0" postFractionAlong="0.5"/>
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</projection>
<projection id="CT_L6_IT_L4" presynapticPopulation="CT_L6" postsynapticPopulation="IT_L4" synapse="AMPA_syn">
<connection id="0" preCellId="../CT_L6/10/IzhikevichCell2007" postCellId="../IT_L4/42/IzhikevichCell2007" preSegmentId="0" preFractionAlong="0.5" postSegmentId="0" postFractionAlong="0.5"/>
</projection>
<projection id="PT_L5B_IT_L23" presynapticPopulation="PT_L5B" postsynapticPopulation="IT_L23" synapse="AMPA_syn">
<connection id="0" preCellId="../PT_L5B/0/IzhikevichCell2007" postCellId="../IT_L23/13/IzhikevichCell2007" preSegmentId="0" preFractionAlong="0.5" postSegmentId="0" postFractionAlong="0.5"/>
<connection id="1" preCellId="../PT_L5B/0/IzhikevichCell2007" postCellId="../IT_L23/71/IzhikevichCell2007" preSegmentId="0" preFractionAlong="0.5" postSegmentId="0" postFractionAlong="0.5"/>
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</projection>
<projection id="CT_L6_IT_L23" presynapticPopulation="CT_L6" postsynapticPopulation="IT_L23" synapse="AMPA_syn">
<connection id="0" preCellId="../CT_L6/19/IzhikevichCell2007" postCellId="../IT_L23/67/IzhikevichCell2007" preSegmentId="0" preFractionAlong="0.5" postSegmentId="0" postFractionAlong="0.5"/>
</projection>
<projection id="SOM_L5_IT_L5A" presynapticPopulation="SOM_L5" postsynapticPopulation="IT_L5A" synapse="GABA_syn">
<connection id="0" preCellId="../SOM_L5/0/IzhikevichCell2007" postCellId="../IT_L5A/2/IzhikevichCell2007" preSegmentId="0" preFractionAlong="0.5" postSegmentId="0" postFractionAlong="0.5"/>
<connection id="1" preCellId="../SOM_L5/0/IzhikevichCell2007" postCellId="../IT_L5A/6/IzhikevichCell2007" preSegmentId="0" preFractionAlong="0.5" postSegmentId="0" postFractionAlong="0.5"/>
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</projection>
<projection id="SOM_L5_PT_L5B" presynapticPopulation="SOM_L5" postsynapticPopulation="PT_L5B" synapse="GABA_syn">
<connection id="0" preCellId="../SOM_L5/0/IzhikevichCell2007" postCellId="../PT_L5B/31/IzhikevichCell2007" preSegmentId="0" preFractionAlong="0.5" postSegmentId="0" postFractionAlong="0.5"/>
<connection id="1" preCellId="../SOM_L5/0/IzhikevichCell2007" postCellId="../PT_L5B/55/IzhikevichCell2007" preSegmentId="0" preFractionAlong="0.5" postSegmentId="0" postFractionAlong="0.5"/>
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</projection>
<projection id="IT_L4_SOM_L5" presynapticPopulation="IT_L4" postsynapticPopulation="SOM_L5" synapse="GABA_syn">
<connection id="0" preCellId="../IT_L4/11/IzhikevichCell2007" postCellId="../SOM_L5/19/IzhikevichCell2007" preSegmentId="0" preFractionAlong="0.5" postSegmentId="0" postFractionAlong="0.5"/>
<connection id="1" preCellId="../IT_L4/23/IzhikevichCell2007" postCellId="../SOM_L5/19/IzhikevichCell2007" preSegmentId="0" preFractionAlong="0.5" postSegmentId="0" postFractionAlong="0.5"/>
</projection>
<projection id="PT_L5B_IT_L4" presynapticPopulation="PT_L5B" postsynapticPopulation="IT_L4" synapse="AMPA_syn">
<connection id="0" preCellId="../PT_L5B/0/IzhikevichCell2007" postCellId="../IT_L4/5/IzhikevichCell2007" preSegmentId="0" preFractionAlong="0.5" postSegmentId="0" postFractionAlong="0.5"/>
<connection id="1" preCellId="../PT_L5B/2/IzhikevichCell2007" postCellId="../IT_L4/40/IzhikevichCell2007" preSegmentId="0" preFractionAlong="0.5" postSegmentId="0" postFractionAlong="0.5"/>
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</projection>
<projection id="IT_L5B_IT_L23" presynapticPopulation="IT_L5B" postsynapticPopulation="IT_L23" synapse="AMPA_syn">
<connection id="0" preCellId="../IT_L5B/0/IzhikevichCell2007" postCellId="../IT_L23/48/IzhikevichCell2007" preSegmentId="0" preFractionAlong="0.5" postSegmentId="0" postFractionAlong="0.5"/>
<connection id="1" preCellId="../IT_L5B/0/IzhikevichCell2007" postCellId="../IT_L23/27/IzhikevichCell2007" preSegmentId="0" preFractionAlong="0.5" postSegmentId="0" postFractionAlong="0.5"/>
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</projection>
<projection id="IT_L5A_PT_L5B" presynapticPopulation="IT_L5A" postsynapticPopulation="PT_L5B" synapse="AMPA_syn">
<connection id="0" preCellId="../IT_L5A/0/IzhikevichCell2007" postCellId="../PT_L5B/54/IzhikevichCell2007" preSegmentId="0" preFractionAlong="0.5" postSegmentId="0" postFractionAlong="0.5"/>
<connection id="1" preCellId="../IT_L5A/0/IzhikevichCell2007" postCellId="../PT_L5B/58/IzhikevichCell2007" preSegmentId="0" preFractionAlong="0.5" postSegmentId="0" postFractionAlong="0.5"/>
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</projection>
<projection id="PV_L6_IT_L4" presynapticPopulation="PV_L6" postsynapticPopulation="IT_L4" synapse="GABAA">
<connection id="0" preCellId="../PV_L6/0/IzhikevichCell2007" postCellId="../IT_L4/21/IzhikevichCell2007" preSegmentId="0" preFractionAlong="0.5" postSegmentId="0" postFractionAlong="0.5"/>
<connection id="1" preCellId="../PV_L6/1/IzhikevichCell2007" postCellId="../IT_L4/12/IzhikevichCell2007" preSegmentId="0" preFractionAlong="0.5" postSegmentId="0" postFractionAlong="0.5"/>
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</projection>
<projection id="IT_L5B_PV_L5" presynapticPopulation="IT_L5B" postsynapticPopulation="PV_L5" synapse="GABAA">
<connection id="0" preCellId="../IT_L5B/14/IzhikevichCell2007" postCellId="../PV_L5/19/IzhikevichCell2007" preSegmentId="0" preFractionAlong="0.5" postSegmentId="0" postFractionAlong="0.5"/>
<connection id="1" preCellId="../IT_L5B/34/IzhikevichCell2007" postCellId="../PV_L5/0/IzhikevichCell2007" preSegmentId="0" preFractionAlong="0.5" postSegmentId="0" postFractionAlong="0.5"/>
<connection id="2" preCellId="../IT_L5B/34/IzhikevichCell2007" postCellId="../PV_L5/6/IzhikevichCell2007" preSegmentId="0" preFractionAlong="0.5" postSegmentId="0" postFractionAlong="0.5"/>
<connection id="3" preCellId="../IT_L5B/57/IzhikevichCell2007" postCellId="../PV_L5/16/IzhikevichCell2007" preSegmentId="0" preFractionAlong="0.5" postSegmentId="0" postFractionAlong="0.5"/>
</projection>
<projection id="PV_L23_IT_L4" presynapticPopulation="PV_L23" postsynapticPopulation="IT_L4" synapse="GABAA">
<connection id="0" preCellId="../PV_L23/2/IzhikevichCell2007" postCellId="../IT_L4/20/IzhikevichCell2007" preSegmentId="0" preFractionAlong="0.5" postSegmentId="0" postFractionAlong="0.5"/>
<connection id="1" preCellId="../PV_L23/2/IzhikevichCell2007" postCellId="../IT_L4/3/IzhikevichCell2007" preSegmentId="0" preFractionAlong="0.5" postSegmentId="0" postFractionAlong="0.5"/>
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</projection>
<projection id="PV_L5_PV_L5" presynapticPopulation="PV_L5" postsynapticPopulation="PV_L5" synapse="GABAA">
<connection id="0" preCellId="../PV_L5/0/IzhikevichCell2007" postCellId="../PV_L5/20/IzhikevichCell2007" preSegmentId="0" preFractionAlong="0.5" postSegmentId="0" postFractionAlong="0.5"/>
<connection id="1" preCellId="../PV_L5/15/IzhikevichCell2007" postCellId="../PV_L5/14/IzhikevichCell2007" preSegmentId="0" preFractionAlong="0.5" postSegmentId="0" postFractionAlong="0.5"/>
<connection id="2" preCellId="../PV_L5/22/IzhikevichCell2007" postCellId="../PV_L5/26/IzhikevichCell2007" preSegmentId="0" preFractionAlong="0.5" postSegmentId="0" postFractionAlong="0.5"/>
</projection>
<projection id="SOM_L23_PT_L5B" presynapticPopulation="SOM_L23" postsynapticPopulation="PT_L5B" synapse="GABA_syn">
<connection id="0" preCellId="../SOM_L23/0/IzhikevichCell2007" postCellId="../PT_L5B/46/IzhikevichCell2007" preSegmentId="0" preFractionAlong="0.5" postSegmentId="0" postFractionAlong="0.5"/>
<connection id="1" preCellId="../SOM_L23/3/IzhikevichCell2007" postCellId="../PT_L5B/31/IzhikevichCell2007" preSegmentId="0" preFractionAlong="0.5" postSegmentId="0" postFractionAlong="0.5"/>
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</projection>
<projection id="IT_L5A_PV_L5" presynapticPopulation="IT_L5A" postsynapticPopulation="PV_L5" synapse="GABAA">
<connection id="0" preCellId="../IT_L5A/38/IzhikevichCell2007" postCellId="../PV_L5/19/IzhikevichCell2007" preSegmentId="0" preFractionAlong="0.5" postSegmentId="0" postFractionAlong="0.5"/>
<connection id="1" preCellId="../IT_L5A/40/IzhikevichCell2007" postCellId="../PV_L5/17/IzhikevichCell2007" preSegmentId="0" preFractionAlong="0.5" postSegmentId="0" postFractionAlong="0.5"/>
<connection id="2" preCellId="../IT_L5A/52/IzhikevichCell2007" postCellId="../PV_L5/25/IzhikevichCell2007" preSegmentId="0" preFractionAlong="0.5" postSegmentId="0" postFractionAlong="0.5"/>
</projection>
<projection id="PV_L23_IT_L5B" presynapticPopulation="PV_L23" postsynapticPopulation="IT_L5B" synapse="GABAA">
<connection id="0" preCellId="../PV_L23/0/IzhikevichCell2007" postCellId="../IT_L5B/10/IzhikevichCell2007" preSegmentId="0" preFractionAlong="0.5" postSegmentId="0" postFractionAlong="0.5"/>
<connection id="1" preCellId="../PV_L23/1/IzhikevichCell2007" postCellId="../IT_L5B/39/IzhikevichCell2007" preSegmentId="0" preFractionAlong="0.5" postSegmentId="0" postFractionAlong="0.5"/>
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</projection>
<projection id="IT_L5B_IT_L5B" presynapticPopulation="IT_L5B" postsynapticPopulation="IT_L5B" synapse="AMPA_syn">
<connection id="0" preCellId="../IT_L5B/0/IzhikevichCell2007" postCellId="../IT_L5B/45/IzhikevichCell2007" preSegmentId="0" preFractionAlong="0.5" postSegmentId="0" postFractionAlong="0.5"/>
<connection id="1" preCellId="../IT_L5B/0/IzhikevichCell2007" postCellId="../IT_L5B/52/IzhikevichCell2007" preSegmentId="0" preFractionAlong="0.5" postSegmentId="0" postFractionAlong="0.5"/>
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</projection>
<projection id="IT_L23_SOM_L23" presynapticPopulation="IT_L23" postsynapticPopulation="SOM_L23" synapse="GABA_syn">
<connection id="0" preCellId="../IT_L23/0/IzhikevichCell2007" postCellId="../SOM_L23/4/IzhikevichCell2007" preSegmentId="0" preFractionAlong="0.5" postSegmentId="0" postFractionAlong="0.5"/>
<connection id="1" preCellId="../IT_L23/1/IzhikevichCell2007" postCellId="../SOM_L23/2/IzhikevichCell2007" preSegmentId="0" preFractionAlong="0.5" postSegmentId="0" postFractionAlong="0.5"/>
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</projection>
<projection id="PV_L6_IT_L5B" presynapticPopulation="PV_L6" postsynapticPopulation="IT_L5B" synapse="GABAA">
<connection id="0" preCellId="../PV_L6/1/IzhikevichCell2007" postCellId="../IT_L5B/33/IzhikevichCell2007" preSegmentId="0" preFractionAlong="0.5" postSegmentId="0" postFractionAlong="0.5"/>
<connection id="1" preCellId="../PV_L6/1/IzhikevichCell2007" postCellId="../IT_L5B/19/IzhikevichCell2007" preSegmentId="0" preFractionAlong="0.5" postSegmentId="0" postFractionAlong="0.5"/>
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</projection>
<projection id="IT_L5A_IT_L23" presynapticPopulation="IT_L5A" postsynapticPopulation="IT_L23" synapse="AMPA_syn">
<connection id="0" preCellId="../IT_L5A/0/IzhikevichCell2007" postCellId="../IT_L23/5/IzhikevichCell2007" preSegmentId="0" preFractionAlong="0.5" postSegmentId="0" postFractionAlong="0.5"/>
<connection id="1" preCellId="../IT_L5A/0/IzhikevichCell2007" postCellId="../IT_L23/10/IzhikevichCell2007" preSegmentId="0" preFractionAlong="0.5" postSegmentId="0" postFractionAlong="0.5"/>
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</projection>
<projection id="IT_L23_PV_L23" presynapticPopulation="IT_L23" postsynapticPopulation="PV_L23" synapse="GABAA">
<connection id="0" preCellId="../IT_L23/0/IzhikevichCell2007" postCellId="../PV_L23/3/IzhikevichCell2007" preSegmentId="0" preFractionAlong="0.5" postSegmentId="0" postFractionAlong="0.5"/>
<connection id="1" preCellId="../IT_L23/4/IzhikevichCell2007" postCellId="../PV_L23/5/IzhikevichCell2007" preSegmentId="0" preFractionAlong="0.5" postSegmentId="0" postFractionAlong="0.5"/>
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</projection>
<projection id="IT_L6_IT_L5B" presynapticPopulation="IT_L6" postsynapticPopulation="IT_L5B" synapse="AMPA_syn">
<connection id="0" preCellId="../IT_L6/1/IzhikevichCell2007" postCellId="../IT_L5B/35/IzhikevichCell2007" preSegmentId="0" preFractionAlong="0.5" postSegmentId="0" postFractionAlong="0.5"/>
<connection id="1" preCellId="../IT_L6/1/IzhikevichCell2007" postCellId="../IT_L5B/43/IzhikevichCell2007" preSegmentId="0" preFractionAlong="0.5" postSegmentId="0" postFractionAlong="0.5"/>
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</projection>
<projection id="IT_L23_IT_L5B" presynapticPopulation="IT_L23" postsynapticPopulation="IT_L5B" synapse="AMPA_syn">
<connection id="0" preCellId="../IT_L23/0/IzhikevichCell2007" postCellId="../IT_L5B/3/IzhikevichCell2007" preSegmentId="0" preFractionAlong="0.5" postSegmentId="0" postFractionAlong="0.5"/>
<connection id="1" preCellId="../IT_L23/4/IzhikevichCell2007" postCellId="../IT_L5B/26/IzhikevichCell2007" preSegmentId="0" preFractionAlong="0.5" postSegmentId="0" postFractionAlong="0.5"/>
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</projection>
<projection id="IT_L4_IT_L4" presynapticPopulation="IT_L4" postsynapticPopulation="IT_L4" synapse="AMPA_syn">
<connection id="0" preCellId="../IT_L4/0/IzhikevichCell2007" postCellId="../IT_L4/37/IzhikevichCell2007" preSegmentId="0" preFractionAlong="0.5" postSegmentId="0" postFractionAlong="0.5"/>
<connection id="1" preCellId="../IT_L4/0/IzhikevichCell2007" postCellId="../IT_L4/43/IzhikevichCell2007" preSegmentId="0" preFractionAlong="0.5" postSegmentId="0" postFractionAlong="0.5"/>
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</projection>
<projection id="PV_L23_IT_L23" presynapticPopulation="PV_L23" postsynapticPopulation="IT_L23" synapse="GABAA">
<connection id="0" preCellId="../PV_L23/0/IzhikevichCell2007" postCellId="../IT_L23/3/IzhikevichCell2007" preSegmentId="0" preFractionAlong="0.5" postSegmentId="0" postFractionAlong="0.5"/>
<connection id="1" preCellId="../PV_L23/0/IzhikevichCell2007" postCellId="../IT_L23/38/IzhikevichCell2007" preSegmentId="0" preFractionAlong="0.5" postSegmentId="0" postFractionAlong="0.5"/>
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</projection>
<projection id="PV_L6_CT_L6" presynapticPopulation="PV_L6" postsynapticPopulation="CT_L6" synapse="GABAA">
<connection id="0" preCellId="../PV_L6/0/IzhikevichCell2007" postCellId="../CT_L6/10/IzhikevichCell2007" preSegmentId="0" preFractionAlong="0.5" postSegmentId="0" postFractionAlong="0.5"/>
<connection id="1" preCellId="../PV_L6/0/IzhikevichCell2007" postCellId="../CT_L6/32/IzhikevichCell2007" preSegmentId="0" preFractionAlong="0.5" postSegmentId="0" postFractionAlong="0.5"/>
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</projection>
<projection id="IT_L5B_IT_L4" presynapticPopulation="IT_L5B" postsynapticPopulation="IT_L4" synapse="AMPA_syn">
<connection id="0" preCellId="../IT_L5B/0/IzhikevichCell2007" postCellId="../IT_L4/7/IzhikevichCell2007" preSegmentId="0" preFractionAlong="0.5" postSegmentId="0" postFractionAlong="0.5"/>
<connection id="1" preCellId="../IT_L5B/1/IzhikevichCell2007" postCellId="../IT_L4/26/IzhikevichCell2007" preSegmentId="0" preFractionAlong="0.5" postSegmentId="0" postFractionAlong="0.5"/>
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</projection>
<projection id="PV_L5_IT_L5B" presynapticPopulation="PV_L5" postsynapticPopulation="IT_L5B" synapse="GABAA">
<connection id="0" preCellId="../PV_L5/0/IzhikevichCell2007" postCellId="../IT_L5B/0/IzhikevichCell2007" preSegmentId="0" preFractionAlong="0.5" postSegmentId="0" postFractionAlong="0.5"/>
<connection id="1" preCellId="../PV_L5/0/IzhikevichCell2007" postCellId="../IT_L5B/45/IzhikevichCell2007" preSegmentId="0" preFractionAlong="0.5" postSegmentId="0" postFractionAlong="0.5"/>
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</projection>
<projection id="PT_L5B_IT_L5A" presynapticPopulation="PT_L5B" postsynapticPopulation="IT_L5A" synapse="AMPA_syn">
<connection id="0" preCellId="../PT_L5B/0/IzhikevichCell2007" postCellId="../IT_L5A/11/IzhikevichCell2007" preSegmentId="0" preFractionAlong="0.5" postSegmentId="0" postFractionAlong="0.5"/>
<connection id="1" preCellId="../PT_L5B/0/IzhikevichCell2007" postCellId="../IT_L5A/19/IzhikevichCell2007" preSegmentId="0" preFractionAlong="0.5" postSegmentId="0" postFractionAlong="0.5"/>
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</projection>
<projection id="IT_L23_CT_L6" presynapticPopulation="IT_L23" postsynapticPopulation="CT_L6" synapse="AMPA_syn">
<connection id="0" preCellId="../IT_L23/67/IzhikevichCell2007" postCellId="../CT_L6/41/IzhikevichCell2007" preSegmentId="0" preFractionAlong="0.5" postSegmentId="0" postFractionAlong="0.5"/>
<connection id="1" preCellId="../IT_L23/85/IzhikevichCell2007" postCellId="../CT_L6/43/IzhikevichCell2007" preSegmentId="0" preFractionAlong="0.5" postSegmentId="0" postFractionAlong="0.5"/>
<connection id="2" preCellId="../IT_L23/90/IzhikevichCell2007" postCellId="../CT_L6/12/IzhikevichCell2007" preSegmentId="0" preFractionAlong="0.5" postSegmentId="0" postFractionAlong="0.5"/>
<connection id="3" preCellId="../IT_L23/90/IzhikevichCell2007" postCellId="../CT_L6/16/IzhikevichCell2007" preSegmentId="0" preFractionAlong="0.5" postSegmentId="0" postFractionAlong="0.5"/>
</projection>
<projection id="IT_L23_IT_L4" presynapticPopulation="IT_L23" postsynapticPopulation="IT_L4" synapse="AMPA_syn">
<connection id="0" preCellId="../IT_L23/0/IzhikevichCell2007" postCellId="../IT_L4/20/IzhikevichCell2007" preSegmentId="0" preFractionAlong="0.5" postSegmentId="0" postFractionAlong="0.5"/>
<connection id="1" preCellId="../IT_L23/0/IzhikevichCell2007" postCellId="../IT_L4/4/IzhikevichCell2007" preSegmentId="0" preFractionAlong="0.5" postSegmentId="0" postFractionAlong="0.5"/>
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</projection>
<projection id="SOM_L5_CT_L6" presynapticPopulation="SOM_L5" postsynapticPopulation="CT_L6" synapse="GABA_syn">
<connection id="0" preCellId="../SOM_L5/0/IzhikevichCell2007" postCellId="../CT_L6/7/IzhikevichCell2007" preSegmentId="0" preFractionAlong="0.5" postSegmentId="0" postFractionAlong="0.5"/>
<connection id="1" preCellId="../SOM_L5/0/IzhikevichCell2007" postCellId="../CT_L6/0/IzhikevichCell2007" preSegmentId="0" preFractionAlong="0.5" postSegmentId="0" postFractionAlong="0.5"/>
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</projection>
<projection id="SOM_L5_IT_L23" presynapticPopulation="SOM_L5" postsynapticPopulation="IT_L23" synapse="GABA_syn">
<connection id="0" preCellId="../SOM_L5/0/IzhikevichCell2007" postCellId="../IT_L23/35/IzhikevichCell2007" preSegmentId="0" preFractionAlong="0.5" postSegmentId="0" postFractionAlong="0.5"/>
<connection id="1" preCellId="../SOM_L5/0/IzhikevichCell2007" postCellId="../IT_L23/1/IzhikevichCell2007" preSegmentId="0" preFractionAlong="0.5" postSegmentId="0" postFractionAlong="0.5"/>
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</projection>
<projection id="IT_L5B_IT_L5A" presynapticPopulation="IT_L5B" postsynapticPopulation="IT_L5A" synapse="AMPA_syn">
<connection id="0" preCellId="../IT_L5B/0/IzhikevichCell2007" postCellId="../IT_L5A/24/IzhikevichCell2007" preSegmentId="0" preFractionAlong="0.5" postSegmentId="0" postFractionAlong="0.5"/>
<connection id="1" preCellId="../IT_L5B/2/IzhikevichCell2007" postCellId="../IT_L5A/7/IzhikevichCell2007" preSegmentId="0" preFractionAlong="0.5" postSegmentId="0" postFractionAlong="0.5"/>
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</projection>
<projection id="SOM_L6_IT_L6" presynapticPopulation="SOM_L6" postsynapticPopulation="IT_L6" synapse="GABA_syn">
<connection id="0" preCellId="../SOM_L6/0/IzhikevichCell2007" postCellId="../IT_L6/37/IzhikevichCell2007" preSegmentId="0" preFractionAlong="0.5" postSegmentId="0" postFractionAlong="0.5"/>
<connection id="1" preCellId="../SOM_L6/0/IzhikevichCell2007" postCellId="../IT_L6/6/IzhikevichCell2007" preSegmentId="0" preFractionAlong="0.5" postSegmentId="0" postFractionAlong="0.5"/>
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</projection>
<projection id="SOM_L5_PV_L5" presynapticPopulation="SOM_L5" postsynapticPopulation="PV_L5" synapse="GABAA">
<connection id="0" preCellId="../SOM_L5/6/IzhikevichCell2007" postCellId="../PV_L5/12/IzhikevichCell2007" preSegmentId="0" preFractionAlong="0.5" postSegmentId="0" postFractionAlong="0.5"/>
<connection id="1" preCellId="../SOM_L5/12/IzhikevichCell2007" postCellId="../PV_L5/19/IzhikevichCell2007" preSegmentId="0" preFractionAlong="0.5" postSegmentId="0" postFractionAlong="0.5"/>
<connection id="2" preCellId="../SOM_L5/15/IzhikevichCell2007" postCellId="../PV_L5/6/IzhikevichCell2007" preSegmentId="0" preFractionAlong="0.5" postSegmentId="0" postFractionAlong="0.5"/>
<connection id="3" preCellId="../SOM_L5/20/IzhikevichCell2007" postCellId="../PV_L5/0/IzhikevichCell2007" preSegmentId="0" preFractionAlong="0.5" postSegmentId="0" postFractionAlong="0.5"/>
</projection>
<projection id="PV_L5_IT_L4" presynapticPopulation="PV_L5" postsynapticPopulation="IT_L4" synapse="GABAA">
<connection id="0" preCellId="../PV_L5/0/IzhikevichCell2007" postCellId="../IT_L4/7/IzhikevichCell2007" preSegmentId="0" preFractionAlong="0.5" postSegmentId="0" postFractionAlong="0.5"/>
<connection id="1" preCellId="../PV_L5/0/IzhikevichCell2007" postCellId="../IT_L4/31/IzhikevichCell2007" preSegmentId="0" preFractionAlong="0.5" postSegmentId="0" postFractionAlong="0.5"/>
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</projection>
</network>
</neuroml>
