<?xml version="1.0" encoding="UTF-8"?>
<neuroml xmlns="http://www.neuroml.org/schema/neuroml2" xmlns:xsi="http://www.w3.org/2001/XMLSchema-instance" xsi:schemaLocation="http://www.neuroml.org/schema/neuroml2 https://raw.github.com/NeuroML/NeuroML2/development/Schemas/NeuroML2/NeuroML_v2beta4.xsd" id="WhichModel">
<include href="GABAB.synapse.nml"/>
<include href="GABAA.synapse.nml"/>
<include href="AMPA_syn.synapse.nml"/>
<include href="HHCell.cell.nml"></include>
<network id="net1" type="networkWithTemperature" temperature="32.0 degC">
<population id="SOM_L23" component="HHCell" type="populationList" size="26">
<instance id="0"><location x="119.966412772" y="166.040769455" z="140.185277436"/></instance>
<instance id="1"><location x="259.695951863" y="272.482270253" z="100.822482734"/></instance>
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</population>
<population id="IT_L23" component="HHCell" type="populationList" size="185">
<instance id="0"><location x="168.792791056" y="184.000107343" z="47.5184385029"/></instance>
<instance id="1"><location x="140.673895417" y="263.412025031" z="219.27533078"/></instance>
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</population>
<population id="SOM_L5" component="HHCell" type="populationList" size="54">
<instance id="0"><location x="59.9240982436" y="994.653699372" z="95.3032518137"/></instance>
<instance id="1"><location x="40.4114213828" y="772.246756896" z="54.639067663"/></instance>
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</population>
<population id="PV_L23" component="HHCell" type="populationList" size="25">
<instance id="0"><location x="297.625996581" y="381.53165826" z="259.949926208"/></instance>
<instance id="1"><location x="147.253316958" y="207.900771077" z="56.8636437542"/></instance>
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</population>
<population id="CT_L6" component="HHCell" type="populationList" size="112">
<instance id="0"><location x="83.2594138735" y="1309.51086381" z="43.4891607277"/></instance>
<instance id="1"><location x="244.81481314" y="1119.34370166" z="205.739074781"/></instance>
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</population>
<population id="PV_L5" component="HHCell" type="populationList" size="56">
<instance id="0"><location x="184.08989571" y="957.736338081" z="34.8265608739"/></instance>
<instance id="1"><location x="95.8571965647" y="965.351372661" z="245.804329941"/></instance>
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</population>
<population id="PV_L6" component="HHCell" type="populationList" size="30">
<instance id="0"><location x="219.383523381" y="1309.11816904" z="59.6805161513"/></instance>
<instance id="1"><location x="4.88362387978" y="1312.92568633" z="122.359399156"/></instance>
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</population>
<population id="IT_L5B" component="HHCell" type="populationList" size="118">
<instance id="0"><location x="215.255076684" y="734.418078685" z="277.924625437"/></instance>
<instance id="1"><location x="7.1742767359" y="951.768403686" z="216.531216718"/></instance>
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</population>
<population id="IT_L5A" component="HHCell" type="populationList" size="108">
<instance id="0"><location x="141.062982112" y="594.53560349" z="91.582837468"/></instance>
<instance id="1"><location x="53.1066186663" y="607.269801096" z="93.6535421624"/></instance>
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</population>
<population id="PT_L5B" component="HHCell" type="populationList" size="125">
<instance id="0"><location x="40.0126092346" y="730.947509662" z="214.769893143"/></instance>
<instance id="1"><location x="144.042094954" y="835.436875041" z="240.880542911"/></instance>
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</population>
<population id="IT_L6" component="HHCell" type="populationList" size="111">
<instance id="0"><location x="83.2594138735" y="1309.51086381" z="43.4891607277"/></instance>
<instance id="1"><location x="244.81481314" y="1119.34370166" z="205.739074781"/></instance>
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</population>
<population id="SOM_L6" component="HHCell" type="populationList" size="27">
<instance id="0"><location x="228.932399058" y="1309.51086381" z="172.680065238"/></instance>
<instance id="1"><location x="88.6573436635" y="1119.34370166" z="147.575305935"/></instance>
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</population>
<population id="IT_L4" component="HHCell" type="populationList" size="97">
<instance id="0"><location x="289.009868908" y="535.896027743" z="25.7225140049"/></instance>
<instance id="1"><location x="286.784013644" y="453.214652894" z="245.539602672"/></instance>
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</population>
<projection id="IT_L23_IT_L5A" presynapticPopulation="IT_L23" postsynapticPopulation="IT_L5A" synapse="AMPA_syn">
<connection id="0" preCellId="../IT_L23/0/HHCell" postCellId="../IT_L5A/74/HHCell" preSegmentId="0" preFractionAlong="0.5" postSegmentId="0" postFractionAlong="0.5"/>
<connection id="1" preCellId="../IT_L23/0/HHCell" postCellId="../IT_L5A/47/HHCell" preSegmentId="0" preFractionAlong="0.5" postSegmentId="0" postFractionAlong="0.5"/>
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</projection>
<projection id="SOM_L5_IT_L5B" presynapticPopulation="SOM_L5" postsynapticPopulation="IT_L5B" synapse="AMPA_syn">
<connection id="0" preCellId="../SOM_L5/2/HHCell" postCellId="../IT_L5B/11/HHCell" preSegmentId="0" preFractionAlong="0.5" postSegmentId="0" postFractionAlong="0.5"/>
<connection id="1" preCellId="../SOM_L5/4/HHCell" postCellId="../IT_L5B/83/HHCell" preSegmentId="0" preFractionAlong="0.5" postSegmentId="0" postFractionAlong="0.5"/>
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</projection>
<projection id="IT_L5A_IT_L4" presynapticPopulation="IT_L5A" postsynapticPopulation="IT_L4" synapse="AMPA_syn">
<connection id="0" preCellId="../IT_L5A/0/HHCell" postCellId="../IT_L4/21/HHCell" preSegmentId="0" preFractionAlong="0.5" postSegmentId="0" postFractionAlong="0.5"/>
<connection id="1" preCellId="../IT_L5A/3/HHCell" postCellId="../IT_L4/22/HHCell" preSegmentId="0" preFractionAlong="0.5" postSegmentId="0" postFractionAlong="0.5"/>
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</projection>
<projection id="PV_L6_PT_L5B" presynapticPopulation="PV_L6" postsynapticPopulation="PT_L5B" synapse="AMPA_syn">
<connection id="0" preCellId="../PV_L6/2/HHCell" postCellId="../PT_L5B/107/HHCell" preSegmentId="0" preFractionAlong="0.5" postSegmentId="0" postFractionAlong="0.5"/>
<connection id="1" preCellId="../PV_L6/6/HHCell" postCellId="../PT_L5B/72/HHCell" preSegmentId="0" preFractionAlong="0.5" postSegmentId="0" postFractionAlong="0.5"/>
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</projection>
<projection id="IT_L5A_IT_L5B" presynapticPopulation="IT_L5A" postsynapticPopulation="IT_L5B" synapse="AMPA_syn">
<connection id="0" preCellId="../IT_L5A/0/HHCell" postCellId="../IT_L5B/32/HHCell" preSegmentId="0" preFractionAlong="0.5" postSegmentId="0" postFractionAlong="0.5"/>
<connection id="1" preCellId="../IT_L5A/0/HHCell" postCellId="../IT_L5B/24/HHCell" preSegmentId="0" preFractionAlong="0.5" postSegmentId="0" postFractionAlong="0.5"/>
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</projection>
<projection id="IT_L6_CT_L6" presynapticPopulation="IT_L6" postsynapticPopulation="CT_L6" synapse="AMPA_syn">
<connection id="0" preCellId="../IT_L6/2/HHCell" postCellId="../CT_L6/82/HHCell" preSegmentId="0" preFractionAlong="0.5" postSegmentId="0" postFractionAlong="0.5"/>
<connection id="1" preCellId="../IT_L6/2/HHCell" postCellId="../CT_L6/61/HHCell" preSegmentId="0" preFractionAlong="0.5" postSegmentId="0" postFractionAlong="0.5"/>
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</projection>
<projection id="IT_L4_IT_L5A" presynapticPopulation="IT_L4" postsynapticPopulation="IT_L5A" synapse="AMPA_syn">
<connection id="0" preCellId="../IT_L4/0/HHCell" postCellId="../IT_L5A/90/HHCell" preSegmentId="0" preFractionAlong="0.5" postSegmentId="0" postFractionAlong="0.5"/>
<connection id="1" preCellId="../IT_L4/0/HHCell" postCellId="../IT_L5A/30/HHCell" preSegmentId="0" preFractionAlong="0.5" postSegmentId="0" postFractionAlong="0.5"/>
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</projection>
<projection id="SOM_L5_PT_L5B" presynapticPopulation="SOM_L5" postsynapticPopulation="PT_L5B" synapse="AMPA_syn">
<connection id="0" preCellId="../SOM_L5/2/HHCell" postCellId="../PT_L5B/0/HHCell" preSegmentId="0" preFractionAlong="0.5" postSegmentId="0" postFractionAlong="0.5"/>
<connection id="1" preCellId="../SOM_L5/2/HHCell" postCellId="../PT_L5B/36/HHCell" preSegmentId="0" preFractionAlong="0.5" postSegmentId="0" postFractionAlong="0.5"/>
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</projection>
<projection id="PT_L5B_IT_L6" presynapticPopulation="PT_L5B" postsynapticPopulation="IT_L6" synapse="AMPA_syn">
<connection id="0" preCellId="../PT_L5B/1/HHCell" postCellId="../IT_L6/78/HHCell" preSegmentId="0" preFractionAlong="0.5" postSegmentId="0" postFractionAlong="0.5"/>
<connection id="1" preCellId="../PT_L5B/1/HHCell" postCellId="../IT_L6/66/HHCell" preSegmentId="0" preFractionAlong="0.5" postSegmentId="0" postFractionAlong="0.5"/>
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</projection>
<projection id="SOM_L23_PV_L23" presynapticPopulation="SOM_L23" postsynapticPopulation="PV_L23" synapse="GABAA">
<connection id="0" preCellId="../SOM_L23/1/HHCell" postCellId="../PV_L23/23/HHCell" preSegmentId="0" preFractionAlong="0.5" postSegmentId="0" postFractionAlong="0.5"/>
<connection id="1" preCellId="../SOM_L23/1/HHCell" postCellId="../PV_L23/6/HHCell" preSegmentId="0" preFractionAlong="0.5" postSegmentId="0" postFractionAlong="0.5"/>
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</projection>
<projection id="PV_L23_IT_L23" presynapticPopulation="PV_L23" postsynapticPopulation="IT_L23" synapse="AMPA_syn">
<connection id="0" preCellId="../PV_L23/0/HHCell" postCellId="../IT_L23/58/HHCell" preSegmentId="0" preFractionAlong="0.5" postSegmentId="0" postFractionAlong="0.5"/>
<connection id="1" preCellId="../PV_L23/0/HHCell" postCellId="../IT_L23/23/HHCell" preSegmentId="0" preFractionAlong="0.5" postSegmentId="0" postFractionAlong="0.5"/>
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</projection>
<projection id="IT_L23_SOM_L23" presynapticPopulation="IT_L23" postsynapticPopulation="SOM_L23" synapse="GABAB">
<connection id="0" preCellId="../IT_L23/0/HHCell" postCellId="../SOM_L23/6/HHCell" preSegmentId="0" preFractionAlong="0.5" postSegmentId="0" postFractionAlong="0.5"/>
<connection id="1" preCellId="../IT_L23/0/HHCell" postCellId="../SOM_L23/11/HHCell" preSegmentId="0" preFractionAlong="0.5" postSegmentId="0" postFractionAlong="0.5"/>
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</projection>
<projection id="CT_L6_IT_L6" presynapticPopulation="CT_L6" postsynapticPopulation="IT_L6" synapse="AMPA_syn">
<connection id="0" preCellId="../CT_L6/1/HHCell" postCellId="../IT_L6/1/HHCell" preSegmentId="0" preFractionAlong="0.5" postSegmentId="0" postFractionAlong="0.5"/>
<connection id="1" preCellId="../CT_L6/1/HHCell" postCellId="../IT_L6/109/HHCell" preSegmentId="0" preFractionAlong="0.5" postSegmentId="0" postFractionAlong="0.5"/>
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</projection>
<projection id="PV_L5_IT_L6" presynapticPopulation="PV_L5" postsynapticPopulation="IT_L6" synapse="AMPA_syn">
<connection id="0" preCellId="../PV_L5/0/HHCell" postCellId="../IT_L6/70/HHCell" preSegmentId="0" preFractionAlong="0.5" postSegmentId="0" postFractionAlong="0.5"/>
<connection id="1" preCellId="../PV_L5/0/HHCell" postCellId="../IT_L6/91/HHCell" preSegmentId="0" preFractionAlong="0.5" postSegmentId="0" postFractionAlong="0.5"/>
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</projection>
<projection id="IT_L5B_CT_L6" presynapticPopulation="IT_L5B" postsynapticPopulation="CT_L6" synapse="AMPA_syn">
<connection id="0" preCellId="../IT_L5B/2/HHCell" postCellId="../CT_L6/78/HHCell" preSegmentId="0" preFractionAlong="0.5" postSegmentId="0" postFractionAlong="0.5"/>
<connection id="1" preCellId="../IT_L5B/2/HHCell" postCellId="../CT_L6/23/HHCell" preSegmentId="0" preFractionAlong="0.5" postSegmentId="0" postFractionAlong="0.5"/>
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</projection>
<projection id="PV_L6_CT_L6" presynapticPopulation="PV_L6" postsynapticPopulation="CT_L6" synapse="AMPA_syn">
<connection id="0" preCellId="../PV_L6/2/HHCell" postCellId="../CT_L6/53/HHCell" preSegmentId="0" preFractionAlong="0.5" postSegmentId="0" postFractionAlong="0.5"/>
<connection id="1" preCellId="../PV_L6/2/HHCell" postCellId="../CT_L6/68/HHCell" preSegmentId="0" preFractionAlong="0.5" postSegmentId="0" postFractionAlong="0.5"/>
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</projection>
<projection id="IT_L5A_IT_L5A" presynapticPopulation="IT_L5A" postsynapticPopulation="IT_L5A" synapse="AMPA_syn">
<connection id="0" preCellId="../IT_L5A/0/HHCell" postCellId="../IT_L5A/4/HHCell" preSegmentId="0" preFractionAlong="0.5" postSegmentId="0" postFractionAlong="0.5"/>
<connection id="1" preCellId="../IT_L5A/0/HHCell" postCellId="../IT_L5A/39/HHCell" preSegmentId="0" preFractionAlong="0.5" postSegmentId="0" postFractionAlong="0.5"/>
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</projection>
<projection id="PV_L23_SOM_L23" presynapticPopulation="PV_L23" postsynapticPopulation="SOM_L23" synapse="GABAB">
<connection id="0" preCellId="../PV_L23/0/HHCell" postCellId="../SOM_L23/9/HHCell" preSegmentId="0" preFractionAlong="0.5" postSegmentId="0" postFractionAlong="0.5"/>
<connection id="1" preCellId="../PV_L23/0/HHCell" postCellId="../SOM_L23/12/HHCell" preSegmentId="0" preFractionAlong="0.5" postSegmentId="0" postFractionAlong="0.5"/>
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</projection>
<projection id="SOM_L5_IT_L5A" presynapticPopulation="SOM_L5" postsynapticPopulation="IT_L5A" synapse="AMPA_syn">
<connection id="0" preCellId="../SOM_L5/2/HHCell" postCellId="../IT_L5A/97/HHCell" preSegmentId="0" preFractionAlong="0.5" postSegmentId="0" postFractionAlong="0.5"/>
<connection id="1" preCellId="../SOM_L5/2/HHCell" postCellId="../IT_L5A/51/HHCell" preSegmentId="0" preFractionAlong="0.5" postSegmentId="0" postFractionAlong="0.5"/>
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</projection>
<projection id="IT_L6_PT_L5B" presynapticPopulation="IT_L6" postsynapticPopulation="PT_L5B" synapse="AMPA_syn">
<connection id="0" preCellId="../IT_L6/56/HHCell" postCellId="../PT_L5B/90/HHCell" preSegmentId="0" preFractionAlong="0.5" postSegmentId="0" postFractionAlong="0.5"/>
<connection id="1" preCellId="../IT_L6/71/HHCell" postCellId="../PT_L5B/78/HHCell" preSegmentId="0" preFractionAlong="0.5" postSegmentId="0" postFractionAlong="0.5"/>
<connection id="2" preCellId="../IT_L6/98/HHCell" postCellId="../PT_L5B/104/HHCell" preSegmentId="0" preFractionAlong="0.5" postSegmentId="0" postFractionAlong="0.5"/>
</projection>
<projection id="PV_L23_IT_L5A" presynapticPopulation="PV_L23" postsynapticPopulation="IT_L5A" synapse="AMPA_syn">
<connection id="0" preCellId="../PV_L23/0/HHCell" postCellId="../IT_L5A/21/HHCell" preSegmentId="0" preFractionAlong="0.5" postSegmentId="0" postFractionAlong="0.5"/>
<connection id="1" preCellId="../PV_L23/4/HHCell" postCellId="../IT_L5A/15/HHCell" preSegmentId="0" preFractionAlong="0.5" postSegmentId="0" postFractionAlong="0.5"/>
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</projection>
<projection id="IT_L6_IT_L6" presynapticPopulation="IT_L6" postsynapticPopulation="IT_L6" synapse="AMPA_syn">
<connection id="0" preCellId="../IT_L6/2/HHCell" postCellId="../IT_L6/7/HHCell" preSegmentId="0" preFractionAlong="0.5" postSegmentId="0" postFractionAlong="0.5"/>
<connection id="1" preCellId="../IT_L6/2/HHCell" postCellId="../IT_L6/102/HHCell" preSegmentId="0" preFractionAlong="0.5" postSegmentId="0" postFractionAlong="0.5"/>
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</projection>
<projection id="SOM_L23_IT_L23" presynapticPopulation="SOM_L23" postsynapticPopulation="IT_L23" synapse="AMPA_syn">
<connection id="0" preCellId="../SOM_L23/1/HHCell" postCellId="../IT_L23/23/HHCell" preSegmentId="0" preFractionAlong="0.5" postSegmentId="0" postFractionAlong="0.5"/>
<connection id="1" preCellId="../SOM_L23/1/HHCell" postCellId="../IT_L23/93/HHCell" preSegmentId="0" preFractionAlong="0.5" postSegmentId="0" postFractionAlong="0.5"/>
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</projection>
<projection id="IT_L23_IT_L6" presynapticPopulation="IT_L23" postsynapticPopulation="IT_L6" synapse="AMPA_syn">
<connection id="0" preCellId="../IT_L23/46/HHCell" postCellId="../IT_L6/96/HHCell" preSegmentId="0" preFractionAlong="0.5" postSegmentId="0" postFractionAlong="0.5"/>
<connection id="1" preCellId="../IT_L23/128/HHCell" postCellId="../IT_L6/46/HHCell" preSegmentId="0" preFractionAlong="0.5" postSegmentId="0" postFractionAlong="0.5"/>
</projection>
<projection id="IT_L5A_CT_L6" presynapticPopulation="IT_L5A" postsynapticPopulation="CT_L6" synapse="AMPA_syn">
<connection id="0" preCellId="../IT_L5A/0/HHCell" postCellId="../CT_L6/76/HHCell" preSegmentId="0" preFractionAlong="0.5" postSegmentId="0" postFractionAlong="0.5"/>
<connection id="1" preCellId="../IT_L5A/0/HHCell" postCellId="../CT_L6/0/HHCell" preSegmentId="0" preFractionAlong="0.5" postSegmentId="0" postFractionAlong="0.5"/>
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</projection>
<projection id="PV_L5_CT_L6" presynapticPopulation="PV_L5" postsynapticPopulation="CT_L6" synapse="AMPA_syn">
<connection id="0" preCellId="../PV_L5/0/HHCell" postCellId="../CT_L6/89/HHCell" preSegmentId="0" preFractionAlong="0.5" postSegmentId="0" postFractionAlong="0.5"/>
<connection id="1" preCellId="../PV_L5/0/HHCell" postCellId="../CT_L6/68/HHCell" preSegmentId="0" preFractionAlong="0.5" postSegmentId="0" postFractionAlong="0.5"/>
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</projection>
<projection id="IT_L6_IT_L5A" presynapticPopulation="IT_L6" postsynapticPopulation="IT_L5A" synapse="AMPA_syn">
<connection id="0" preCellId="../IT_L6/8/HHCell" postCellId="../IT_L5A/9/HHCell" preSegmentId="0" preFractionAlong="0.5" postSegmentId="0" postFractionAlong="0.5"/>
<connection id="1" preCellId="../IT_L6/19/HHCell" postCellId="../IT_L5A/49/HHCell" preSegmentId="0" preFractionAlong="0.5" postSegmentId="0" postFractionAlong="0.5"/>
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</projection>
<projection id="SOM_L23_PT_L5B" presynapticPopulation="SOM_L23" postsynapticPopulation="PT_L5B" synapse="AMPA_syn">
<connection id="0" preCellId="../SOM_L23/1/HHCell" postCellId="../PT_L5B/30/HHCell" preSegmentId="0" preFractionAlong="0.5" postSegmentId="0" postFractionAlong="0.5"/>
<connection id="1" preCellId="../SOM_L23/1/HHCell" postCellId="../PT_L5B/42/HHCell" preSegmentId="0" preFractionAlong="0.5" postSegmentId="0" postFractionAlong="0.5"/>
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</projection>
<projection id="IT_L6_IT_L4" presynapticPopulation="IT_L6" postsynapticPopulation="IT_L4" synapse="AMPA_syn">
<connection id="0" preCellId="../IT_L6/11/HHCell" postCellId="../IT_L4/70/HHCell" preSegmentId="0" preFractionAlong="0.5" postSegmentId="0" postFractionAlong="0.5"/>
<connection id="1" preCellId="../IT_L6/30/HHCell" postCellId="../IT_L4/80/HHCell" preSegmentId="0" preFractionAlong="0.5" postSegmentId="0" postFractionAlong="0.5"/>
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</projection>
<projection id="IT_L5B_PT_L5B" presynapticPopulation="IT_L5B" postsynapticPopulation="PT_L5B" synapse="AMPA_syn">
<connection id="0" preCellId="../IT_L5B/2/HHCell" postCellId="../PT_L5B/112/HHCell" preSegmentId="0" preFractionAlong="0.5" postSegmentId="0" postFractionAlong="0.5"/>
<connection id="1" preCellId="../IT_L5B/5/HHCell" postCellId="../PT_L5B/22/HHCell" preSegmentId="0" preFractionAlong="0.5" postSegmentId="0" postFractionAlong="0.5"/>
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</projection>
<projection id="SOM_L6_IT_L5B" presynapticPopulation="SOM_L6" postsynapticPopulation="IT_L5B" synapse="AMPA_syn">
<connection id="0" preCellId="../SOM_L6/0/HHCell" postCellId="../IT_L5B/22/HHCell" preSegmentId="0" preFractionAlong="0.5" postSegmentId="0" postFractionAlong="0.5"/>
<connection id="1" preCellId="../SOM_L6/0/HHCell" postCellId="../IT_L5B/16/HHCell" preSegmentId="0" preFractionAlong="0.5" postSegmentId="0" postFractionAlong="0.5"/>
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</projection>
<projection id="IT_L4_IT_L6" presynapticPopulation="IT_L4" postsynapticPopulation="IT_L6" synapse="AMPA_syn">
<connection id="0" preCellId="../IT_L4/0/HHCell" postCellId="../IT_L6/96/HHCell" preSegmentId="0" preFractionAlong="0.5" postSegmentId="0" postFractionAlong="0.5"/>
<connection id="1" preCellId="../IT_L4/0/HHCell" postCellId="../IT_L6/49/HHCell" preSegmentId="0" preFractionAlong="0.5" postSegmentId="0" postFractionAlong="0.5"/>
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</projection>
<projection id="SOM_L23_SOM_L23" presynapticPopulation="SOM_L23" postsynapticPopulation="SOM_L23" synapse="GABAB">
<connection id="0" preCellId="../SOM_L23/1/HHCell" postCellId="../SOM_L23/6/HHCell" preSegmentId="0" preFractionAlong="0.5" postSegmentId="0" postFractionAlong="0.5"/>
<connection id="1" preCellId="../SOM_L23/5/HHCell" postCellId="../SOM_L23/19/HHCell" preSegmentId="0" preFractionAlong="0.5" postSegmentId="0" postFractionAlong="0.5"/>
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</projection>
<projection id="IT_L4_PV_L5" presynapticPopulation="IT_L4" postsynapticPopulation="PV_L5" synapse="GABAA">
<connection id="0" preCellId="../IT_L4/33/HHCell" postCellId="../PV_L5/35/HHCell" preSegmentId="0" preFractionAlong="0.5" postSegmentId="0" postFractionAlong="0.5"/>
<connection id="1" preCellId="../IT_L4/38/HHCell" postCellId="../PV_L5/35/HHCell" preSegmentId="0" preFractionAlong="0.5" postSegmentId="0" postFractionAlong="0.5"/>
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</projection>
<projection id="IT_L23_IT_L23" presynapticPopulation="IT_L23" postsynapticPopulation="IT_L23" synapse="AMPA_syn">
<connection id="0" preCellId="../IT_L23/0/HHCell" postCellId="../IT_L23/64/HHCell" preSegmentId="0" preFractionAlong="0.5" postSegmentId="0" postFractionAlong="0.5"/>
<connection id="1" preCellId="../IT_L23/3/HHCell" postCellId="../IT_L23/82/HHCell" preSegmentId="0" preFractionAlong="0.5" postSegmentId="0" postFractionAlong="0.5"/>
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</projection>
<projection id="SOM_L5_CT_L6" presynapticPopulation="SOM_L5" postsynapticPopulation="CT_L6" synapse="AMPA_syn">
<connection id="0" preCellId="../SOM_L5/2/HHCell" postCellId="../CT_L6/5/HHCell" preSegmentId="0" preFractionAlong="0.5" postSegmentId="0" postFractionAlong="0.5"/>
<connection id="1" preCellId="../SOM_L5/2/HHCell" postCellId="../CT_L6/61/HHCell" preSegmentId="0" preFractionAlong="0.5" postSegmentId="0" postFractionAlong="0.5"/>
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</projection>
<projection id="IT_L4_CT_L6" presynapticPopulation="IT_L4" postsynapticPopulation="CT_L6" synapse="AMPA_syn">
<connection id="0" preCellId="../IT_L4/0/HHCell" postCellId="../CT_L6/109/HHCell" preSegmentId="0" preFractionAlong="0.5" postSegmentId="0" postFractionAlong="0.5"/>
<connection id="1" preCellId="../IT_L4/0/HHCell" postCellId="../CT_L6/47/HHCell" preSegmentId="0" preFractionAlong="0.5" postSegmentId="0" postFractionAlong="0.5"/>
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</projection>
<projection id="IT_L5B_IT_L6" presynapticPopulation="IT_L5B" postsynapticPopulation="IT_L6" synapse="AMPA_syn">
<connection id="0" preCellId="../IT_L5B/2/HHCell" postCellId="../IT_L6/58/HHCell" preSegmentId="0" preFractionAlong="0.5" postSegmentId="0" postFractionAlong="0.5"/>
<connection id="1" preCellId="../IT_L5B/5/HHCell" postCellId="../IT_L6/84/HHCell" preSegmentId="0" preFractionAlong="0.5" postSegmentId="0" postFractionAlong="0.5"/>
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</projection>
<projection id="SOM_L23_IT_L5A" presynapticPopulation="SOM_L23" postsynapticPopulation="IT_L5A" synapse="AMPA_syn">
<connection id="0" preCellId="../SOM_L23/1/HHCell" postCellId="../IT_L5A/76/HHCell" preSegmentId="0" preFractionAlong="0.5" postSegmentId="0" postFractionAlong="0.5"/>
<connection id="1" preCellId="../SOM_L23/1/HHCell" postCellId="../IT_L5A/43/HHCell" preSegmentId="0" preFractionAlong="0.5" postSegmentId="0" postFractionAlong="0.5"/>
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</projection>
<projection id="SOM_L5_IT_L6" presynapticPopulation="SOM_L5" postsynapticPopulation="IT_L6" synapse="AMPA_syn">
<connection id="0" preCellId="../SOM_L5/2/HHCell" postCellId="../IT_L6/77/HHCell" preSegmentId="0" preFractionAlong="0.5" postSegmentId="0" postFractionAlong="0.5"/>
<connection id="1" preCellId="../SOM_L5/2/HHCell" postCellId="../IT_L6/87/HHCell" preSegmentId="0" preFractionAlong="0.5" postSegmentId="0" postFractionAlong="0.5"/>
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</projection>
<projection id="PT_L5B_CT_L6" presynapticPopulation="PT_L5B" postsynapticPopulation="CT_L6" synapse="AMPA_syn">
<connection id="0" preCellId="../PT_L5B/1/HHCell" postCellId="../CT_L6/49/HHCell" preSegmentId="0" preFractionAlong="0.5" postSegmentId="0" postFractionAlong="0.5"/>
<connection id="1" preCellId="../PT_L5B/1/HHCell" postCellId="../CT_L6/96/HHCell" preSegmentId="0" preFractionAlong="0.5" postSegmentId="0" postFractionAlong="0.5"/>
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</projection>
<projection id="PV_L6_IT_L5A" presynapticPopulation="PV_L6" postsynapticPopulation="IT_L5A" synapse="AMPA_syn">
<connection id="0" preCellId="../PV_L6/2/HHCell" postCellId="../IT_L5A/42/HHCell" preSegmentId="0" preFractionAlong="0.5" postSegmentId="0" postFractionAlong="0.5"/>
<connection id="1" preCellId="../PV_L6/10/HHCell" postCellId="../IT_L5A/89/HHCell" preSegmentId="0" preFractionAlong="0.5" postSegmentId="0" postFractionAlong="0.5"/>
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</projection>
<projection id="PT_L5B_IT_L5A" presynapticPopulation="PT_L5B" postsynapticPopulation="IT_L5A" synapse="AMPA_syn">
<connection id="0" preCellId="../PT_L5B/1/HHCell" postCellId="../IT_L5A/61/HHCell" preSegmentId="0" preFractionAlong="0.5" postSegmentId="0" postFractionAlong="0.5"/>
<connection id="1" preCellId="../PT_L5B/4/HHCell" postCellId="../IT_L5A/7/HHCell" preSegmentId="0" preFractionAlong="0.5" postSegmentId="0" postFractionAlong="0.5"/>
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</projection>
<projection id="IT_L5A_IT_L6" presynapticPopulation="IT_L5A" postsynapticPopulation="IT_L6" synapse="AMPA_syn">
<connection id="0" preCellId="../IT_L5A/0/HHCell" postCellId="../IT_L6/49/HHCell" preSegmentId="0" preFractionAlong="0.5" postSegmentId="0" postFractionAlong="0.5"/>
<connection id="1" preCellId="../IT_L5A/0/HHCell" postCellId="../IT_L6/102/HHCell" preSegmentId="0" preFractionAlong="0.5" postSegmentId="0" postFractionAlong="0.5"/>
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</projection>
<projection id="IT_L4_IT_L23" presynapticPopulation="IT_L4" postsynapticPopulation="IT_L23" synapse="AMPA_syn">
<connection id="0" preCellId="../IT_L4/0/HHCell" postCellId="../IT_L23/35/HHCell" preSegmentId="0" preFractionAlong="0.5" postSegmentId="0" postFractionAlong="0.5"/>
<connection id="1" preCellId="../IT_L4/0/HHCell" postCellId="../IT_L23/47/HHCell" preSegmentId="0" preFractionAlong="0.5" postSegmentId="0" postFractionAlong="0.5"/>
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</projection>
<projection id="SOM_L6_IT_L5A" presynapticPopulation="SOM_L6" postsynapticPopulation="IT_L5A" synapse="AMPA_syn">
<connection id="0" preCellId="../SOM_L6/4/HHCell" postCellId="../IT_L5A/84/HHCell" preSegmentId="0" preFractionAlong="0.5" postSegmentId="0" postFractionAlong="0.5"/>
<connection id="1" preCellId="../SOM_L6/15/HHCell" postCellId="../IT_L5A/53/HHCell" preSegmentId="0" preFractionAlong="0.5" postSegmentId="0" postFractionAlong="0.5"/>
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</projection>
<projection id="PT_L5B_PT_L5B" presynapticPopulation="PT_L5B" postsynapticPopulation="PT_L5B" synapse="AMPA_syn">
<connection id="0" preCellId="../PT_L5B/1/HHCell" postCellId="../PT_L5B/113/HHCell" preSegmentId="0" preFractionAlong="0.5" postSegmentId="0" postFractionAlong="0.5"/>
<connection id="1" preCellId="../PT_L5B/4/HHCell" postCellId="../PT_L5B/116/HHCell" preSegmentId="0" preFractionAlong="0.5" postSegmentId="0" postFractionAlong="0.5"/>
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</projection>
<projection id="PT_L5B_IT_L5B" presynapticPopulation="PT_L5B" postsynapticPopulation="IT_L5B" synapse="AMPA_syn">
<connection id="0" preCellId="../PT_L5B/1/HHCell" postCellId="../IT_L5B/55/HHCell" preSegmentId="0" preFractionAlong="0.5" postSegmentId="0" postFractionAlong="0.5"/>
<connection id="1" preCellId="../PT_L5B/1/HHCell" postCellId="../IT_L5B/24/HHCell" preSegmentId="0" preFractionAlong="0.5" postSegmentId="0" postFractionAlong="0.5"/>
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</projection>
<projection id="PV_L6_IT_L4" presynapticPopulation="PV_L6" postsynapticPopulation="IT_L4" synapse="AMPA_syn">
<connection id="0" preCellId="../PV_L6/6/HHCell" postCellId="../IT_L4/56/HHCell" preSegmentId="0" preFractionAlong="0.5" postSegmentId="0" postFractionAlong="0.5"/>
<connection id="1" preCellId="../PV_L6/10/HHCell" postCellId="../IT_L4/16/HHCell" preSegmentId="0" preFractionAlong="0.5" postSegmentId="0" postFractionAlong="0.5"/>
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</projection>
<projection id="PV_L6_IT_L5B" presynapticPopulation="PV_L6" postsynapticPopulation="IT_L5B" synapse="AMPA_syn">
<connection id="0" preCellId="../PV_L6/2/HHCell" postCellId="../IT_L5B/13/HHCell" preSegmentId="0" preFractionAlong="0.5" postSegmentId="0" postFractionAlong="0.5"/>
<connection id="1" preCellId="../PV_L6/6/HHCell" postCellId="../IT_L5B/38/HHCell" preSegmentId="0" preFractionAlong="0.5" postSegmentId="0" postFractionAlong="0.5"/>
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</projection>
<projection id="CT_L6_IT_L5B" presynapticPopulation="CT_L6" postsynapticPopulation="IT_L5B" synapse="AMPA_syn">
<connection id="0" preCellId="../CT_L6/1/HHCell" postCellId="../IT_L5B/14/HHCell" preSegmentId="0" preFractionAlong="0.5" postSegmentId="0" postFractionAlong="0.5"/>
<connection id="1" preCellId="../CT_L6/1/HHCell" postCellId="../IT_L5B/107/HHCell" preSegmentId="0" preFractionAlong="0.5" postSegmentId="0" postFractionAlong="0.5"/>
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</projection>
<projection id="PV_L23_PV_L23" presynapticPopulation="PV_L23" postsynapticPopulation="PV_L23" synapse="GABAA">
<connection id="0" preCellId="../PV_L23/0/HHCell" postCellId="../PV_L23/1/HHCell" preSegmentId="0" preFractionAlong="0.5" postSegmentId="0" postFractionAlong="0.5"/>
<connection id="1" preCellId="../PV_L23/0/HHCell" postCellId="../PV_L23/14/HHCell" preSegmentId="0" preFractionAlong="0.5" postSegmentId="0" postFractionAlong="0.5"/>
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</projection>
<projection id="SOM_L6_IT_L4" presynapticPopulation="SOM_L6" postsynapticPopulation="IT_L4" synapse="AMPA_syn">
<connection id="0" preCellId="../SOM_L6/0/HHCell" postCellId="../IT_L4/88/HHCell" preSegmentId="0" preFractionAlong="0.5" postSegmentId="0" postFractionAlong="0.5"/>
<connection id="1" preCellId="../SOM_L6/4/HHCell" postCellId="../IT_L4/73/HHCell" preSegmentId="0" preFractionAlong="0.5" postSegmentId="0" postFractionAlong="0.5"/>
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</projection>
<projection id="IT_L5A_SOM_L5" presynapticPopulation="IT_L5A" postsynapticPopulation="SOM_L5" synapse="GABAB">
<connection id="0" preCellId="../IT_L5A/6/HHCell" postCellId="../SOM_L5/46/HHCell" preSegmentId="0" preFractionAlong="0.5" postSegmentId="0" postFractionAlong="0.5"/>
<connection id="1" preCellId="../IT_L5A/8/HHCell" postCellId="../SOM_L5/34/HHCell" preSegmentId="0" preFractionAlong="0.5" postSegmentId="0" postFractionAlong="0.5"/>
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</projection>
<projection id="IT_L4_PT_L5B" presynapticPopulation="IT_L4" postsynapticPopulation="PT_L5B" synapse="AMPA_syn">
<connection id="0" preCellId="../IT_L4/0/HHCell" postCellId="../PT_L5B/23/HHCell" preSegmentId="0" preFractionAlong="0.5" postSegmentId="0" postFractionAlong="0.5"/>
<connection id="1" preCellId="../IT_L4/0/HHCell" postCellId="../PT_L5B/118/HHCell" preSegmentId="0" preFractionAlong="0.5" postSegmentId="0" postFractionAlong="0.5"/>
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</projection>
<projection id="PV_L23_IT_L4" presynapticPopulation="PV_L23" postsynapticPopulation="IT_L4" synapse="AMPA_syn">
<connection id="0" preCellId="../PV_L23/0/HHCell" postCellId="../IT_L4/68/HHCell" preSegmentId="0" preFractionAlong="0.5" postSegmentId="0" postFractionAlong="0.5"/>
<connection id="1" preCellId="../PV_L23/4/HHCell" postCellId="../IT_L4/95/HHCell" preSegmentId="0" preFractionAlong="0.5" postSegmentId="0" postFractionAlong="0.5"/>
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</projection>
<projection id="PT_L5B_PV_L5" presynapticPopulation="PT_L5B" postsynapticPopulation="PV_L5" synapse="GABAA">
<connection id="0" preCellId="../PT_L5B/13/HHCell" postCellId="../PV_L5/7/HHCell" preSegmentId="0" preFractionAlong="0.5" postSegmentId="0" postFractionAlong="0.5"/>
<connection id="1" preCellId="../PT_L5B/16/HHCell" postCellId="../PV_L5/13/HHCell" preSegmentId="0" preFractionAlong="0.5" postSegmentId="0" postFractionAlong="0.5"/>
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</projection>
<projection id="CT_L6_IT_L5A" presynapticPopulation="CT_L6" postsynapticPopulation="IT_L5A" synapse="AMPA_syn">
<connection id="0" preCellId="../CT_L6/1/HHCell" postCellId="../IT_L5A/35/HHCell" preSegmentId="0" preFractionAlong="0.5" postSegmentId="0" postFractionAlong="0.5"/>
<connection id="1" preCellId="../CT_L6/1/HHCell" postCellId="../IT_L5A/72/HHCell" preSegmentId="0" preFractionAlong="0.5" postSegmentId="0" postFractionAlong="0.5"/>
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</projection>
<projection id="CT_L6_CT_L6" presynapticPopulation="CT_L6" postsynapticPopulation="CT_L6" synapse="AMPA_syn">
<connection id="0" preCellId="../CT_L6/1/HHCell" postCellId="../CT_L6/71/HHCell" preSegmentId="0" preFractionAlong="0.5" postSegmentId="0" postFractionAlong="0.5"/>
<connection id="1" preCellId="../CT_L6/1/HHCell" postCellId="../CT_L6/33/HHCell" preSegmentId="0" preFractionAlong="0.5" postSegmentId="0" postFractionAlong="0.5"/>
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</projection>
<projection id="SOM_L23_IT_L4" presynapticPopulation="SOM_L23" postsynapticPopulation="IT_L4" synapse="AMPA_syn">
<connection id="0" preCellId="../SOM_L23/1/HHCell" postCellId="../IT_L4/38/HHCell" preSegmentId="0" preFractionAlong="0.5" postSegmentId="0" postFractionAlong="0.5"/>
<connection id="1" preCellId="../SOM_L23/5/HHCell" postCellId="../IT_L4/39/HHCell" preSegmentId="0" preFractionAlong="0.5" postSegmentId="0" postFractionAlong="0.5"/>
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</projection>
<projection id="PV_L5_SOM_L5" presynapticPopulation="PV_L5" postsynapticPopulation="SOM_L5" synapse="GABAB">
<connection id="0" preCellId="../PV_L5/7/HHCell" postCellId="../SOM_L5/9/HHCell" preSegmentId="0" preFractionAlong="0.5" postSegmentId="0" postFractionAlong="0.5"/>
<connection id="1" preCellId="../PV_L5/22/HHCell" postCellId="../SOM_L5/39/HHCell" preSegmentId="0" preFractionAlong="0.5" postSegmentId="0" postFractionAlong="0.5"/>
<connection id="2" preCellId="../PV_L5/27/HHCell" postCellId="../SOM_L5/19/HHCell" preSegmentId="0" preFractionAlong="0.5" postSegmentId="0" postFractionAlong="0.5"/>
<connection id="3" preCellId="../PV_L5/34/HHCell" postCellId="../SOM_L5/34/HHCell" preSegmentId="0" preFractionAlong="0.5" postSegmentId="0" postFractionAlong="0.5"/>
</projection>
<projection id="CT_L6_IT_L4" presynapticPopulation="CT_L6" postsynapticPopulation="IT_L4" synapse="AMPA_syn">
<connection id="0" preCellId="../CT_L6/1/HHCell" postCellId="../IT_L4/55/HHCell" preSegmentId="0" preFractionAlong="0.5" postSegmentId="0" postFractionAlong="0.5"/>
<connection id="1" preCellId="../CT_L6/4/HHCell" postCellId="../IT_L4/29/HHCell" preSegmentId="0" preFractionAlong="0.5" postSegmentId="0" postFractionAlong="0.5"/>
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</projection>
<projection id="PT_L5B_IT_L23" presynapticPopulation="PT_L5B" postsynapticPopulation="IT_L23" synapse="AMPA_syn">
<connection id="0" preCellId="../PT_L5B/1/HHCell" postCellId="../IT_L23/0/HHCell" preSegmentId="0" preFractionAlong="0.5" postSegmentId="0" postFractionAlong="0.5"/>
<connection id="1" preCellId="../PT_L5B/1/HHCell" postCellId="../IT_L23/93/HHCell" preSegmentId="0" preFractionAlong="0.5" postSegmentId="0" postFractionAlong="0.5"/>
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</projection>
<projection id="PT_L5B_IT_L4" presynapticPopulation="PT_L5B" postsynapticPopulation="IT_L4" synapse="AMPA_syn">
<connection id="0" preCellId="../PT_L5B/1/HHCell" postCellId="../IT_L4/84/HHCell" preSegmentId="0" preFractionAlong="0.5" postSegmentId="0" postFractionAlong="0.5"/>
<connection id="1" preCellId="../PT_L5B/1/HHCell" postCellId="../IT_L4/48/HHCell" preSegmentId="0" preFractionAlong="0.5" postSegmentId="0" postFractionAlong="0.5"/>
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</projection>
<projection id="IT_L5B_IT_L23" presynapticPopulation="IT_L5B" postsynapticPopulation="IT_L23" synapse="AMPA_syn">
<connection id="0" preCellId="../IT_L5B/2/HHCell" postCellId="../IT_L23/62/HHCell" preSegmentId="0" preFractionAlong="0.5" postSegmentId="0" postFractionAlong="0.5"/>
<connection id="1" preCellId="../IT_L5B/2/HHCell" postCellId="../IT_L23/20/HHCell" preSegmentId="0" preFractionAlong="0.5" postSegmentId="0" postFractionAlong="0.5"/>
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</projection>
<projection id="SOM_L6_CT_L6" presynapticPopulation="SOM_L6" postsynapticPopulation="CT_L6" synapse="AMPA_syn">
<connection id="0" preCellId="../SOM_L6/0/HHCell" postCellId="../CT_L6/104/HHCell" preSegmentId="0" preFractionAlong="0.5" postSegmentId="0" postFractionAlong="0.5"/>
<connection id="1" preCellId="../SOM_L6/0/HHCell" postCellId="../CT_L6/14/HHCell" preSegmentId="0" preFractionAlong="0.5" postSegmentId="0" postFractionAlong="0.5"/>
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</projection>
<projection id="PV_L5_IT_L23" presynapticPopulation="PV_L5" postsynapticPopulation="IT_L23" synapse="AMPA_syn">
<connection id="0" preCellId="../PV_L5/0/HHCell" postCellId="../IT_L23/84/HHCell" preSegmentId="0" preFractionAlong="0.5" postSegmentId="0" postFractionAlong="0.5"/>
<connection id="1" preCellId="../PV_L5/0/HHCell" postCellId="../IT_L23/50/HHCell" preSegmentId="0" preFractionAlong="0.5" postSegmentId="0" postFractionAlong="0.5"/>
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</projection>
<projection id="IT_L5A_PT_L5B" presynapticPopulation="IT_L5A" postsynapticPopulation="PT_L5B" synapse="AMPA_syn">
<connection id="0" preCellId="../IT_L5A/0/HHCell" postCellId="../PT_L5B/23/HHCell" preSegmentId="0" preFractionAlong="0.5" postSegmentId="0" postFractionAlong="0.5"/>
<connection id="1" preCellId="../IT_L5A/0/HHCell" postCellId="../PT_L5B/118/HHCell" preSegmentId="0" preFractionAlong="0.5" postSegmentId="0" postFractionAlong="0.5"/>
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</projection>
<projection id="PT_L5B_SOM_L5" presynapticPopulation="PT_L5B" postsynapticPopulation="SOM_L5" synapse="GABAB">
<connection id="0" preCellId="../PT_L5B/4/HHCell" postCellId="../SOM_L5/10/HHCell" preSegmentId="0" preFractionAlong="0.5" postSegmentId="0" postFractionAlong="0.5"/>
<connection id="1" preCellId="../PT_L5B/19/HHCell" postCellId="../SOM_L5/19/HHCell" preSegmentId="0" preFractionAlong="0.5" postSegmentId="0" postFractionAlong="0.5"/>
<connection id="2" preCellId="../PT_L5B/37/HHCell" postCellId="../SOM_L5/49/HHCell" preSegmentId="0" preFractionAlong="0.5" postSegmentId="0" postFractionAlong="0.5"/>
<connection id="3" preCellId="../PT_L5B/63/HHCell" postCellId="../SOM_L5/49/HHCell" preSegmentId="0" preFractionAlong="0.5" postSegmentId="0" postFractionAlong="0.5"/>
</projection>
<projection id="IT_L4_IT_L5B" presynapticPopulation="IT_L4" postsynapticPopulation="IT_L5B" synapse="AMPA_syn">
<connection id="0" preCellId="../IT_L4/0/HHCell" postCellId="../IT_L5B/8/HHCell" preSegmentId="0" preFractionAlong="0.5" postSegmentId="0" postFractionAlong="0.5"/>
<connection id="1" preCellId="../IT_L4/0/HHCell" postCellId="../IT_L5B/23/HHCell" preSegmentId="0" preFractionAlong="0.5" postSegmentId="0" postFractionAlong="0.5"/>
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</projection>
<projection id="PV_L5_IT_L5B" presynapticPopulation="PV_L5" postsynapticPopulation="IT_L5B" synapse="AMPA_syn">
<connection id="0" preCellId="../PV_L5/0/HHCell" postCellId="../IT_L5B/53/HHCell" preSegmentId="0" preFractionAlong="0.5" postSegmentId="0" postFractionAlong="0.5"/>
<connection id="1" preCellId="../PV_L5/0/HHCell" postCellId="../IT_L5B/45/HHCell" preSegmentId="0" preFractionAlong="0.5" postSegmentId="0" postFractionAlong="0.5"/>
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</projection>
<projection id="IT_L5B_PV_L5" presynapticPopulation="IT_L5B" postsynapticPopulation="PV_L5" synapse="GABAA">
<connection id="0" preCellId="../IT_L5B/11/HHCell" postCellId="../PV_L5/46/HHCell" preSegmentId="0" preFractionAlong="0.5" postSegmentId="0" postFractionAlong="0.5"/>
<connection id="1" preCellId="../IT_L5B/33/HHCell" postCellId="../PV_L5/36/HHCell" preSegmentId="0" preFractionAlong="0.5" postSegmentId="0" postFractionAlong="0.5"/>
<connection id="2" preCellId="../IT_L5B/39/HHCell" postCellId="../PV_L5/36/HHCell" preSegmentId="0" preFractionAlong="0.5" postSegmentId="0" postFractionAlong="0.5"/>
</projection>
<projection id="PV_L5_PV_L5" presynapticPopulation="PV_L5" postsynapticPopulation="PV_L5" synapse="GABAA">
<connection id="0" preCellId="../PV_L5/13/HHCell" postCellId="../PV_L5/43/HHCell" preSegmentId="0" preFractionAlong="0.5" postSegmentId="0" postFractionAlong="0.5"/>
<connection id="1" preCellId="../PV_L5/13/HHCell" postCellId="../PV_L5/25/HHCell" preSegmentId="0" preFractionAlong="0.5" postSegmentId="0" postFractionAlong="0.5"/>
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</projection>
<projection id="IT_L5A_PV_L5" presynapticPopulation="IT_L5A" postsynapticPopulation="PV_L5" synapse="GABAA">
<connection id="0" preCellId="../IT_L5A/16/HHCell" postCellId="../PV_L5/45/HHCell" preSegmentId="0" preFractionAlong="0.5" postSegmentId="0" postFractionAlong="0.5"/>
<connection id="1" preCellId="../IT_L5A/38/HHCell" postCellId="../PV_L5/6/HHCell" preSegmentId="0" preFractionAlong="0.5" postSegmentId="0" postFractionAlong="0.5"/>
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</projection>
<projection id="IT_L5B_IT_L5B" presynapticPopulation="IT_L5B" postsynapticPopulation="IT_L5B" synapse="AMPA_syn">
<connection id="0" preCellId="../IT_L5B/2/HHCell" postCellId="../IT_L5B/25/HHCell" preSegmentId="0" preFractionAlong="0.5" postSegmentId="0" postFractionAlong="0.5"/>
<connection id="1" preCellId="../IT_L5B/5/HHCell" postCellId="../IT_L5B/2/HHCell" preSegmentId="0" preFractionAlong="0.5" postSegmentId="0" postFractionAlong="0.5"/>
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</projection>
<projection id="PV_L23_IT_L5B" presynapticPopulation="PV_L23" postsynapticPopulation="IT_L5B" synapse="AMPA_syn">
<connection id="0" preCellId="../PV_L23/0/HHCell" postCellId="../IT_L5B/9/HHCell" preSegmentId="0" preFractionAlong="0.5" postSegmentId="0" postFractionAlong="0.5"/>
<connection id="1" preCellId="../PV_L23/0/HHCell" postCellId="../IT_L5B/85/HHCell" preSegmentId="0" preFractionAlong="0.5" postSegmentId="0" postFractionAlong="0.5"/>
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</projection>
<projection id="IT_L4_SOM_L5" presynapticPopulation="IT_L4" postsynapticPopulation="SOM_L5" synapse="GABAB">
<connection id="0" preCellId="../IT_L4/3/HHCell" postCellId="../SOM_L5/24/HHCell" preSegmentId="0" preFractionAlong="0.5" postSegmentId="0" postFractionAlong="0.5"/>
<connection id="1" preCellId="../IT_L4/16/HHCell" postCellId="../SOM_L5/39/HHCell" preSegmentId="0" preFractionAlong="0.5" postSegmentId="0" postFractionAlong="0.5"/>
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</projection>
<projection id="IT_L5A_IT_L23" presynapticPopulation="IT_L5A" postsynapticPopulation="IT_L23" synapse="AMPA_syn">
<connection id="0" preCellId="../IT_L5A/0/HHCell" postCellId="../IT_L23/93/HHCell" preSegmentId="0" preFractionAlong="0.5" postSegmentId="0" postFractionAlong="0.5"/>
<connection id="1" preCellId="../IT_L5A/0/HHCell" postCellId="../IT_L23/14/HHCell" preSegmentId="0" preFractionAlong="0.5" postSegmentId="0" postFractionAlong="0.5"/>
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</projection>
<projection id="IT_L23_PV_L23" presynapticPopulation="IT_L23" postsynapticPopulation="PV_L23" synapse="GABAA">
<connection id="0" preCellId="../IT_L23/0/HHCell" postCellId="../PV_L23/3/HHCell" preSegmentId="0" preFractionAlong="0.5" postSegmentId="0" postFractionAlong="0.5"/>
<connection id="1" preCellId="../IT_L23/0/HHCell" postCellId="../PV_L23/1/HHCell" preSegmentId="0" preFractionAlong="0.5" postSegmentId="0" postFractionAlong="0.5"/>
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</projection>
<projection id="SOM_L23_IT_L5B" presynapticPopulation="SOM_L23" postsynapticPopulation="IT_L5B" synapse="AMPA_syn">
<connection id="0" preCellId="../SOM_L23/1/HHCell" postCellId="../IT_L5B/96/HHCell" preSegmentId="0" preFractionAlong="0.5" postSegmentId="0" postFractionAlong="0.5"/>
<connection id="1" preCellId="../SOM_L23/5/HHCell" postCellId="../IT_L5B/92/HHCell" preSegmentId="0" preFractionAlong="0.5" postSegmentId="0" postFractionAlong="0.5"/>
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</projection>
<projection id="IT_L6_IT_L5B" presynapticPopulation="IT_L6" postsynapticPopulation="IT_L5B" synapse="AMPA_syn">
<connection id="0" preCellId="../IT_L6/2/HHCell" postCellId="../IT_L5B/21/HHCell" preSegmentId="0" preFractionAlong="0.5" postSegmentId="0" postFractionAlong="0.5"/>
<connection id="1" preCellId="../IT_L6/2/HHCell" postCellId="../IT_L5B/70/HHCell" preSegmentId="0" preFractionAlong="0.5" postSegmentId="0" postFractionAlong="0.5"/>
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</projection>
<projection id="IT_L23_IT_L5B" presynapticPopulation="IT_L23" postsynapticPopulation="IT_L5B" synapse="AMPA_syn">
<connection id="0" preCellId="../IT_L23/0/HHCell" postCellId="../IT_L5B/3/HHCell" preSegmentId="0" preFractionAlong="0.5" postSegmentId="0" postFractionAlong="0.5"/>
<connection id="1" preCellId="../IT_L23/0/HHCell" postCellId="../IT_L5B/109/HHCell" preSegmentId="0" preFractionAlong="0.5" postSegmentId="0" postFractionAlong="0.5"/>
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</projection>
<projection id="PV_L5_IT_L4" presynapticPopulation="PV_L5" postsynapticPopulation="IT_L4" synapse="AMPA_syn">
<connection id="0" preCellId="../PV_L5/0/HHCell" postCellId="../IT_L4/31/HHCell" preSegmentId="0" preFractionAlong="0.5" postSegmentId="0" postFractionAlong="0.5"/>
<connection id="1" preCellId="../PV_L5/0/HHCell" postCellId="../IT_L4/67/HHCell" preSegmentId="0" preFractionAlong="0.5" postSegmentId="0" postFractionAlong="0.5"/>
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</projection>
<projection id="IT_L4_IT_L4" presynapticPopulation="IT_L4" postsynapticPopulation="IT_L4" synapse="AMPA_syn">
<connection id="0" preCellId="../IT_L4/0/HHCell" postCellId="../IT_L4/92/HHCell" preSegmentId="0" preFractionAlong="0.5" postSegmentId="0" postFractionAlong="0.5"/>
<connection id="1" preCellId="../IT_L4/0/HHCell" postCellId="../IT_L4/68/HHCell" preSegmentId="0" preFractionAlong="0.5" postSegmentId="0" postFractionAlong="0.5"/>
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</projection>
<projection id="IT_L5B_IT_L4" presynapticPopulation="IT_L5B" postsynapticPopulation="IT_L4" synapse="AMPA_syn">
<connection id="0" preCellId="../IT_L5B/2/HHCell" postCellId="../IT_L4/46/HHCell" preSegmentId="0" preFractionAlong="0.5" postSegmentId="0" postFractionAlong="0.5"/>
<connection id="1" preCellId="../IT_L5B/5/HHCell" postCellId="../IT_L4/33/HHCell" preSegmentId="0" preFractionAlong="0.5" postSegmentId="0" postFractionAlong="0.5"/>
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</projection>
<projection id="PV_L23_PT_L5B" presynapticPopulation="PV_L23" postsynapticPopulation="PT_L5B" synapse="AMPA_syn">
<connection id="0" preCellId="../PV_L23/0/HHCell" postCellId="../PT_L5B/77/HHCell" preSegmentId="0" preFractionAlong="0.5" postSegmentId="0" postFractionAlong="0.5"/>
<connection id="1" preCellId="../PV_L23/0/HHCell" postCellId="../PT_L5B/4/HHCell" preSegmentId="0" preFractionAlong="0.5" postSegmentId="0" postFractionAlong="0.5"/>
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</projection>
<projection id="PV_L6_IT_L6" presynapticPopulation="PV_L6" postsynapticPopulation="IT_L6" synapse="AMPA_syn">
<connection id="0" preCellId="../PV_L6/2/HHCell" postCellId="../IT_L6/44/HHCell" preSegmentId="0" preFractionAlong="0.5" postSegmentId="0" postFractionAlong="0.5"/>
<connection id="1" preCellId="../PV_L6/2/HHCell" postCellId="../IT_L6/108/HHCell" preSegmentId="0" preFractionAlong="0.5" postSegmentId="0" postFractionAlong="0.5"/>
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</projection>
<projection id="SOM_L5_IT_L4" presynapticPopulation="SOM_L5" postsynapticPopulation="IT_L4" synapse="AMPA_syn">
<connection id="0" preCellId="../SOM_L5/2/HHCell" postCellId="../IT_L4/55/HHCell" preSegmentId="0" preFractionAlong="0.5" postSegmentId="0" postFractionAlong="0.5"/>
<connection id="1" preCellId="../SOM_L5/2/HHCell" postCellId="../IT_L4/7/HHCell" preSegmentId="0" preFractionAlong="0.5" postSegmentId="0" postFractionAlong="0.5"/>
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</projection>
<projection id="PV_L5_IT_L5A" presynapticPopulation="PV_L5" postsynapticPopulation="IT_L5A" synapse="AMPA_syn">
<connection id="0" preCellId="../PV_L5/0/HHCell" postCellId="../IT_L5A/101/HHCell" preSegmentId="0" preFractionAlong="0.5" postSegmentId="0" postFractionAlong="0.5"/>
<connection id="1" preCellId="../PV_L5/0/HHCell" postCellId="../IT_L5A/13/HHCell" preSegmentId="0" preFractionAlong="0.5" postSegmentId="0" postFractionAlong="0.5"/>
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</projection>
<projection id="PV_L5_PT_L5B" presynapticPopulation="PV_L5" postsynapticPopulation="PT_L5B" synapse="AMPA_syn">
<connection id="0" preCellId="../PV_L5/0/HHCell" postCellId="../PT_L5B/77/HHCell" preSegmentId="0" preFractionAlong="0.5" postSegmentId="0" postFractionAlong="0.5"/>
<connection id="1" preCellId="../PV_L5/0/HHCell" postCellId="../PT_L5B/85/HHCell" preSegmentId="0" preFractionAlong="0.5" postSegmentId="0" postFractionAlong="0.5"/>
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</projection>
<projection id="SOM_L5_IT_L23" presynapticPopulation="SOM_L5" postsynapticPopulation="IT_L23" synapse="AMPA_syn">
<connection id="0" preCellId="../SOM_L5/2/HHCell" postCellId="../IT_L23/162/HHCell" preSegmentId="0" preFractionAlong="0.5" postSegmentId="0" postFractionAlong="0.5"/>
<connection id="1" preCellId="../SOM_L5/2/HHCell" postCellId="../IT_L23/12/HHCell" preSegmentId="0" preFractionAlong="0.5" postSegmentId="0" postFractionAlong="0.5"/>
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</projection>
<projection id="IT_L23_IT_L4" presynapticPopulation="IT_L23" postsynapticPopulation="IT_L4" synapse="AMPA_syn">
<connection id="0" preCellId="../IT_L23/0/HHCell" postCellId="../IT_L4/94/HHCell" preSegmentId="0" preFractionAlong="0.5" postSegmentId="0" postFractionAlong="0.5"/>
<connection id="1" preCellId="../IT_L23/0/HHCell" postCellId="../IT_L4/77/HHCell" preSegmentId="0" preFractionAlong="0.5" postSegmentId="0" postFractionAlong="0.5"/>
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</projection>
<projection id="SOM_L6_IT_L6" presynapticPopulation="SOM_L6" postsynapticPopulation="IT_L6" synapse="AMPA_syn">
<connection id="0" preCellId="../SOM_L6/0/HHCell" postCellId="../IT_L6/69/HHCell" preSegmentId="0" preFractionAlong="0.5" postSegmentId="0" postFractionAlong="0.5"/>
<connection id="1" preCellId="../SOM_L6/4/HHCell" postCellId="../IT_L6/0/HHCell" preSegmentId="0" preFractionAlong="0.5" postSegmentId="0" postFractionAlong="0.5"/>
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</projection>
<projection id="IT_L5B_SOM_L5" presynapticPopulation="IT_L5B" postsynapticPopulation="SOM_L5" synapse="GABAB">
<connection id="0" preCellId="../IT_L5B/8/HHCell" postCellId="../SOM_L5/49/HHCell" preSegmentId="0" preFractionAlong="0.5" postSegmentId="0" postFractionAlong="0.5"/>
<connection id="1" preCellId="../IT_L5B/8/HHCell" postCellId="../SOM_L5/6/HHCell" preSegmentId="0" preFractionAlong="0.5" postSegmentId="0" postFractionAlong="0.5"/>
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</projection>
<projection id="IT_L5B_IT_L5A" presynapticPopulation="IT_L5B" postsynapticPopulation="IT_L5A" synapse="AMPA_syn">
<connection id="0" preCellId="../IT_L5B/2/HHCell" postCellId="../IT_L5A/106/HHCell" preSegmentId="0" preFractionAlong="0.5" postSegmentId="0" postFractionAlong="0.5"/>
<connection id="1" preCellId="../IT_L5B/2/HHCell" postCellId="../IT_L5A/77/HHCell" preSegmentId="0" preFractionAlong="0.5" postSegmentId="0" postFractionAlong="0.5"/>
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</projection>
<projection id="SOM_L5_SOM_L5" presynapticPopulation="SOM_L5" postsynapticPopulation="SOM_L5" synapse="GABAB">
<connection id="0" preCellId="../SOM_L5/9/HHCell" postCellId="../SOM_L5/20/HHCell" preSegmentId="0" preFractionAlong="0.5" postSegmentId="0" postFractionAlong="0.5"/>
</projection>
<projection id="SOM_L6_PT_L5B" presynapticPopulation="SOM_L6" postsynapticPopulation="PT_L5B" synapse="AMPA_syn">
<connection id="0" preCellId="../SOM_L6/0/HHCell" postCellId="../PT_L5B/79/HHCell" preSegmentId="0" preFractionAlong="0.5" postSegmentId="0" postFractionAlong="0.5"/>
<connection id="1" preCellId="../SOM_L6/0/HHCell" postCellId="../PT_L5B/33/HHCell" preSegmentId="0" preFractionAlong="0.5" postSegmentId="0" postFractionAlong="0.5"/>
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</projection>
<projection id="SOM_L5_PV_L5" presynapticPopulation="SOM_L5" postsynapticPopulation="PV_L5" synapse="GABAA">
<connection id="0" preCellId="../SOM_L5/34/HHCell" postCellId="../PV_L5/22/HHCell" preSegmentId="0" preFractionAlong="0.5" postSegmentId="0" postFractionAlong="0.5"/>
</projection>
</network>
</neuroml>
