<?xml version="1.0" encoding="UTF-8"?>
<neuroml xmlns="http://www.neuroml.org/schema/neuroml2" xmlns:xsi="http://www.w3.org/2001/XMLSchema-instance" xsi:schemaLocation="http://www.neuroml.org/schema/neuroml2 https://raw.github.com/NeuroML/NeuroML2/development/Schemas/NeuroML2/NeuroML_v2beta4.xsd" id="WhichModel">
<include href="GABAB.synapse.nml"/>
<include href="GABAA.synapse.nml"/>
<include href="AMPA_syn.synapse.nml"/>
<include href="HHCell.cell.nml"></include>
<network id="net1" type="networkWithTemperature" temperature="32.0 degC">
<population id="SOM_L23" component="HHCell" type="populationList" size="9">
<instance id="0"><location x="259.695951863" y="272.482270253" z="100.822482734"/></instance>
<instance id="1"><location x="6.27080378505" y="343.946714215" z="60.1898341834"/></instance>
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</population>
<population id="IT_L23" component="HHCell" type="populationList" size="63">
<instance id="0"><location x="168.792791056" y="184.000107343" z="47.5184385029"/></instance>
<instance id="1"><location x="56.8682957769" y="360.396726563" z="28.9589443586"/></instance>
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</population>
<population id="SOM_L5" component="HHCell" type="populationList" size="18">
<instance id="0"><location x="21.9617824851" y="670.377500714" z="148.375332984"/></instance>
<instance id="1"><location x="153.496175353" y="603.608947048" z="104.116882564"/></instance>
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</population>
<population id="PV_L23" component="HHCell" type="populationList" size="7">
<instance id="0"><location x="297.625996581" y="381.53165826" z="259.949926208"/></instance>
<instance id="1"><location x="130.527711488" y="271.141219554" z="126.35470962"/></instance>
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</population>
<population id="CT_L6" component="HHCell" type="populationList" size="39">
<instance id="0"><location x="244.81481314" y="1119.34370166" z="205.739074781"/></instance>
<instance id="1"><location x="210.87243066" y="1098.35387129" z="183.379830319"/></instance>
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</population>
<population id="PV_L5" component="HHCell" type="populationList" size="20">
<instance id="0"><location x="184.08989571" y="957.736338081" z="34.8265608739"/></instance>
<instance id="1"><location x="218.771770742" y="708.683524292" z="145.709750787"/></instance>
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</population>
<population id="PV_L6" component="HHCell" type="populationList" size="10">
<instance id="0"><location x="130.892969565" y="1048.59957503" z="265.050783139"/></instance>
<instance id="1"><location x="150.516468466" y="1194.96280613" z="158.507842063"/></instance>
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</population>
<population id="IT_L5B" component="HHCell" type="populationList" size="40">
<instance id="0"><location x="109.525852282" y="756.508965264" z="32.378467106"/></instance>
<instance id="1"><location x="295.529714432" y="885.875191444" z="282.751127064"/></instance>
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</population>
<population id="IT_L5A" component="HHCell" type="populationList" size="36">
<instance id="0"><location x="141.062982112" y="594.53560349" z="91.582837468"/></instance>
<instance id="1"><location x="153.793584861" y="681.573283783" z="98.0899325538"/></instance>
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</population>
<population id="PT_L5B" component="HHCell" type="populationList" size="41">
<instance id="0"><location x="144.042094954" y="835.436875041" z="240.880542911"/></instance>
<instance id="1"><location x="55.5725216432" y="917.363149348" z="217.07968902"/></instance>
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</population>
<population id="IT_L6" component="HHCell" type="populationList" size="36">
<instance id="0"><location x="73.567972194" y="1308.54817362" z="1.07312434917"/></instance>
<instance id="1"><location x="266.648805098" y="1278.99042376" z="234.983385544"/></instance>
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</population>
<population id="SOM_L6" component="HHCell" type="populationList" size="7">
<instance id="0"><location x="228.932399058" y="1309.51086381" z="172.680065238"/></instance>
<instance id="1"><location x="73.1586219048" y="1188.60704999" z="0.380166128715"/></instance>
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</population>
<population id="IT_L4" component="HHCell" type="populationList" size="32">
<instance id="0"><location x="289.009868908" y="535.896027743" z="25.7225140049"/></instance>
<instance id="1"><location x="191.24479189" y="548.585301426" z="256.044871436"/></instance>
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</population>
<projection id="IT_L23_IT_L5A" presynapticPopulation="IT_L23" postsynapticPopulation="IT_L5A" synapse="AMPA_syn">
<connection id="0" preCellId="../IT_L23/0/HHCell" postCellId="../IT_L5A/34/HHCell" preSegmentId="0" preFractionAlong="0.5" postSegmentId="0" postFractionAlong="0.5"/>
<connection id="1" preCellId="../IT_L23/0/HHCell" postCellId="../IT_L5A/11/HHCell" preSegmentId="0" preFractionAlong="0.5" postSegmentId="0" postFractionAlong="0.5"/>
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</projection>
<projection id="SOM_L5_IT_L5B" presynapticPopulation="SOM_L5" postsynapticPopulation="IT_L5B" synapse="AMPA_syn">
<connection id="0" preCellId="../SOM_L5/0/HHCell" postCellId="../IT_L5B/3/HHCell" preSegmentId="0" preFractionAlong="0.5" postSegmentId="0" postFractionAlong="0.5"/>
<connection id="1" preCellId="../SOM_L5/1/HHCell" postCellId="../IT_L5B/33/HHCell" preSegmentId="0" preFractionAlong="0.5" postSegmentId="0" postFractionAlong="0.5"/>
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</projection>
<projection id="IT_L5A_IT_L4" presynapticPopulation="IT_L5A" postsynapticPopulation="IT_L4" synapse="AMPA_syn">
<connection id="0" preCellId="../IT_L5A/0/HHCell" postCellId="../IT_L4/6/HHCell" preSegmentId="0" preFractionAlong="0.5" postSegmentId="0" postFractionAlong="0.5"/>
<connection id="1" preCellId="../IT_L5A/1/HHCell" postCellId="../IT_L4/18/HHCell" preSegmentId="0" preFractionAlong="0.5" postSegmentId="0" postFractionAlong="0.5"/>
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</projection>
<projection id="PV_L6_PT_L5B" presynapticPopulation="PV_L6" postsynapticPopulation="PT_L5B" synapse="AMPA_syn">
<connection id="0" preCellId="../PV_L6/0/HHCell" postCellId="../PT_L5B/36/HHCell" preSegmentId="0" preFractionAlong="0.5" postSegmentId="0" postFractionAlong="0.5"/>
<connection id="1" preCellId="../PV_L6/1/HHCell" postCellId="../PT_L5B/32/HHCell" preSegmentId="0" preFractionAlong="0.5" postSegmentId="0" postFractionAlong="0.5"/>
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</projection>
<projection id="IT_L5A_IT_L5B" presynapticPopulation="IT_L5A" postsynapticPopulation="IT_L5B" synapse="AMPA_syn">
<connection id="0" preCellId="../IT_L5A/0/HHCell" postCellId="../IT_L5B/38/HHCell" preSegmentId="0" preFractionAlong="0.5" postSegmentId="0" postFractionAlong="0.5"/>
<connection id="1" preCellId="../IT_L5A/1/HHCell" postCellId="../IT_L5B/3/HHCell" preSegmentId="0" preFractionAlong="0.5" postSegmentId="0" postFractionAlong="0.5"/>
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</projection>
<projection id="IT_L6_CT_L6" presynapticPopulation="IT_L6" postsynapticPopulation="CT_L6" synapse="AMPA_syn">
<connection id="0" preCellId="../IT_L6/0/HHCell" postCellId="../CT_L6/28/HHCell" preSegmentId="0" preFractionAlong="0.5" postSegmentId="0" postFractionAlong="0.5"/>
<connection id="1" preCellId="../IT_L6/0/HHCell" postCellId="../CT_L6/21/HHCell" preSegmentId="0" preFractionAlong="0.5" postSegmentId="0" postFractionAlong="0.5"/>
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</projection>
<projection id="IT_L4_IT_L5A" presynapticPopulation="IT_L4" postsynapticPopulation="IT_L5A" synapse="AMPA_syn">
<connection id="0" preCellId="../IT_L4/0/HHCell" postCellId="../IT_L5A/30/HHCell" preSegmentId="0" preFractionAlong="0.5" postSegmentId="0" postFractionAlong="0.5"/>
<connection id="1" preCellId="../IT_L4/0/HHCell" postCellId="../IT_L5A/11/HHCell" preSegmentId="0" preFractionAlong="0.5" postSegmentId="0" postFractionAlong="0.5"/>
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</projection>
<projection id="SOM_L5_PT_L5B" presynapticPopulation="SOM_L5" postsynapticPopulation="PT_L5B" synapse="AMPA_syn">
<connection id="0" preCellId="../SOM_L5/2/HHCell" postCellId="../PT_L5B/17/HHCell" preSegmentId="0" preFractionAlong="0.5" postSegmentId="0" postFractionAlong="0.5"/>
<connection id="1" preCellId="../SOM_L5/3/HHCell" postCellId="../PT_L5B/34/HHCell" preSegmentId="0" preFractionAlong="0.5" postSegmentId="0" postFractionAlong="0.5"/>
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</projection>
<projection id="PT_L5B_IT_L6" presynapticPopulation="PT_L5B" postsynapticPopulation="IT_L6" synapse="AMPA_syn">
<connection id="0" preCellId="../PT_L5B/3/HHCell" postCellId="../IT_L6/27/HHCell" preSegmentId="0" preFractionAlong="0.5" postSegmentId="0" postFractionAlong="0.5"/>
<connection id="1" preCellId="../PT_L5B/4/HHCell" postCellId="../IT_L6/17/HHCell" preSegmentId="0" preFractionAlong="0.5" postSegmentId="0" postFractionAlong="0.5"/>
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</projection>
<projection id="SOM_L23_PV_L23" presynapticPopulation="SOM_L23" postsynapticPopulation="PV_L23" synapse="GABAA">
<connection id="0" preCellId="../SOM_L23/0/HHCell" postCellId="../PV_L23/6/HHCell" preSegmentId="0" preFractionAlong="0.5" postSegmentId="0" postFractionAlong="0.5"/>
<connection id="1" preCellId="../SOM_L23/0/HHCell" postCellId="../PV_L23/2/HHCell" preSegmentId="0" preFractionAlong="0.5" postSegmentId="0" postFractionAlong="0.5"/>
</projection>
<projection id="PV_L23_IT_L23" presynapticPopulation="PV_L23" postsynapticPopulation="IT_L23" synapse="AMPA_syn">
<connection id="0" preCellId="../PV_L23/0/HHCell" postCellId="../IT_L23/8/HHCell" preSegmentId="0" preFractionAlong="0.5" postSegmentId="0" postFractionAlong="0.5"/>
<connection id="1" preCellId="../PV_L23/0/HHCell" postCellId="../IT_L23/16/HHCell" preSegmentId="0" preFractionAlong="0.5" postSegmentId="0" postFractionAlong="0.5"/>
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</projection>
<projection id="IT_L23_SOM_L23" presynapticPopulation="IT_L23" postsynapticPopulation="SOM_L23" synapse="GABAB">
<connection id="0" preCellId="../IT_L23/3/HHCell" postCellId="../SOM_L23/8/HHCell" preSegmentId="0" preFractionAlong="0.5" postSegmentId="0" postFractionAlong="0.5"/>
<connection id="1" preCellId="../IT_L23/6/HHCell" postCellId="../SOM_L23/4/HHCell" preSegmentId="0" preFractionAlong="0.5" postSegmentId="0" postFractionAlong="0.5"/>
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</projection>
<projection id="CT_L6_IT_L6" presynapticPopulation="CT_L6" postsynapticPopulation="IT_L6" synapse="AMPA_syn">
<connection id="0" preCellId="../CT_L6/1/HHCell" postCellId="../IT_L6/13/HHCell" preSegmentId="0" preFractionAlong="0.5" postSegmentId="0" postFractionAlong="0.5"/>
<connection id="1" preCellId="../CT_L6/2/HHCell" postCellId="../IT_L6/9/HHCell" preSegmentId="0" preFractionAlong="0.5" postSegmentId="0" postFractionAlong="0.5"/>
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</projection>
<projection id="PV_L5_IT_L6" presynapticPopulation="PV_L5" postsynapticPopulation="IT_L6" synapse="AMPA_syn">
<connection id="0" preCellId="../PV_L5/1/HHCell" postCellId="../IT_L6/2/HHCell" preSegmentId="0" preFractionAlong="0.5" postSegmentId="0" postFractionAlong="0.5"/>
<connection id="1" preCellId="../PV_L5/1/HHCell" postCellId="../IT_L6/14/HHCell" preSegmentId="0" preFractionAlong="0.5" postSegmentId="0" postFractionAlong="0.5"/>
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</projection>
<projection id="IT_L4_IT_L6" presynapticPopulation="IT_L4" postsynapticPopulation="IT_L6" synapse="AMPA_syn">
<connection id="0" preCellId="../IT_L4/1/HHCell" postCellId="../IT_L6/23/HHCell" preSegmentId="0" preFractionAlong="0.5" postSegmentId="0" postFractionAlong="0.5"/>
<connection id="1" preCellId="../IT_L4/1/HHCell" postCellId="../IT_L6/19/HHCell" preSegmentId="0" preFractionAlong="0.5" postSegmentId="0" postFractionAlong="0.5"/>
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</projection>
<projection id="PV_L6_CT_L6" presynapticPopulation="PV_L6" postsynapticPopulation="CT_L6" synapse="AMPA_syn">
<connection id="0" preCellId="../PV_L6/0/HHCell" postCellId="../CT_L6/2/HHCell" preSegmentId="0" preFractionAlong="0.5" postSegmentId="0" postFractionAlong="0.5"/>
<connection id="1" preCellId="../PV_L6/3/HHCell" postCellId="../CT_L6/25/HHCell" preSegmentId="0" preFractionAlong="0.5" postSegmentId="0" postFractionAlong="0.5"/>
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</projection>
<projection id="IT_L5A_IT_L5A" presynapticPopulation="IT_L5A" postsynapticPopulation="IT_L5A" synapse="AMPA_syn">
<connection id="0" preCellId="../IT_L5A/0/HHCell" postCellId="../IT_L5A/5/HHCell" preSegmentId="0" preFractionAlong="0.5" postSegmentId="0" postFractionAlong="0.5"/>
<connection id="1" preCellId="../IT_L5A/0/HHCell" postCellId="../IT_L5A/20/HHCell" preSegmentId="0" preFractionAlong="0.5" postSegmentId="0" postFractionAlong="0.5"/>
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</projection>
<projection id="PV_L23_SOM_L23" presynapticPopulation="PV_L23" postsynapticPopulation="SOM_L23" synapse="GABAB">
<connection id="0" preCellId="../PV_L23/0/HHCell" postCellId="../SOM_L23/3/HHCell" preSegmentId="0" preFractionAlong="0.5" postSegmentId="0" postFractionAlong="0.5"/>
<connection id="1" preCellId="../PV_L23/2/HHCell" postCellId="../SOM_L23/6/HHCell" preSegmentId="0" preFractionAlong="0.5" postSegmentId="0" postFractionAlong="0.5"/>
<connection id="2" preCellId="../PV_L23/5/HHCell" postCellId="../SOM_L23/8/HHCell" preSegmentId="0" preFractionAlong="0.5" postSegmentId="0" postFractionAlong="0.5"/>
</projection>
<projection id="SOM_L5_IT_L5A" presynapticPopulation="SOM_L5" postsynapticPopulation="IT_L5A" synapse="AMPA_syn">
<connection id="0" preCellId="../SOM_L5/1/HHCell" postCellId="../IT_L5A/11/HHCell" preSegmentId="0" preFractionAlong="0.5" postSegmentId="0" postFractionAlong="0.5"/>
<connection id="1" preCellId="../SOM_L5/2/HHCell" postCellId="../IT_L5A/31/HHCell" preSegmentId="0" preFractionAlong="0.5" postSegmentId="0" postFractionAlong="0.5"/>
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</projection>
<projection id="IT_L6_PT_L5B" presynapticPopulation="IT_L6" postsynapticPopulation="PT_L5B" synapse="AMPA_syn">
<connection id="0" preCellId="../IT_L6/17/HHCell" postCellId="../PT_L5B/30/HHCell" preSegmentId="0" preFractionAlong="0.5" postSegmentId="0" postFractionAlong="0.5"/>
<connection id="1" preCellId="../IT_L6/31/HHCell" postCellId="../PT_L5B/35/HHCell" preSegmentId="0" preFractionAlong="0.5" postSegmentId="0" postFractionAlong="0.5"/>
</projection>
<projection id="PV_L23_IT_L5A" presynapticPopulation="PV_L23" postsynapticPopulation="IT_L5A" synapse="AMPA_syn">
<connection id="0" preCellId="../PV_L23/2/HHCell" postCellId="../IT_L5A/30/HHCell" preSegmentId="0" preFractionAlong="0.5" postSegmentId="0" postFractionAlong="0.5"/>
<connection id="1" preCellId="../PV_L23/3/HHCell" postCellId="../IT_L5A/0/HHCell" preSegmentId="0" preFractionAlong="0.5" postSegmentId="0" postFractionAlong="0.5"/>
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</projection>
<projection id="IT_L6_IT_L6" presynapticPopulation="IT_L6" postsynapticPopulation="IT_L6" synapse="AMPA_syn">
<connection id="0" preCellId="../IT_L6/0/HHCell" postCellId="../IT_L6/1/HHCell" preSegmentId="0" preFractionAlong="0.5" postSegmentId="0" postFractionAlong="0.5"/>
<connection id="1" preCellId="../IT_L6/1/HHCell" postCellId="../IT_L6/7/HHCell" preSegmentId="0" preFractionAlong="0.5" postSegmentId="0" postFractionAlong="0.5"/>
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</projection>
<projection id="SOM_L23_IT_L23" presynapticPopulation="SOM_L23" postsynapticPopulation="IT_L23" synapse="AMPA_syn">
<connection id="0" preCellId="../SOM_L23/0/HHCell" postCellId="../IT_L23/8/HHCell" preSegmentId="0" preFractionAlong="0.5" postSegmentId="0" postFractionAlong="0.5"/>
<connection id="1" preCellId="../SOM_L23/0/HHCell" postCellId="../IT_L23/51/HHCell" preSegmentId="0" preFractionAlong="0.5" postSegmentId="0" postFractionAlong="0.5"/>
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</projection>
<projection id="IT_L5A_CT_L6" presynapticPopulation="IT_L5A" postsynapticPopulation="CT_L6" synapse="AMPA_syn">
<connection id="0" preCellId="../IT_L5A/0/HHCell" postCellId="../CT_L6/26/HHCell" preSegmentId="0" preFractionAlong="0.5" postSegmentId="0" postFractionAlong="0.5"/>
<connection id="1" preCellId="../IT_L5A/1/HHCell" postCellId="../CT_L6/14/HHCell" preSegmentId="0" preFractionAlong="0.5" postSegmentId="0" postFractionAlong="0.5"/>
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</projection>
<projection id="PV_L5_CT_L6" presynapticPopulation="PV_L5" postsynapticPopulation="CT_L6" synapse="AMPA_syn">
<connection id="0" preCellId="../PV_L5/1/HHCell" postCellId="../CT_L6/24/HHCell" preSegmentId="0" preFractionAlong="0.5" postSegmentId="0" postFractionAlong="0.5"/>
<connection id="1" preCellId="../PV_L5/1/HHCell" postCellId="../CT_L6/29/HHCell" preSegmentId="0" preFractionAlong="0.5" postSegmentId="0" postFractionAlong="0.5"/>
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</projection>
<projection id="IT_L6_IT_L5A" presynapticPopulation="IT_L6" postsynapticPopulation="IT_L5A" synapse="AMPA_syn">
<connection id="0" preCellId="../IT_L6/5/HHCell" postCellId="../IT_L5A/16/HHCell" preSegmentId="0" preFractionAlong="0.5" postSegmentId="0" postFractionAlong="0.5"/>
<connection id="1" preCellId="../IT_L6/6/HHCell" postCellId="../IT_L5A/11/HHCell" preSegmentId="0" preFractionAlong="0.5" postSegmentId="0" postFractionAlong="0.5"/>
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</projection>
<projection id="SOM_L23_PT_L5B" presynapticPopulation="SOM_L23" postsynapticPopulation="PT_L5B" synapse="AMPA_syn">
<connection id="0" preCellId="../SOM_L23/1/HHCell" postCellId="../PT_L5B/19/HHCell" preSegmentId="0" preFractionAlong="0.5" postSegmentId="0" postFractionAlong="0.5"/>
<connection id="1" preCellId="../SOM_L23/2/HHCell" postCellId="../PT_L5B/35/HHCell" preSegmentId="0" preFractionAlong="0.5" postSegmentId="0" postFractionAlong="0.5"/>
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</projection>
<projection id="IT_L6_IT_L4" presynapticPopulation="IT_L6" postsynapticPopulation="IT_L4" synapse="AMPA_syn">
<connection id="0" preCellId="../IT_L6/23/HHCell" postCellId="../IT_L4/30/HHCell" preSegmentId="0" preFractionAlong="0.5" postSegmentId="0" postFractionAlong="0.5"/>
</projection>
<projection id="IT_L5B_PT_L5B" presynapticPopulation="IT_L5B" postsynapticPopulation="PT_L5B" synapse="AMPA_syn">
<connection id="0" preCellId="../IT_L5B/1/HHCell" postCellId="../PT_L5B/7/HHCell" preSegmentId="0" preFractionAlong="0.5" postSegmentId="0" postFractionAlong="0.5"/>
<connection id="1" preCellId="../IT_L5B/2/HHCell" postCellId="../PT_L5B/25/HHCell" preSegmentId="0" preFractionAlong="0.5" postSegmentId="0" postFractionAlong="0.5"/>
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</projection>
<projection id="SOM_L6_IT_L5B" presynapticPopulation="SOM_L6" postsynapticPopulation="IT_L5B" synapse="AMPA_syn">
<connection id="0" preCellId="../SOM_L6/0/HHCell" postCellId="../IT_L5B/39/HHCell" preSegmentId="0" preFractionAlong="0.5" postSegmentId="0" postFractionAlong="0.5"/>
<connection id="1" preCellId="../SOM_L6/2/HHCell" postCellId="../IT_L5B/34/HHCell" preSegmentId="0" preFractionAlong="0.5" postSegmentId="0" postFractionAlong="0.5"/>
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</projection>
<projection id="IT_L5B_CT_L6" presynapticPopulation="IT_L5B" postsynapticPopulation="CT_L6" synapse="AMPA_syn">
<connection id="0" preCellId="../IT_L5B/0/HHCell" postCellId="../CT_L6/37/HHCell" preSegmentId="0" preFractionAlong="0.5" postSegmentId="0" postFractionAlong="0.5"/>
<connection id="1" preCellId="../IT_L5B/1/HHCell" postCellId="../CT_L6/33/HHCell" preSegmentId="0" preFractionAlong="0.5" postSegmentId="0" postFractionAlong="0.5"/>
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</projection>
<projection id="SOM_L23_SOM_L23" presynapticPopulation="SOM_L23" postsynapticPopulation="SOM_L23" synapse="GABAB">
<connection id="0" preCellId="../SOM_L23/3/HHCell" postCellId="../SOM_L23/0/HHCell" preSegmentId="0" preFractionAlong="0.5" postSegmentId="0" postFractionAlong="0.5"/>
<connection id="1" preCellId="../SOM_L23/5/HHCell" postCellId="../SOM_L23/4/HHCell" preSegmentId="0" preFractionAlong="0.5" postSegmentId="0" postFractionAlong="0.5"/>
<connection id="2" preCellId="../SOM_L23/7/HHCell" postCellId="../SOM_L23/5/HHCell" preSegmentId="0" preFractionAlong="0.5" postSegmentId="0" postFractionAlong="0.5"/>
</projection>
<projection id="IT_L23_IT_L23" presynapticPopulation="IT_L23" postsynapticPopulation="IT_L23" synapse="AMPA_syn">
<connection id="0" preCellId="../IT_L23/1/HHCell" postCellId="../IT_L23/2/HHCell" preSegmentId="0" preFractionAlong="0.5" postSegmentId="0" postFractionAlong="0.5"/>
<connection id="1" preCellId="../IT_L23/1/HHCell" postCellId="../IT_L23/11/HHCell" preSegmentId="0" preFractionAlong="0.5" postSegmentId="0" postFractionAlong="0.5"/>
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</projection>
<projection id="SOM_L5_CT_L6" presynapticPopulation="SOM_L5" postsynapticPopulation="CT_L6" synapse="AMPA_syn">
<connection id="0" preCellId="../SOM_L5/0/HHCell" postCellId="../CT_L6/21/HHCell" preSegmentId="0" preFractionAlong="0.5" postSegmentId="0" postFractionAlong="0.5"/>
<connection id="1" preCellId="../SOM_L5/1/HHCell" postCellId="../CT_L6/29/HHCell" preSegmentId="0" preFractionAlong="0.5" postSegmentId="0" postFractionAlong="0.5"/>
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</projection>
<projection id="IT_L4_CT_L6" presynapticPopulation="IT_L4" postsynapticPopulation="CT_L6" synapse="AMPA_syn">
<connection id="0" preCellId="../IT_L4/0/HHCell" postCellId="../CT_L6/16/HHCell" preSegmentId="0" preFractionAlong="0.5" postSegmentId="0" postFractionAlong="0.5"/>
<connection id="1" preCellId="../IT_L4/1/HHCell" postCellId="../CT_L6/21/HHCell" preSegmentId="0" preFractionAlong="0.5" postSegmentId="0" postFractionAlong="0.5"/>
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</projection>
<projection id="IT_L5B_IT_L6" presynapticPopulation="IT_L5B" postsynapticPopulation="IT_L6" synapse="AMPA_syn">
<connection id="0" preCellId="../IT_L5B/1/HHCell" postCellId="../IT_L6/8/HHCell" preSegmentId="0" preFractionAlong="0.5" postSegmentId="0" postFractionAlong="0.5"/>
<connection id="1" preCellId="../IT_L5B/2/HHCell" postCellId="../IT_L6/11/HHCell" preSegmentId="0" preFractionAlong="0.5" postSegmentId="0" postFractionAlong="0.5"/>
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</projection>
<projection id="SOM_L23_IT_L5A" presynapticPopulation="SOM_L23" postsynapticPopulation="IT_L5A" synapse="AMPA_syn">
<connection id="0" preCellId="../SOM_L23/3/HHCell" postCellId="../IT_L5A/13/HHCell" preSegmentId="0" preFractionAlong="0.5" postSegmentId="0" postFractionAlong="0.5"/>
<connection id="1" preCellId="../SOM_L23/6/HHCell" postCellId="../IT_L5A/8/HHCell" preSegmentId="0" preFractionAlong="0.5" postSegmentId="0" postFractionAlong="0.5"/>
<connection id="2" preCellId="../SOM_L23/7/HHCell" postCellId="../IT_L5A/21/HHCell" preSegmentId="0" preFractionAlong="0.5" postSegmentId="0" postFractionAlong="0.5"/>
<connection id="3" preCellId="../SOM_L23/8/HHCell" postCellId="../IT_L5A/18/HHCell" preSegmentId="0" preFractionAlong="0.5" postSegmentId="0" postFractionAlong="0.5"/>
</projection>
<projection id="SOM_L5_IT_L6" presynapticPopulation="SOM_L5" postsynapticPopulation="IT_L6" synapse="AMPA_syn">
<connection id="0" preCellId="../SOM_L5/0/HHCell" postCellId="../IT_L6/24/HHCell" preSegmentId="0" preFractionAlong="0.5" postSegmentId="0" postFractionAlong="0.5"/>
<connection id="1" preCellId="../SOM_L5/2/HHCell" postCellId="../IT_L6/10/HHCell" preSegmentId="0" preFractionAlong="0.5" postSegmentId="0" postFractionAlong="0.5"/>
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</projection>
<projection id="PT_L5B_CT_L6" presynapticPopulation="PT_L5B" postsynapticPopulation="CT_L6" synapse="AMPA_syn">
<connection id="0" preCellId="../PT_L5B/0/HHCell" postCellId="../CT_L6/17/HHCell" preSegmentId="0" preFractionAlong="0.5" postSegmentId="0" postFractionAlong="0.5"/>
<connection id="1" preCellId="../PT_L5B/0/HHCell" postCellId="../CT_L6/20/HHCell" preSegmentId="0" preFractionAlong="0.5" postSegmentId="0" postFractionAlong="0.5"/>
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</projection>
<projection id="PV_L6_IT_L5A" presynapticPopulation="PV_L6" postsynapticPopulation="IT_L5A" synapse="AMPA_syn">
<connection id="0" preCellId="../PV_L6/2/HHCell" postCellId="../IT_L5A/1/HHCell" preSegmentId="0" preFractionAlong="0.5" postSegmentId="0" postFractionAlong="0.5"/>
<connection id="1" preCellId="../PV_L6/3/HHCell" postCellId="../IT_L5A/17/HHCell" preSegmentId="0" preFractionAlong="0.5" postSegmentId="0" postFractionAlong="0.5"/>
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</projection>
<projection id="PT_L5B_IT_L5A" presynapticPopulation="PT_L5B" postsynapticPopulation="IT_L5A" synapse="AMPA_syn">
<connection id="0" preCellId="../PT_L5B/2/HHCell" postCellId="../IT_L5A/27/HHCell" preSegmentId="0" preFractionAlong="0.5" postSegmentId="0" postFractionAlong="0.5"/>
<connection id="1" preCellId="../PT_L5B/7/HHCell" postCellId="../IT_L5A/3/HHCell" preSegmentId="0" preFractionAlong="0.5" postSegmentId="0" postFractionAlong="0.5"/>
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</projection>
<projection id="IT_L5A_IT_L6" presynapticPopulation="IT_L5A" postsynapticPopulation="IT_L6" synapse="AMPA_syn">
<connection id="0" preCellId="../IT_L5A/1/HHCell" postCellId="../IT_L6/28/HHCell" preSegmentId="0" preFractionAlong="0.5" postSegmentId="0" postFractionAlong="0.5"/>
<connection id="1" preCellId="../IT_L5A/1/HHCell" postCellId="../IT_L6/20/HHCell" preSegmentId="0" preFractionAlong="0.5" postSegmentId="0" postFractionAlong="0.5"/>
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</projection>
<projection id="IT_L4_IT_L23" presynapticPopulation="IT_L4" postsynapticPopulation="IT_L23" synapse="AMPA_syn">
<connection id="0" preCellId="../IT_L4/0/HHCell" postCellId="../IT_L23/40/HHCell" preSegmentId="0" preFractionAlong="0.5" postSegmentId="0" postFractionAlong="0.5"/>
<connection id="1" preCellId="../IT_L4/0/HHCell" postCellId="../IT_L23/2/HHCell" preSegmentId="0" preFractionAlong="0.5" postSegmentId="0" postFractionAlong="0.5"/>
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</projection>
<projection id="SOM_L6_IT_L5A" presynapticPopulation="SOM_L6" postsynapticPopulation="IT_L5A" synapse="AMPA_syn">
<connection id="0" preCellId="../SOM_L6/1/HHCell" postCellId="../IT_L5A/28/HHCell" preSegmentId="0" preFractionAlong="0.5" postSegmentId="0" postFractionAlong="0.5"/>
<connection id="1" preCellId="../SOM_L6/4/HHCell" postCellId="../IT_L5A/9/HHCell" preSegmentId="0" preFractionAlong="0.5" postSegmentId="0" postFractionAlong="0.5"/>
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</projection>
<projection id="PT_L5B_PT_L5B" presynapticPopulation="PT_L5B" postsynapticPopulation="PT_L5B" synapse="AMPA_syn">
<connection id="0" preCellId="../PT_L5B/2/HHCell" postCellId="../PT_L5B/33/HHCell" preSegmentId="0" preFractionAlong="0.5" postSegmentId="0" postFractionAlong="0.5"/>
<connection id="1" preCellId="../PT_L5B/4/HHCell" postCellId="../PT_L5B/2/HHCell" preSegmentId="0" preFractionAlong="0.5" postSegmentId="0" postFractionAlong="0.5"/>
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</projection>
<projection id="PT_L5B_IT_L5B" presynapticPopulation="PT_L5B" postsynapticPopulation="IT_L5B" synapse="AMPA_syn">
<connection id="0" preCellId="../PT_L5B/0/HHCell" postCellId="../IT_L5B/18/HHCell" preSegmentId="0" preFractionAlong="0.5" postSegmentId="0" postFractionAlong="0.5"/>
<connection id="1" preCellId="../PT_L5B/2/HHCell" postCellId="../IT_L5B/6/HHCell" preSegmentId="0" preFractionAlong="0.5" postSegmentId="0" postFractionAlong="0.5"/>
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</projection>
<projection id="PV_L6_IT_L4" presynapticPopulation="PV_L6" postsynapticPopulation="IT_L4" synapse="AMPA_syn">
<connection id="0" preCellId="../PV_L6/2/HHCell" postCellId="../IT_L4/5/HHCell" preSegmentId="0" preFractionAlong="0.5" postSegmentId="0" postFractionAlong="0.5"/>
<connection id="1" preCellId="../PV_L6/3/HHCell" postCellId="../IT_L4/2/HHCell" preSegmentId="0" preFractionAlong="0.5" postSegmentId="0" postFractionAlong="0.5"/>
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</projection>
<projection id="PV_L6_IT_L5B" presynapticPopulation="PV_L6" postsynapticPopulation="IT_L5B" synapse="AMPA_syn">
<connection id="0" preCellId="../PV_L6/1/HHCell" postCellId="../IT_L5B/19/HHCell" preSegmentId="0" preFractionAlong="0.5" postSegmentId="0" postFractionAlong="0.5"/>
<connection id="1" preCellId="../PV_L6/7/HHCell" postCellId="../IT_L5B/6/HHCell" preSegmentId="0" preFractionAlong="0.5" postSegmentId="0" postFractionAlong="0.5"/>
<connection id="2" preCellId="../PV_L6/8/HHCell" postCellId="../IT_L5B/7/HHCell" preSegmentId="0" preFractionAlong="0.5" postSegmentId="0" postFractionAlong="0.5"/>
<connection id="3" preCellId="../PV_L6/8/HHCell" postCellId="../IT_L5B/25/HHCell" preSegmentId="0" preFractionAlong="0.5" postSegmentId="0" postFractionAlong="0.5"/>
</projection>
<projection id="CT_L6_IT_L5B" presynapticPopulation="CT_L6" postsynapticPopulation="IT_L5B" synapse="AMPA_syn">
<connection id="0" preCellId="../CT_L6/0/HHCell" postCellId="../IT_L5B/4/HHCell" preSegmentId="0" preFractionAlong="0.5" postSegmentId="0" postFractionAlong="0.5"/>
<connection id="1" preCellId="../CT_L6/0/HHCell" postCellId="../IT_L5B/35/HHCell" preSegmentId="0" preFractionAlong="0.5" postSegmentId="0" postFractionAlong="0.5"/>
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</projection>
<projection id="PV_L23_PV_L23" presynapticPopulation="PV_L23" postsynapticPopulation="PV_L23" synapse="GABAA">
<connection id="0" preCellId="../PV_L23/0/HHCell" postCellId="../PV_L23/4/HHCell" preSegmentId="0" preFractionAlong="0.5" postSegmentId="0" postFractionAlong="0.5"/>
<connection id="1" preCellId="../PV_L23/1/HHCell" postCellId="../PV_L23/5/HHCell" preSegmentId="0" preFractionAlong="0.5" postSegmentId="0" postFractionAlong="0.5"/>
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</projection>
<projection id="SOM_L6_IT_L4" presynapticPopulation="SOM_L6" postsynapticPopulation="IT_L4" synapse="AMPA_syn">
<connection id="0" preCellId="../SOM_L6/1/HHCell" postCellId="../IT_L4/24/HHCell" preSegmentId="0" preFractionAlong="0.5" postSegmentId="0" postFractionAlong="0.5"/>
<connection id="1" preCellId="../SOM_L6/1/HHCell" postCellId="../IT_L4/31/HHCell" preSegmentId="0" preFractionAlong="0.5" postSegmentId="0" postFractionAlong="0.5"/>
</projection>
<projection id="IT_L5A_SOM_L5" presynapticPopulation="IT_L5A" postsynapticPopulation="SOM_L5" synapse="GABAB">
<connection id="0" preCellId="../IT_L5A/2/HHCell" postCellId="../SOM_L5/15/HHCell" preSegmentId="0" preFractionAlong="0.5" postSegmentId="0" postFractionAlong="0.5"/>
<connection id="1" preCellId="../IT_L5A/3/HHCell" postCellId="../SOM_L5/11/HHCell" preSegmentId="0" preFractionAlong="0.5" postSegmentId="0" postFractionAlong="0.5"/>
<connection id="2" preCellId="../IT_L5A/11/HHCell" postCellId="../SOM_L5/11/HHCell" preSegmentId="0" preFractionAlong="0.5" postSegmentId="0" postFractionAlong="0.5"/>
</projection>
<projection id="IT_L4_PT_L5B" presynapticPopulation="IT_L4" postsynapticPopulation="PT_L5B" synapse="AMPA_syn">
<connection id="0" preCellId="../IT_L4/1/HHCell" postCellId="../PT_L5B/12/HHCell" preSegmentId="0" preFractionAlong="0.5" postSegmentId="0" postFractionAlong="0.5"/>
<connection id="1" preCellId="../IT_L4/1/HHCell" postCellId="../PT_L5B/26/HHCell" preSegmentId="0" preFractionAlong="0.5" postSegmentId="0" postFractionAlong="0.5"/>
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</projection>
<projection id="PV_L23_IT_L4" presynapticPopulation="PV_L23" postsynapticPopulation="IT_L4" synapse="AMPA_syn">
<connection id="0" preCellId="../PV_L23/0/HHCell" postCellId="../IT_L4/22/HHCell" preSegmentId="0" preFractionAlong="0.5" postSegmentId="0" postFractionAlong="0.5"/>
<connection id="1" preCellId="../PV_L23/1/HHCell" postCellId="../IT_L4/31/HHCell" preSegmentId="0" preFractionAlong="0.5" postSegmentId="0" postFractionAlong="0.5"/>
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</projection>
<projection id="PT_L5B_PV_L5" presynapticPopulation="PT_L5B" postsynapticPopulation="PV_L5" synapse="GABAA">
<connection id="0" preCellId="../PT_L5B/4/HHCell" postCellId="../PV_L5/3/HHCell" preSegmentId="0" preFractionAlong="0.5" postSegmentId="0" postFractionAlong="0.5"/>
<connection id="1" preCellId="../PT_L5B/5/HHCell" postCellId="../PV_L5/5/HHCell" preSegmentId="0" preFractionAlong="0.5" postSegmentId="0" postFractionAlong="0.5"/>
<connection id="2" preCellId="../PT_L5B/27/HHCell" postCellId="../PV_L5/15/HHCell" preSegmentId="0" preFractionAlong="0.5" postSegmentId="0" postFractionAlong="0.5"/>
</projection>
<projection id="CT_L6_IT_L5A" presynapticPopulation="CT_L6" postsynapticPopulation="IT_L5A" synapse="AMPA_syn">
<connection id="0" preCellId="../CT_L6/0/HHCell" postCellId="../IT_L5A/12/HHCell" preSegmentId="0" preFractionAlong="0.5" postSegmentId="0" postFractionAlong="0.5"/>
<connection id="1" preCellId="../CT_L6/0/HHCell" postCellId="../IT_L5A/24/HHCell" preSegmentId="0" preFractionAlong="0.5" postSegmentId="0" postFractionAlong="0.5"/>
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</projection>
<projection id="CT_L6_CT_L6" presynapticPopulation="CT_L6" postsynapticPopulation="CT_L6" synapse="AMPA_syn">
<connection id="0" preCellId="../CT_L6/0/HHCell" postCellId="../CT_L6/35/HHCell" preSegmentId="0" preFractionAlong="0.5" postSegmentId="0" postFractionAlong="0.5"/>
<connection id="1" preCellId="../CT_L6/1/HHCell" postCellId="../CT_L6/29/HHCell" preSegmentId="0" preFractionAlong="0.5" postSegmentId="0" postFractionAlong="0.5"/>
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</projection>
<projection id="SOM_L23_IT_L4" presynapticPopulation="SOM_L23" postsynapticPopulation="IT_L4" synapse="AMPA_syn">
<connection id="0" preCellId="../SOM_L23/0/HHCell" postCellId="../IT_L4/12/HHCell" preSegmentId="0" preFractionAlong="0.5" postSegmentId="0" postFractionAlong="0.5"/>
<connection id="1" preCellId="../SOM_L23/4/HHCell" postCellId="../IT_L4/1/HHCell" preSegmentId="0" preFractionAlong="0.5" postSegmentId="0" postFractionAlong="0.5"/>
<connection id="2" preCellId="../SOM_L23/7/HHCell" postCellId="../IT_L4/30/HHCell" preSegmentId="0" preFractionAlong="0.5" postSegmentId="0" postFractionAlong="0.5"/>
<connection id="3" preCellId="../SOM_L23/8/HHCell" postCellId="../IT_L4/3/HHCell" preSegmentId="0" preFractionAlong="0.5" postSegmentId="0" postFractionAlong="0.5"/>
</projection>
<projection id="PV_L5_SOM_L5" presynapticPopulation="PV_L5" postsynapticPopulation="SOM_L5" synapse="GABAB">
<connection id="0" preCellId="../PV_L5/3/HHCell" postCellId="../SOM_L5/2/HHCell" preSegmentId="0" preFractionAlong="0.5" postSegmentId="0" postFractionAlong="0.5"/>
<connection id="1" preCellId="../PV_L5/12/HHCell" postCellId="../SOM_L5/11/HHCell" preSegmentId="0" preFractionAlong="0.5" postSegmentId="0" postFractionAlong="0.5"/>
</projection>
<projection id="CT_L6_IT_L4" presynapticPopulation="CT_L6" postsynapticPopulation="IT_L4" synapse="AMPA_syn">
<connection id="0" preCellId="../CT_L6/0/HHCell" postCellId="../IT_L4/18/HHCell" preSegmentId="0" preFractionAlong="0.5" postSegmentId="0" postFractionAlong="0.5"/>
</projection>
<projection id="PT_L5B_IT_L23" presynapticPopulation="PT_L5B" postsynapticPopulation="IT_L23" synapse="AMPA_syn">
<connection id="0" preCellId="../PT_L5B/0/HHCell" postCellId="../IT_L23/0/HHCell" preSegmentId="0" preFractionAlong="0.5" postSegmentId="0" postFractionAlong="0.5"/>
<connection id="1" preCellId="../PT_L5B/0/HHCell" postCellId="../IT_L23/24/HHCell" preSegmentId="0" preFractionAlong="0.5" postSegmentId="0" postFractionAlong="0.5"/>
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</projection>
<projection id="PT_L5B_IT_L4" presynapticPopulation="PT_L5B" postsynapticPopulation="IT_L4" synapse="AMPA_syn">
<connection id="0" preCellId="../PT_L5B/0/HHCell" postCellId="../IT_L4/27/HHCell" preSegmentId="0" preFractionAlong="0.5" postSegmentId="0" postFractionAlong="0.5"/>
<connection id="1" preCellId="../PT_L5B/0/HHCell" postCellId="../IT_L4/15/HHCell" preSegmentId="0" preFractionAlong="0.5" postSegmentId="0" postFractionAlong="0.5"/>
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</projection>
<projection id="IT_L5B_IT_L23" presynapticPopulation="IT_L5B" postsynapticPopulation="IT_L23" synapse="AMPA_syn">
<connection id="0" preCellId="../IT_L5B/1/HHCell" postCellId="../IT_L23/57/HHCell" preSegmentId="0" preFractionAlong="0.5" postSegmentId="0" postFractionAlong="0.5"/>
<connection id="1" preCellId="../IT_L5B/1/HHCell" postCellId="../IT_L23/47/HHCell" preSegmentId="0" preFractionAlong="0.5" postSegmentId="0" postFractionAlong="0.5"/>
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</projection>
<projection id="SOM_L6_CT_L6" presynapticPopulation="SOM_L6" postsynapticPopulation="CT_L6" synapse="AMPA_syn">
<connection id="0" preCellId="../SOM_L6/0/HHCell" postCellId="../CT_L6/36/HHCell" preSegmentId="0" preFractionAlong="0.5" postSegmentId="0" postFractionAlong="0.5"/>
<connection id="1" preCellId="../SOM_L6/1/HHCell" postCellId="../CT_L6/12/HHCell" preSegmentId="0" preFractionAlong="0.5" postSegmentId="0" postFractionAlong="0.5"/>
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</projection>
<projection id="PV_L5_IT_L23" presynapticPopulation="PV_L5" postsynapticPopulation="IT_L23" synapse="AMPA_syn">
<connection id="0" preCellId="../PV_L5/0/HHCell" postCellId="../IT_L23/46/HHCell" preSegmentId="0" preFractionAlong="0.5" postSegmentId="0" postFractionAlong="0.5"/>
<connection id="1" preCellId="../PV_L5/1/HHCell" postCellId="../IT_L23/23/HHCell" preSegmentId="0" preFractionAlong="0.5" postSegmentId="0" postFractionAlong="0.5"/>
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</projection>
<projection id="IT_L5A_PT_L5B" presynapticPopulation="IT_L5A" postsynapticPopulation="PT_L5B" synapse="AMPA_syn">
<connection id="0" preCellId="../IT_L5A/0/HHCell" postCellId="../PT_L5B/15/HHCell" preSegmentId="0" preFractionAlong="0.5" postSegmentId="0" postFractionAlong="0.5"/>
<connection id="1" preCellId="../IT_L5A/0/HHCell" postCellId="../PT_L5B/27/HHCell" preSegmentId="0" preFractionAlong="0.5" postSegmentId="0" postFractionAlong="0.5"/>
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</projection>
<projection id="PT_L5B_SOM_L5" presynapticPopulation="PT_L5B" postsynapticPopulation="SOM_L5" synapse="GABAB">
<connection id="0" preCellId="../PT_L5B/12/HHCell" postCellId="../SOM_L5/16/HHCell" preSegmentId="0" preFractionAlong="0.5" postSegmentId="0" postFractionAlong="0.5"/>
<connection id="1" preCellId="../PT_L5B/21/HHCell" postCellId="../SOM_L5/16/HHCell" preSegmentId="0" preFractionAlong="0.5" postSegmentId="0" postFractionAlong="0.5"/>
</projection>
<projection id="IT_L4_IT_L5B" presynapticPopulation="IT_L4" postsynapticPopulation="IT_L5B" synapse="AMPA_syn">
<connection id="0" preCellId="../IT_L4/0/HHCell" postCellId="../IT_L5B/2/HHCell" preSegmentId="0" preFractionAlong="0.5" postSegmentId="0" postFractionAlong="0.5"/>
<connection id="1" preCellId="../IT_L4/0/HHCell" postCellId="../IT_L5B/7/HHCell" preSegmentId="0" preFractionAlong="0.5" postSegmentId="0" postFractionAlong="0.5"/>
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</projection>
<projection id="PV_L5_IT_L5B" presynapticPopulation="PV_L5" postsynapticPopulation="IT_L5B" synapse="AMPA_syn">
<connection id="0" preCellId="../PV_L5/0/HHCell" postCellId="../IT_L5B/15/HHCell" preSegmentId="0" preFractionAlong="0.5" postSegmentId="0" postFractionAlong="0.5"/>
<connection id="1" preCellId="../PV_L5/0/HHCell" postCellId="../IT_L5B/34/HHCell" preSegmentId="0" preFractionAlong="0.5" postSegmentId="0" postFractionAlong="0.5"/>
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</projection>
<projection id="IT_L5B_PV_L5" presynapticPopulation="IT_L5B" postsynapticPopulation="PV_L5" synapse="GABAA">
<connection id="0" preCellId="../IT_L5B/3/HHCell" postCellId="../PV_L5/16/HHCell" preSegmentId="0" preFractionAlong="0.5" postSegmentId="0" postFractionAlong="0.5"/>
</projection>
<projection id="PV_L5_PV_L5" presynapticPopulation="PV_L5" postsynapticPopulation="PV_L5" synapse="GABAA">
<connection id="0" preCellId="../PV_L5/5/HHCell" postCellId="../PV_L5/15/HHCell" preSegmentId="0" preFractionAlong="0.5" postSegmentId="0" postFractionAlong="0.5"/>
<connection id="1" preCellId="../PV_L5/11/HHCell" postCellId="../PV_L5/10/HHCell" preSegmentId="0" preFractionAlong="0.5" postSegmentId="0" postFractionAlong="0.5"/>
<connection id="2" preCellId="../PV_L5/13/HHCell" postCellId="../PV_L5/10/HHCell" preSegmentId="0" preFractionAlong="0.5" postSegmentId="0" postFractionAlong="0.5"/>
</projection>
<projection id="IT_L5A_PV_L5" presynapticPopulation="IT_L5A" postsynapticPopulation="PV_L5" synapse="GABAA">
<connection id="0" preCellId="../IT_L5A/15/HHCell" postCellId="../PV_L5/15/HHCell" preSegmentId="0" preFractionAlong="0.5" postSegmentId="0" postFractionAlong="0.5"/>
<connection id="1" preCellId="../IT_L5A/18/HHCell" postCellId="../PV_L5/14/HHCell" preSegmentId="0" preFractionAlong="0.5" postSegmentId="0" postFractionAlong="0.5"/>
</projection>
<projection id="IT_L5B_IT_L5B" presynapticPopulation="IT_L5B" postsynapticPopulation="IT_L5B" synapse="AMPA_syn">
<connection id="0" preCellId="../IT_L5B/1/HHCell" postCellId="../IT_L5B/0/HHCell" preSegmentId="0" preFractionAlong="0.5" postSegmentId="0" postFractionAlong="0.5"/>
<connection id="1" preCellId="../IT_L5B/1/HHCell" postCellId="../IT_L5B/18/HHCell" preSegmentId="0" preFractionAlong="0.5" postSegmentId="0" postFractionAlong="0.5"/>
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</projection>
<projection id="PV_L23_IT_L5B" presynapticPopulation="PV_L23" postsynapticPopulation="IT_L5B" synapse="AMPA_syn">
<connection id="0" preCellId="../PV_L23/0/HHCell" postCellId="../IT_L5B/28/HHCell" preSegmentId="0" preFractionAlong="0.5" postSegmentId="0" postFractionAlong="0.5"/>
<connection id="1" preCellId="../PV_L23/1/HHCell" postCellId="../IT_L5B/11/HHCell" preSegmentId="0" preFractionAlong="0.5" postSegmentId="0" postFractionAlong="0.5"/>
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</projection>
<projection id="IT_L4_SOM_L5" presynapticPopulation="IT_L4" postsynapticPopulation="SOM_L5" synapse="GABAB">
<connection id="0" preCellId="../IT_L4/14/HHCell" postCellId="../SOM_L5/12/HHCell" preSegmentId="0" preFractionAlong="0.5" postSegmentId="0" postFractionAlong="0.5"/>
<connection id="1" preCellId="../IT_L4/19/HHCell" postCellId="../SOM_L5/16/HHCell" preSegmentId="0" preFractionAlong="0.5" postSegmentId="0" postFractionAlong="0.5"/>
</projection>
<projection id="IT_L5A_IT_L23" presynapticPopulation="IT_L5A" postsynapticPopulation="IT_L23" synapse="AMPA_syn">
<connection id="0" preCellId="../IT_L5A/0/HHCell" postCellId="../IT_L23/41/HHCell" preSegmentId="0" preFractionAlong="0.5" postSegmentId="0" postFractionAlong="0.5"/>
<connection id="1" preCellId="../IT_L5A/0/HHCell" postCellId="../IT_L23/38/HHCell" preSegmentId="0" preFractionAlong="0.5" postSegmentId="0" postFractionAlong="0.5"/>
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</projection>
<projection id="IT_L23_PV_L23" presynapticPopulation="IT_L23" postsynapticPopulation="PV_L23" synapse="GABAA">
<connection id="0" preCellId="../IT_L23/3/HHCell" postCellId="../PV_L23/4/HHCell" preSegmentId="0" preFractionAlong="0.5" postSegmentId="0" postFractionAlong="0.5"/>
<connection id="1" preCellId="../IT_L23/8/HHCell" postCellId="../PV_L23/6/HHCell" preSegmentId="0" preFractionAlong="0.5" postSegmentId="0" postFractionAlong="0.5"/>
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</projection>
<projection id="SOM_L23_IT_L5B" presynapticPopulation="SOM_L23" postsynapticPopulation="IT_L5B" synapse="AMPA_syn">
<connection id="0" preCellId="../SOM_L23/2/HHCell" postCellId="../IT_L5B/34/HHCell" preSegmentId="0" preFractionAlong="0.5" postSegmentId="0" postFractionAlong="0.5"/>
<connection id="1" preCellId="../SOM_L23/3/HHCell" postCellId="../IT_L5B/25/HHCell" preSegmentId="0" preFractionAlong="0.5" postSegmentId="0" postFractionAlong="0.5"/>
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</projection>
<projection id="IT_L6_IT_L5B" presynapticPopulation="IT_L6" postsynapticPopulation="IT_L5B" synapse="AMPA_syn">
<connection id="0" preCellId="../IT_L6/0/HHCell" postCellId="../IT_L5B/23/HHCell" preSegmentId="0" preFractionAlong="0.5" postSegmentId="0" postFractionAlong="0.5"/>
<connection id="1" preCellId="../IT_L6/1/HHCell" postCellId="../IT_L5B/7/HHCell" preSegmentId="0" preFractionAlong="0.5" postSegmentId="0" postFractionAlong="0.5"/>
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</projection>
<projection id="IT_L23_IT_L5B" presynapticPopulation="IT_L23" postsynapticPopulation="IT_L5B" synapse="AMPA_syn">
<connection id="0" preCellId="../IT_L23/0/HHCell" postCellId="../IT_L5B/17/HHCell" preSegmentId="0" preFractionAlong="0.5" postSegmentId="0" postFractionAlong="0.5"/>
<connection id="1" preCellId="../IT_L23/9/HHCell" postCellId="../IT_L5B/11/HHCell" preSegmentId="0" preFractionAlong="0.5" postSegmentId="0" postFractionAlong="0.5"/>
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</projection>
<projection id="PV_L5_IT_L4" presynapticPopulation="PV_L5" postsynapticPopulation="IT_L4" synapse="AMPA_syn">
<connection id="0" preCellId="../PV_L5/0/HHCell" postCellId="../IT_L4/28/HHCell" preSegmentId="0" preFractionAlong="0.5" postSegmentId="0" postFractionAlong="0.5"/>
<connection id="1" preCellId="../PV_L5/0/HHCell" postCellId="../IT_L4/2/HHCell" preSegmentId="0" preFractionAlong="0.5" postSegmentId="0" postFractionAlong="0.5"/>
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</projection>
<projection id="IT_L4_IT_L4" presynapticPopulation="IT_L4" postsynapticPopulation="IT_L4" synapse="AMPA_syn">
<connection id="0" preCellId="../IT_L4/0/HHCell" postCellId="../IT_L4/30/HHCell" preSegmentId="0" preFractionAlong="0.5" postSegmentId="0" postFractionAlong="0.5"/>
<connection id="1" preCellId="../IT_L4/0/HHCell" postCellId="../IT_L4/22/HHCell" preSegmentId="0" preFractionAlong="0.5" postSegmentId="0" postFractionAlong="0.5"/>
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</projection>
<projection id="IT_L5B_IT_L4" presynapticPopulation="IT_L5B" postsynapticPopulation="IT_L4" synapse="AMPA_syn">
<connection id="0" preCellId="../IT_L5B/1/HHCell" postCellId="../IT_L4/10/HHCell" preSegmentId="0" preFractionAlong="0.5" postSegmentId="0" postFractionAlong="0.5"/>
<connection id="1" preCellId="../IT_L5B/1/HHCell" postCellId="../IT_L4/4/HHCell" preSegmentId="0" preFractionAlong="0.5" postSegmentId="0" postFractionAlong="0.5"/>
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</projection>
<projection id="PV_L23_PT_L5B" presynapticPopulation="PV_L23" postsynapticPopulation="PT_L5B" synapse="AMPA_syn">
<connection id="0" preCellId="../PV_L23/0/HHCell" postCellId="../PT_L5B/26/HHCell" preSegmentId="0" preFractionAlong="0.5" postSegmentId="0" postFractionAlong="0.5"/>
<connection id="1" preCellId="../PV_L23/0/HHCell" postCellId="../PT_L5B/1/HHCell" preSegmentId="0" preFractionAlong="0.5" postSegmentId="0" postFractionAlong="0.5"/>
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</projection>
<projection id="PV_L6_IT_L6" presynapticPopulation="PV_L6" postsynapticPopulation="IT_L6" synapse="AMPA_syn">
<connection id="0" preCellId="../PV_L6/1/HHCell" postCellId="../IT_L6/22/HHCell" preSegmentId="0" preFractionAlong="0.5" postSegmentId="0" postFractionAlong="0.5"/>
<connection id="1" preCellId="../PV_L6/1/HHCell" postCellId="../IT_L6/8/HHCell" preSegmentId="0" preFractionAlong="0.5" postSegmentId="0" postFractionAlong="0.5"/>
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</projection>
<projection id="SOM_L5_IT_L4" presynapticPopulation="SOM_L5" postsynapticPopulation="IT_L4" synapse="AMPA_syn">
<connection id="0" preCellId="../SOM_L5/0/HHCell" postCellId="../IT_L4/18/HHCell" preSegmentId="0" preFractionAlong="0.5" postSegmentId="0" postFractionAlong="0.5"/>
<connection id="1" preCellId="../SOM_L5/1/HHCell" postCellId="../IT_L4/28/HHCell" preSegmentId="0" preFractionAlong="0.5" postSegmentId="0" postFractionAlong="0.5"/>
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</projection>
<projection id="PV_L5_IT_L5A" presynapticPopulation="PV_L5" postsynapticPopulation="IT_L5A" synapse="AMPA_syn">
<connection id="0" preCellId="../PV_L5/0/HHCell" postCellId="../IT_L5A/5/HHCell" preSegmentId="0" preFractionAlong="0.5" postSegmentId="0" postFractionAlong="0.5"/>
<connection id="1" preCellId="../PV_L5/0/HHCell" postCellId="../IT_L5A/18/HHCell" preSegmentId="0" preFractionAlong="0.5" postSegmentId="0" postFractionAlong="0.5"/>
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</projection>
<projection id="PV_L5_PT_L5B" presynapticPopulation="PV_L5" postsynapticPopulation="PT_L5B" synapse="AMPA_syn">
<connection id="0" preCellId="../PV_L5/0/HHCell" postCellId="../PT_L5B/26/HHCell" preSegmentId="0" preFractionAlong="0.5" postSegmentId="0" postFractionAlong="0.5"/>
<connection id="1" preCellId="../PV_L5/0/HHCell" postCellId="../PT_L5B/30/HHCell" preSegmentId="0" preFractionAlong="0.5" postSegmentId="0" postFractionAlong="0.5"/>
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</projection>
<projection id="SOM_L5_IT_L23" presynapticPopulation="SOM_L5" postsynapticPopulation="IT_L23" synapse="AMPA_syn">
<connection id="0" preCellId="../SOM_L5/0/HHCell" postCellId="../IT_L23/59/HHCell" preSegmentId="0" preFractionAlong="0.5" postSegmentId="0" postFractionAlong="0.5"/>
<connection id="1" preCellId="../SOM_L5/0/HHCell" postCellId="../IT_L23/32/HHCell" preSegmentId="0" preFractionAlong="0.5" postSegmentId="0" postFractionAlong="0.5"/>
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</projection>
<projection id="IT_L23_IT_L4" presynapticPopulation="IT_L23" postsynapticPopulation="IT_L4" synapse="AMPA_syn">
<connection id="0" preCellId="../IT_L23/0/HHCell" postCellId="../IT_L4/18/HHCell" preSegmentId="0" preFractionAlong="0.5" postSegmentId="0" postFractionAlong="0.5"/>
<connection id="1" preCellId="../IT_L23/0/HHCell" postCellId="../IT_L4/1/HHCell" preSegmentId="0" preFractionAlong="0.5" postSegmentId="0" postFractionAlong="0.5"/>
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</projection>
<projection id="SOM_L6_IT_L6" presynapticPopulation="SOM_L6" postsynapticPopulation="IT_L6" synapse="AMPA_syn">
<connection id="0" preCellId="../SOM_L6/1/HHCell" postCellId="../IT_L6/4/HHCell" preSegmentId="0" preFractionAlong="0.5" postSegmentId="0" postFractionAlong="0.5"/>
<connection id="1" preCellId="../SOM_L6/4/HHCell" postCellId="../IT_L6/26/HHCell" preSegmentId="0" preFractionAlong="0.5" postSegmentId="0" postFractionAlong="0.5"/>
<connection id="2" preCellId="../SOM_L6/6/HHCell" postCellId="../IT_L6/12/HHCell" preSegmentId="0" preFractionAlong="0.5" postSegmentId="0" postFractionAlong="0.5"/>
<connection id="3" preCellId="../SOM_L6/6/HHCell" postCellId="../IT_L6/4/HHCell" preSegmentId="0" preFractionAlong="0.5" postSegmentId="0" postFractionAlong="0.5"/>
</projection>
<projection id="IT_L5B_SOM_L5" presynapticPopulation="IT_L5B" postsynapticPopulation="SOM_L5" synapse="GABAB">
<connection id="0" preCellId="../IT_L5B/2/HHCell" postCellId="../SOM_L5/16/HHCell" preSegmentId="0" preFractionAlong="0.5" postSegmentId="0" postFractionAlong="0.5"/>
<connection id="1" preCellId="../IT_L5B/11/HHCell" postCellId="../SOM_L5/8/HHCell" preSegmentId="0" preFractionAlong="0.5" postSegmentId="0" postFractionAlong="0.5"/>
<connection id="2" preCellId="../IT_L5B/25/HHCell" postCellId="../SOM_L5/6/HHCell" preSegmentId="0" preFractionAlong="0.5" postSegmentId="0" postFractionAlong="0.5"/>
<connection id="3" preCellId="../IT_L5B/33/HHCell" postCellId="../SOM_L5/7/HHCell" preSegmentId="0" preFractionAlong="0.5" postSegmentId="0" postFractionAlong="0.5"/>
</projection>
<projection id="IT_L5B_IT_L5A" presynapticPopulation="IT_L5B" postsynapticPopulation="IT_L5A" synapse="AMPA_syn">
<connection id="0" preCellId="../IT_L5B/5/HHCell" postCellId="../IT_L5A/26/HHCell" preSegmentId="0" preFractionAlong="0.5" postSegmentId="0" postFractionAlong="0.5"/>
<connection id="1" preCellId="../IT_L5B/7/HHCell" postCellId="../IT_L5A/34/HHCell" preSegmentId="0" preFractionAlong="0.5" postSegmentId="0" postFractionAlong="0.5"/>
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</projection>
<projection id="SOM_L5_SOM_L5" presynapticPopulation="SOM_L5" postsynapticPopulation="SOM_L5" synapse="GABAB">
<connection id="0" preCellId="../SOM_L5/2/HHCell" postCellId="../SOM_L5/7/HHCell" preSegmentId="0" preFractionAlong="0.5" postSegmentId="0" postFractionAlong="0.5"/>
</projection>
<projection id="SOM_L6_PT_L5B" presynapticPopulation="SOM_L6" postsynapticPopulation="PT_L5B" synapse="AMPA_syn">
<connection id="0" preCellId="../SOM_L6/4/HHCell" postCellId="../PT_L5B/36/HHCell" preSegmentId="0" preFractionAlong="0.5" postSegmentId="0" postFractionAlong="0.5"/>
</projection>
<projection id="SOM_L5_PV_L5" presynapticPopulation="SOM_L5" postsynapticPopulation="PV_L5" synapse="GABAA">
<connection id="0" preCellId="../SOM_L5/11/HHCell" postCellId="../PV_L5/8/HHCell" preSegmentId="0" preFractionAlong="0.5" postSegmentId="0" postFractionAlong="0.5"/>
</projection>
</network>
</neuroml>
